!20260421 3hr13minでPCTの応力まで完了!
!20240109 小さい両面冷却PM
!20240214いったん完成
!20240229 STRESSを解析する場合は、チップのメッシュをはんだにそろえている(0.15->0.45) これによりチップアクティブの解像度は粗くなってしまう。ただし、細かいメッシュでは応力がピーキーになり、TPと前提が異なってしまうので、0.45で統一した
!20240306 せん断力はチップ側面のエッジが大きな値になっていた。0.18mmを3分割しているので、メッシュが細かすぎると判断し、分割しない(1メッシュ)に変更した。対抗する樹脂も変更した
!熱抵抗の計算は、チップのACTIVEは0.15のメッシュサイズのほうが良い
!段付きSPCにテーパを入れるための処理 MDSPCなるものを導入
!3パラ1行の解析結果から以下を反映した20201007
!チップは5.25角　GDRING0.51 ゲートは1.13で同じものを用いた
!上DBC銅厚0.6 SPC1.1 上DBC信号側OFFSET3 チップCLは内側1.48→0.48外側1.48→2.48+1mm
!チップ上CL 2.77→0.77  下CL 2.77+2→4.77+2
!柱O 3x4  N 4x3

!用語の注意　座標は　信号ピン側を下にしている
!一方でUPは信号ピン側　LOWは信号の無い側を指しているので注意
!ETABLEのラベルは8文字までなので注意
/CWD,D:\Userarea\J0125789\Documents\ANSYS_CAE\modefrontier_prj\Ansys_file\pct_work

/DELETE,FILE,RST
/DELETE,FILE,RTH

fini
/clear
/prep7

*SET,MAG,0.001	!SI単位にそろえるための係数 mm→mに変換

*SET,RESINKEY,1	!RESINKEY=1で樹脂ありの解析　ここが1以外であると樹脂なしの解析になる

*SET,SOLUTIONSW,1	!SOLUTIONSW=1で解析を実行する
*SET,STRESSSW,1		!STRESSSW=1でPCT応力解析を実行する
*SET,TCTSW,0		!TCTSW=1でTCT応力解析を実行する

!------------パラメータの変更はここだけをいじって--------------------------------
!PCT用の変数-------------
*SET,PorN	!0:N  1:P
PorN=1

!段差の有無
*SET,DANSA

DANSA=1	!1は段差あり
!PCT用の変数ここまで-----------

*SET,X1	!ダミー変数

*SET,Tatm,20	!雰囲気温度

*SET,NBUSWID,10*MAG
*SET,OBUSWID
*SET,PBUSWID
*SET,DBUSWID,3*MAG	!5から変更
OBUSWID=NBUSWID
PBUSWID=NBUSWID
*SET,NBUSIN,5*MAG
*SET,BUSINH,1*MAG
*SET,NBUSDH,(NBUSWID-NBUSIN)/2/1.7320508	!斜めの高さ
*SET,DBUSIN,5*MAG
*SET,DBUSINH,2*MAG
*SET,OBUSIN,13*MAG
*SET,PBUSIN
PBUSIN=OBUSIN
*SET,BSOLCL,0.15*MAG	!ダミーバス横の銅のクリアランス
*SET,UPBSOLCL,1*MAG	!上側DBC柱横のCL


*SET,BUSSOLH,1*MAG	!BUSはんだのY幅 BUSはんだにはフィレットはつけない これは、DBCサイズに影響するので冒頭で規定
*SET,IGBTX,5.25*MAG		!IGBTチップの横１辺
*SET,IGBTY,5.25*MAG		!IGBTチップの縦1辺
*SET,IGBTZ,0.18*MAG		!IGBTの厚み

*SET,DSOLT,0.08*MAG		!ダイはんだの厚み
*SET,ESOLT,0.08*MAG		!エミッタはんだの厚み
*SET,SPSOLT,0.08*MAG		!スぺ―サ上はんだの厚み
*SET,PSOLT,0.08*MAG		!柱のはんだの厚み
*SET,BSOLT,0.08*MAG		!ﾊﾞｽはんだの厚み(バスだけはフィレットを設けない

SPSOLT=ESOLT		!ｴﾐｯﾀはんだとスペーサー上はんだは同じ厚さにそろえる


!----------エミッタ上のクリアランス-------------------------------------
*SET,IGBT_LEFT_CL,(0.34+0.25)*MAG		!IGBTの左側　スペーサCL 0.34はGDリング幅(端部～PADまでの距離) 0.25はPAD上のCL
*SET,IGBT_LOW_CL,(0.34+0.25)*MAG		!IGBTの下側　スペーサCL
*SET,CL_PAD,2.13*MAG	!PAD分のCL(GDリングは含まず）縦の距離
*SET,SUBSPCX,(2.33-0.25)*MAG	!2.33はSUB PADの幅 そこから0.2だけ幅を間引いた
!*SET,SUBSPCY,(1.13-0.2)*MAG	!PAD分のCL
*SET,SUBSPCY,(1.13)*MAG	!SUB SPCの突き出し量 ゲートPAD下端とつらいちまで

IGBT_LOW_CL=IGBT_LEFT_CL

*SET,ISPCZ,1.25*MAG

*SET,ISPCX,11*MAG	!IGBTスぺ―サ側銅板のX寸法	これはダミー　あとで計算している
*SET,ISPCY,10*MAG	!IGBTスぺ―サ側銅板のY寸法	これはダミー　あとで計算している
!*SET,ISPCZ,1.61*MAG	!IGBTスぺ―サ側銅板の厚み
*SET,SPCZ,0.3*MAG*DANSA	!チップと接触する面の高さ DANSAは0か1 1は段付きかどうかという意味
ISPCX=IGBTX-IGBT_LEFT_CL-IGBT_LEFT_CL
!ISPCY=IGBTY-IGBT_LOW_CL-IGBT_LOW_CL-CL_PAD
ISPCY=IGBTY-IGBT_LOW_CL-CL_PAD-0.34*MAG	!PADの上側面一まで

*SET,UPSPCX
*SET,UPSPCY
*SET,UPSPCZ
*SET,MDSPCZ	!SPC中間部の厚み
MDSPCZ=(IGBT_LEFT_CL*3/4)*DANSA	!突き出し幅の3/4だけ面取りを入れる
UPSPCZ=(ISPCZ-SPCZ-MDSPCZ)*DANSA	!最上段の高さ
UPSPCX=IGBTX
UPSPCY=IGBTY-CL_PAD-0.34*MAG+SUBSPCY
SPCZ=ISPCZ-UPSPCZ-MDSPCZ	!段差なしの時にSPCZ=ISPCZにする処置である
!ISPCZ 全厚み　下から順にSPCZ/MDSPCZ/UPSPCZ


*SET,XPRSIDE_CHIP,(2-1.5)*MAG	!チップ側面外側のCL
*SET,XPLSIDE_CHIP,(0.5+0.9)*MAG	!チップ側面内側のCL
*SET,XORSIDE_CHIP,(0.5+0.9)*MAG	!チップ側面内側のCL
*SET,XOLSIDE_CHIP,(2-1.5)*MAG	!チップ側面外側のCL
*SET,YLSIDE_CHIP,(1+0.3+0.5)*MAG+BUSSOLH	!チップ前後端のCL 下側
*SET,YUSIDE_CHIP,(0.8-0.3)*MAG	!チップ前後端のCL 上側


!-------------------
*SET,PARA,4	!パラ数
*SET,PARA1ST
PARA1ST=NINT((PARA-1)/2)+MOD(PARA,2)
*SET,PARA2ND
PARA2ND=PARA-PARA1ST
*SET,YMID_CHIP,(1.5-0.5)*MAG	!前後列のCL


!*SET,PARACL,(1.98+0.5+0.8)*MAG	!SiC
!*SET,PARACL,(2+0.5+0.8)*MAG	!SiC
*SET,PARACL,(3-0.25)*MAG	!SiC
*SET,PARAOFFSET
PARAOFFSET=(PARACL+IGBTX)/2
*SET,YLINE,1.5*MAG	!信号の島高さ(幅)
*SET,XLINE,13*MAG	!信号島の幅　ダミー
*SET,LINECL,1.6*MAG	!信号島間のCL
*SET,XTMR,2.8*MAG		!サーミスタ島の1辺　ダミー 最大値
*SET,YTMR,4.6*MAG
*SET,XOLINE,12*MAG	!O島側の信号島幅 ダミー
YTMR=(YLINE+LINECL)*2-LINECL

*SET,XPO,5.3*MAG	!P-O柱エリアの幅
*SET,XDESAT,1.5*MAG	!DESAT半島の幅

!-------------------

*SET,PLATEZ,0.8*MAG	!Dがわ銅板厚み
*SET,PLATEZ2,0.8*MAG	!D側銅板　厚み中
*SET,PLATEZ3,0.8*MAG	!D側銅板厚み外
*SET,PLATEUPZ,0.6*MAG	!S側銅板厚み
*SET,PLATEUPZ2,0.6*MAG	!S側銅板厚み中
*SET,PLATEUPZ3,0.6*MAG	!S側銅板厚み外

*SET,BUSTHICK,0.5*MAG	!ﾊﾞｽ厚み
*SET,GROOVE,1.6*MAG	!溝幅 DBCパターンの溝
*SET,NX,6*MAG	!N島の幅
*SET,NY,9*MAG	!N島の高さ
!*SET,DX,6*MAG	!DUM島の幅
!*SET,DY,9*MAG	!DUM島の高さ
!DX=DBUSWID+BSOLCL*2
!DY=YTMR

*SET,PLATEX		!コレクタ側銅板のX寸法
*SET,PLATEY		!コレクタ側銅板のY寸法
PLATEY=IGBTY*2+YLSIDE_CHIP+YUSIDE_CHIP+YMID_CHIP+YTMR+LINECL


*SET,OPOLEX
*SET,OPOLEY
*SET,OPOLEZ		!最後に帳尻合わせで高さが決まる
*SET,NPOLEX
*SET,NPOLEY
*SET,NPOLEZ		!最後に帳尻合わせで高さが決まる
OPOLEX=4*MAG
OPOLEY=3*MAG
NPOLEX=4*MAG
NPOLEY=3*MAG
OPOLEZ=DSOLT+IGBTZ+ESOLT+ISPCZ+SPSOLT-2*PSOLT
NPOLEZ=OPOLEZ
NPOLEX=OPOLEX

NX=NPOLEX+BSOLCL*2
*IF,NBUSIN+2*BSOLCL,GT,NX,THEN	!基本はNBUSの幅でNXがきまる
	NX=NBUSIN+2*BSOLCL
*ENDIF


*SET,OPLATEX1	!短いほうのX長さ

*SET,OPLATEX	!長いほうのX長さ
*SET,PPLATEX
*SET,PPLATEY
PPLATEY=IGBTY*2+YLSIDE_CHIP+YUSIDE_CHIP+YMID_CHIP

*IF,MOD(PARA,2),EQ,1,THEN	!奇数パラ
	PLATEX=XORSIDE_CHIP+(PARA1ST*IGBTX+(PARA1ST-1)*PARACL)+XOLSIDE_CHIP+GROOVE+NX+GROOVE
	PLATEX=PLATEX+XPRSIDE_CHIP+(PARA1ST*IGBTX+(PARA1ST-1)*PARACL)+XPLSIDE_CHIP
	PPLATEX=XPRSIDE_CHIP+(PARA1ST*IGBTX+(PARA1ST-1)*PARACL)+XPLSIDE_CHIP
	OPLATEX1=XORSIDE_CHIP+(PARA1ST*IGBTX+(PARA1ST-1)*PARACL)+XOLSIDE_CHIP
	OPLATEX=OPLATEX1+GROOVE+NX
*ENDIF

*IF,MOD(PARA,2),EQ,0,THEN	!偶数パラ
	PLATEX=XORSIDE_CHIP+(PARA1ST*IGBTX+(PARA1ST-1)*PARACL)+PARAOFFSET+XOLSIDE_CHIP+GROOVE+NX+GROOVE
	PLATEX=PLATEX+XPRSIDE_CHIP+(PARA1ST*IGBTX+(PARA1ST-1)*PARACL)+PARAOFFSET+XPLSIDE_CHIP
	PPLATEX=XPRSIDE_CHIP+(PARA1ST*IGBTX+(PARA1ST-1)*PARACL)+PARAOFFSET+XPLSIDE_CHIP
	OPLATEX1=XORSIDE_CHIP+(PARA1ST*IGBTX+(PARA1ST-1)*PARACL)+PARAOFFSET+XOLSIDE_CHIP
	OPLATEX=OPLATEX1+GROOVE+NX
*ENDIF

XOLINE=OPLATEX-LINECL-LINECL-XTMR-XPO
XLINE=PPLATEX-XDESAT-LINECL


*SET,BUSHEIGHT,2*MAG	!バス下面の高さ 信号含めて統一。下型へのバス設置面である この値はダミー


*SET,UPPLATEY
*SET,UPPLATEOFFSET,3*MAG	!上側DBCの下に対するYの差異
*SET,UPPLATEBUSOFFSET,2*MAG	!上側DBCの下に対するYの差異(バス側のｵﾌｾｯﾄ) 絶縁距離の観点から3->2mmｵﾌｾｯﾄしている
*IF,UPPLATEOFFSET,LE,0,THEN
	UPPLATEOFFSET=0.1*MAG
*ENDIF
*IF,UPPLATEBUSOFFSET,LE,0,THEN
	UPPLATEBUSOFFSET=0.1*MAG
*ENDIF
UPPLATEY=PLATEY-UPPLATEOFFSET-UPPLATEBUSOFFSET
*SET,UPOPLATEX	!上側O電極の最大幅
*SET,UPNPLATEX	!上側P電極の最大幅
!UPOPLATEX=PPLATEX+GROOVE+UPBSOLCL+OPOLEX+UPBSOLCL
UPOPLATEX=PPLATEX+GROOVE+NX
!UPNPLATEX=OPLATEX1+GROOVE+NX/2+NPOLEX/2+UPBSOLCL
UPNPLATEX=OPLATEX1+GROOVE+NX
*SET,UPOPLATEX1	!上側O電極の最小幅
*SET,UPNPLATEX1	!上側P電極の最小幅
UPOPLATEX1=PLATEX-UPNPLATEX-GROOVE
UPNPLATEX1=PLATEX-UPOPLATEX-GROOVE

*SET,RESIN_SIDE,3.02*MAG	!DBCセラ側面から樹脂の端まで 180401
*SET,RESIN_UP,3.7*MAG	!DBCセラ下端樹脂の端まで
*SET,RESIN_LOW,2.7*MAG	!DBCセラ上端から樹脂の端まで

!------DBC------------
*SET,DBC_CERA_T,0.32*MAG	!セラ厚み
*SET,DBC_CERA_T2,0.32*MAG	!セラ厚み 外側
*SET,DBC_CERA_UPT,0.32*MAG	!セラ厚み
*SET,DBC_CERA_UPT2,0.32*MAG	!セラ厚み 外側
*SET,ENGAWA,1.3*MAG			!DBCの縁側の幅 XLSA


*SET,SIGWID,1.6*MAG	!信号ピンの1辺
*SET,SIGDIS,2.8*MAG	!信号PIN間の間隔 中心位置の間隔
*DIM,SIGLEFT,ARRAY,8
SIGLEFT(1)=(RESIN_SIDE+ENGAWA+PLATEX/2-SIGDIS*4)/2-3.5*MAG-SIGWID/2
SIGLEFT(2)=SIGLEFT(1)+SIGDIS
SIGLEFT(3)=SIGLEFT(2)+SIGDIS
SIGLEFT(4)=SIGLEFT(3)+SIGDIS
SIGLEFT(5)=SIGLEFT(4)+SIGDIS

SIGLEFT(6)=(RESIN_SIDE+ENGAWA+PLATEX/2-SIGDIS*4)/2+3.5*MAG+RESIN_SIDE+ENGAWA+PLATEX/2-SIGWID/2
SIGLEFT(7)=SIGLEFT(6)+SIGDIS
SIGLEFT(8)=SIGLEFT(7)+SIGDIS*3


*SET,SIG1
*SET,SIG2
*SET,SIG3
*SET,SIG4
*SET,SIG5
*SET,SIG6
*SET,SIG7
*SET,SIG8

SIG1=SIGLEFT(1)
SIG2=SIGLEFT(2)
SIG3=SIGLEFT(3)
SIG4=SIGLEFT(4)
SIG5=SIGLEFT(5)
SIG6=SIGLEFT(6)
SIG7=SIGLEFT(7)
SIG8=SIGLEFT(8)

*SET,SIGLOW,RESIN_UP-10*MAG	!信号PINの
*SET,NEEDLEWID,0.6*MAG	!信号ピン先端幅
*SET,NEEDLELOW,RESIN_UP-25*MAG	!信号ピン先端下端
*SET,DSIG,3	!信号ピン関連のメッシュ分割数　３に固定

*SET,BUSLOW,RESIN_UP+ENGAWA+PLATEY-BUSSOLH
*SET,OBUSLEFT,RESIN_SIDE+ENGAWA+PLATEX/2-NBUSWID/2-6*MAG-OBUSWID				!OBUSの位置
*SET,PBUSLEFT,RESIN_SIDE+ENGAWA+PLATEX/2+NBUSWID/2+6*MAG-(PBUSIN-PBUSWID)				!PBUSの位置
*SET,NBUSLEFT,RESIN_SIDE+ENGAWA+PLATEX/2-NBUSWID/2					!NBUSはんだの島上の開始X位置
*SET,BUSLENGTH,25*MAG				!DBCからの突出し長さ
*SET,DBUSUP,RESIN_UP+ENGAWA+DBUSINH
*SET,DBUSLENGTH,10*MAG	!はんだ以降、突き出し長さ
*SET,DBUSLOW,DBUSUP-DBUSLENGTH
*SET,DBUSLEFT,RESIN_SIDE+ENGAWA+PLATEX/2-DBUSWID/2
*SET,BUSUP,BUSLOW+BUSSOLH+BUSLENGTH


!パワーカードの厚み
*SET,PMTHICK	!パワーモジュールの厚み
PMTHICK=PLATEZ3+DBC_CERA_T2+PLATEZ2+DBC_CERA_T+PLATEZ
PMTHICK=PMTHICK+DSOLT+IGBTZ+ESOLT+ISPCZ+SPSOLT
PMTHICK=PMTHICK+PLATEUPZ+DBC_CERA_UPT+PLATEUPZ2+DBC_CERA_UPT2+PLATEUPZ3
*SET,PMW
*SET,PMH
*SET,PMVOL
PMW=RESIN_SIDE*2+ENGAWA*2+PLATEX
PMH=RESIN_LOW+RESIN_UP+PLATEY+ENGAWA*2
PMVOL=PMW*PMH*PMTHICK
!------DBC END--------


BUSHEIGHT=PLATEZ3+DBC_CERA_T+PLATEZ+PLATEZ2+DBC_CERA_T+BSOLT


!------------パラメータの変更はここだけをいじって　おわり--------------------------------

*SET,KBASE
*SET,ABASE
*SET,LBASE
*SET,VBASE

*SET,X1
*SET,X2
*SET,X3
*SET,X4		!座標を指定するための変数群
*SET,X5		!座標を指定するための変数群
*SET,X6		!座標を指定するための変数群
*SET,X7		!座標を指定するための変数群
*SET,X8		!座標を指定するための変数群
*SET,X9		!座標を指定するための変数群

*SET,A1
*SET,A2
*SET,A3
*SET,A4		!座標を指定するための変数群
*SET,A5		!座標を指定するための変数群
*SET,A6		!座標を指定するための変数群
*SET,A7		!座標を指定するための変数群
*SET,A8		!座標を指定するための変数群
*SET,A9		!座標を指定するための変数群
*SET,A10	!座標を指定するための変数群
*SET,A11	!座標を指定するための変数群
*SET,A12	!座標を指定するための変数群
*SET,A13	!座標を指定するための変数群
*SET,A14	!座標を指定するための変数群
*SET,A15	!座標を指定するための変数群
*SET,A16	!座標を指定するための変数群
*SET,A17	!座標を指定するための変数群
*SET,A18	!座標を指定するための変数群
*SET,A19	!座標を指定するための変数群
*SET,A20	!座標を指定するための変数群


*SET,pi,3.1415926535

*SET,BUSX,3*MAG	!BUS部分のメッシュ分割サイズ
*SET,BUSY,3*MAG
*SET,BUSZ,3*MAG

!*SET,M_SOLX,0.9*MAG	!はんだのメッシュサイズ X
!*SET,M_SOLY,0.9*MAG	!はんだのメッシュサイズ Y
!*SET,M_SOLZ,0.04*MAG	!はんだのメッシュサイズ Z
!SiCの場合、熱抵抗は0.45→0.15のほうが良い アクティブを指定するのがこの粗さでなければ困難
!*SET,M_CHIPX,0.9*MAG
!*SET,M_CHIPY,0.9*MAG
!*SET,M_CHIPZ,0.04*MAG
*SET,M_SOLX,0.45*MAG	!はんだのメッシュサイズ X
*SET,M_SOLY,0.45*MAG	!はんだのメッシュサイズ Y
*SET,M_SOLZ,0.04*MAG	!はんだのメッシュサイズ Z
!SiCの場合、熱抵抗は0.45→0.15のほうが良い アクティブを指定するのがこの粗さでなければ困難
*SET,M_CHIPX,0.45*MAG
*SET,M_CHIPY,0.45*MAG
*SET,M_CHIPZ,0.04*MAG

*SET,D_CERAX,12*4		!セラの粗さ 20 結局セラのX,Y粗さは下のほうで実寸法から作成
*SET,D_CERAY,12*4		!セラの粗さ 20
*SET,D_CERAZ,3		!セラＺ方向粗さ

*SET,D_PLTX,12*4		!銅版の粗さ 20
*SET,D_PLTY,12*4		!銅版の粗さ 20
*SET,D_PLTZ,3		!銅版Ｚ方向粗さ

*SET,M_PLTX,1*MAG		!銅版のメッシュサイズX方向
*SET,M_PLTY,1*MAG		!銅版のメッシュサイズY方向
*SET,M_PLTZ,0.4*MAG		!銅版Ｚ方向
!*SET,M_PLTX,2*MAG		!銅版のメッシュサイズX方向
!*SET,M_PLTY,2*MAG		!銅版のメッシュサイズY方向
!*SET,M_PLTZ,0.8*MAG		!銅版Ｚ方向

*SET,M_RESINX,0.7*MAG	!樹脂メッシュのサイズX
*SET,M_RESINY,0.7*MAG	!樹脂メッシュのサイズY
*SET,M_RESINZ,0.7*MAG	!樹脂メッシュのサイズZ
!*SET,M_RESINX,1.4*MAG	!樹脂メッシュのサイズX
!*SET,M_RESINY,1.4*MAG	!樹脂メッシュのサイズY
!*SET,M_RESINZ,1.4*MAG	!樹脂メッシュのサイズZ


*SET,IDIEX,20		!ダイはんだの粗さ 20 IGBTのほう
*SET,IDIEY,20		!ダイはんだの粗さ 20
*SET,IDIEZ,3		!ダイはんだＺ方向粗さ

*SET,DSPCZ,3

*SET,DBUSX
*SET,DBUSY
*SET,DBUSZ

*SET,DRESINX		!樹脂の粗さX
*SET,DRESINY
*SET,DRESINZ

*SET,ii
*set,jj
*set,kk
*set,ll
*set,mm
*set,nn
*SET,HANDAFILANG,50
*SET,TAN50,1.1918	!はんだの縁をもとめるため。上側角度のTAN 50度  下側で規定のフィレットは40度
TAN50=TAN(HANDAFILANG/180*pi)


!----------------------------はんだおよびチップ周辺の樹脂の細かいメッシュ領域定義----------------------------------
*SET,FINERESINCOR	!ｺﾚｸﾀ側の細メッシュ幅
*SET,FINERESINEMI	!ｴﾐｯﾀ側の細メッシュ幅
!ｺﾚｸﾀ側
FINERESINCOR=(XPRSIDE_CHIP-DSOLT*TAN50)/2+DSOLT*TAN50			!XPRSIDE_CHIPはP島 チップ行外側のCL
*IF,FINERESINCOR,GT,(XPLSIDE_CHIP-DSOLT*TAN50)/2+DSOLT*TAN50,THEN
	FINERESINCOR=(XPLSIDE_CHIP-DSOLT*TAN50)/2+DSOLT*TAN50
*ENDIF
*IF,FINERESINCOR,GT,(XOLSIDE_CHIP-DSOLT*TAN50)/2+DSOLT*TAN50,THEN
	FINERESINCOR=(XOLSIDE_CHIP-DSOLT*TAN50)/2+DSOLT*TAN50
*ENDIF
*IF,FINERESINCOR,GT,(XORSIDE_CHIP-DSOLT*TAN50)/2+DSOLT*TAN50,THEN
	FINERESINCOR=(XORSIDE_CHIP-DSOLT*TAN50)/2+DSOLT*TAN50
*ENDIF
*IF,FINERESINCOR,GT,(YUSIDE_CHIP-DSOLT*TAN50)/2+DSOLT*TAN50,THEN
	FINERESINCOR=(YUSIDE_CHIP-DSOLT*TAN50)/2+DSOLT*TAN50
*ENDIF
*IF,FINERESINCOR,GT,(YLSIDE_CHIP-DSOLT*TAN50)/2+DSOLT*TAN50,THEN
	FINERESINCOR=(YLSIDE_CHIP-DSOLT*TAN50)/2+DSOLT*TAN50
*ENDIF
*IF,FINERESINCOR,GT,(PARACL-DSOLT*TAN50)/3+DSOLT*TAN50,THEN
	FINERESINCOR=(PARACL-DSOLT*TAN50)/3+DSOLT*TAN50
*ENDIF
*IF,FINERESINCOR,GT,(YMID_CHIP-DSOLT*TAN50)/3+DSOLT*TAN50,THEN
	FINERESINCOR=(YMID_CHIP-DSOLT*TAN50)/3+DSOLT*TAN50
*ENDIF

*IF,FINERESINCOR,GT,1.5*MAG-IGBT_LOW_CL,THEN		!FINERESINCORが、異形SPCのくぼみ部分と矛盾しないように上限を設定している
	FINERESINCOR=1.5*MAG-IGBT_LOW_CL
*ENDIF

!ｴﾐｯﾀ側
FINERESINEMI=IGBT_LOW_CL+FINERESINCOR		!IGBT_LOW_CLはGDリング+SPCあそび

!---------------------------------------IGBTダイ半田のあらさ最終設定-----------------------
IDIEX=NINT(IGBTX/M_SOLX)
IDIEY=NINT(IGBTY/M_SOLY)
IDIEZ=NINT(DSOLT/M_SOLZ)
*IF,IDIEZ,LT,3,THEN
	IDIEZ=3
*ENDIF
!---------------------------------------ダイ半田のあらさ最終設定-----------------------
!------樹脂の粗さ変数---------------------
*SET,NRESINZ
*SET,NRESINX
*SET,NRESINY
!------樹脂の粗さ変数ここまで---------------------
!------はんだ近傍の樹脂寸法----------------------
NRESINX=IDIEX
NRESINY=IDIEY
NRESINZ=IDIEZ
!-----↑最初ははんだのサイズのそろえる----------------


!-----下側の電極--------------------
*DIM,PPLATE1,ARRAY,2,4,3
*DIM,PPLATE2,ARRAY,2,4,3	!DESAT半島
*DIM,OPLATE1,ARRAY,2,4,3	!今回SiCはこれで
*DIM,OPLATE2,ARRAY,2,4,3	!中継部分
*DIM,OPLATE3,ARRAY,2,4,3	!柱とDUMBUS接続部
*DIM,NPLATE1,ARRAY,2,4,3

!--SiC特有の島
*DIM,PGSIGNAL,ARRAY,2,4,3
*DIM,PSSIGNAL,ARRAY,2,4,3
*DIM,OGSIGNAL,ARRAY,2,4,3
*DIM,OSSIGNAL,ARRAY,2,4,3
*DIM,THERM,ARRAY,2,4,3


!-----上側の電極--------------------
*DIM,OPLATE4,ARRAY,2,4,3   !上が2としよう　X1～X36,Y1～Y36,Z1～Z36
*DIM,OPLATE5,ARRAY,2,4,3
*DIM,NPLATE2,ARRAY,2,4,3
*DIM,NPLATE3,ARRAY,2,4,3

!-----セラの座標---------------------
*DIM,LCERA,ARRAY,2,4,3
*DIM,UCERA,ARRAY,2,4,3

!-----外側セラの座標---------------------
*DIM,LOCERA,ARRAY,2,4,3
*DIM,UOCERA,ARRAY,2,4,3

!-----中間の放熱銅--------------------
*DIM,LMIDCU,ARRAY,2,4,3
*DIM,UMIDCU,ARRAY,2,4,3

!----外側の放熱銅---------------------
*DIM,LOWCU,ARRAY,2,4,3		!異形の下側Cu
*DIM,UPCU,ARRAY,2,4,3		!異形の上側Cu

!------RCIGBT--------------------------
*DIM,RCIGBT,ARR5,2,PARA,2,4,3	!1がLOW　2がHI ARRAYは4以降 ARR4,ARR5となる。5次元が最大


!------ダイ半田-----------------------
*DIM,SOL1,ARR5,2,PARA,2,4,3	!1がLOW　2がHI
!------エミッタ半田-----------------------
*DIM,SOL2,ARR5,2,PARA,2,4,3	!1がLOW　2がHI　半島の奥
!-------SUBSPCのはんだ------------------------------------------------------------
*DIM,SOL2B,ARR5,2,PARA,2,4,3	!突き出し部分
*DIM,SOL2C,ARR5,2,PARA,2,4,3	!横部分
!------SPC上半田-----------------------
*DIM,SOL3,ARR5,2,PARA,2,4,3	!1がLOW　2がHI

!------O-O柱はんだ-----------------------
*DIM,SOL4,ARR4,2,2,4,3	!1が下　2が上
!------N-N柱はんだ-----------------------
*DIM,SOL5,ARR4,2,2,4,3	!1が下　2が上

!------BUSはんだ-----------------------
*DIM,SOL6,ARR4,4,2,4,3	!1がO　2がN 3がP 4がD
!------スペーサ------------------------
*DIM,SPC,ARR5,2,PARA,2,4,3	!1がLOW 2がHI
!------PO柱----------------------------
*DIM,OPOLE,ARRAY,2,4,3
!------NN柱----------------------------
*DIM,NPOLE,ARRAY,2,4,3


!まずは、チップ周辺の樹脂を作成する
*DIM,RESINCOR,ARR5,2*PARA,4,2,4,3		!ｺﾚｸﾀ側だよ P or N ,1～4辺,

!ｼﾘｺﾝ側面の樹脂
*DIM,RESINCORSI,ARR5,2*PARA,4,2,4,3		!ｺﾚｸﾀ側だよ PorN,1～4辺,
!チップ上のはんだ周辺の樹脂-----------------------------------------------
*DIM,RESINEMI,ARR5,2*PARA,6,2,4,3		!ｴﾐｯﾀ側だよ  PorN,1～6辺,
*DIM,RESINEMIDENT,ARR4,2*PARA,2,4,3		!ｴﾐｯﾀ側だよ  PorN		異形部のくぼみに入る樹脂
!スペーサ側面の樹脂
*DIM,RESINEMISP,ARR5,2*PARA,6,2,4,3		!ｴﾐｯﾀ側だよ  PorN,1～6辺,
*DIM,RESINEMISPDENT,ARR4,2*PARA,2,4,3		!ｴﾐｯﾀ側だよ  PorN

*DIM,RESINEMICHAN,ARR5,2*PARA,4,2,4,3		!ｴﾐｯﾀ側だよ  PorN,1～4辺,	面取り部分の側面樹脂
*DIM,RESINEMISP2,ARR5,2*PARA,4,2,4,3		!ｴﾐｯﾀ側だよ  PorN,1～4辺,	垂直部分の側面樹脂
*DIM,RESINEMISP3,ARR5,2*PARA,4,2,4,3		!ｴﾐｯﾀ側だよ  PorN,1～4辺,	柱はんだ横
*DIM,RESINEMILAST,ARR4,2*PARA,2,4,3		!ｴﾐｯﾀ側だよ  PorN	LASTは最後という意味 PAD上の樹脂

!これでチップの周りがうまった


*DIM,RESINPARA,ARR5,2,(PARA1ST-1+PARA2ND-1),2,4,3	!柱の周りの樹脂　下、側面、上
*DIM,RESINMID,ARR4,2,2,4,3	!柱の周りの樹脂　下、側面、上
*DIM,RESINCHIPSIDE,ARR4,8,2,4,3	!8個の樹脂　チップ列の横
*DIM,RESINBUSSIDE,ARR4,8,2,4,3		!バス列と、チップの前後の長い樹脂
*DIM,RESINBUSLOW,ARR4,11,2,4,3		!バス下の薄い樹脂と、PNOバスの横の樹脂
*DIM,RESINLASTDBC,ARR4,10,2,4,3		!DBC間の最後の8個 バス列の6個と、左右縁側の細長い2個

*DIM,OBUS,ARR4,2,2,4,3
*DIM,NBUS,ARR4,3,2,4,3
*DIM,PBUS,ARR4,2,2,4,3
*DIM,DBUS,ARR4,2,2,4,3

*DIM,SIGNAL,ARR4,8,2,4,3
*DIM,NEEDLE,ARR4,8,2,4,3

*DIM,RESINSIG,ARR4,8,2,4,3	!信号間の水かきバス DBUS部分も含める
*DIM,RESINBUS,ARR4,3,2,4,3	!BUS間の水かきバス 2024/1/16 今回は2->3個に変更BUSの下の半田幅の薄い樹脂を作成

*DIM,RESINSIG2,ARR4,4,2,4,3	!信号側の樹脂完成
*DIM,RESINBUS2,ARR4,4,2,4,3	!バス側の樹脂完成
*DIM,RESINSIDE,ARR4,2,2,4,3	!サイドの樹脂　これで完成
*DIM,RESINOFFSET,ARR4,2,2,4,3	!これで本当に完成


!-------------------------------------------------------------------------ここから座標作成--------------------------------------------------
!ここから座標を作るのだが、信号側が下になっていることに注意
!-----下側電極の座標を作る------------------
!OPLATE
OPLATE1(1,1,1)=RESIN_SIDE+ENGAWA
OPLATE1(1,1,2)=RESIN_UP+ENGAWA+YTMR+LINECL
OPLATE1(1,1,3)=PLATEZ3+DBC_CERA_T2+PLATEZ2+DBC_CERA_T
OPLATE1(1,2,1)=RESIN_SIDE+ENGAWA+OPLATEX1
OPLATE1(1,2,2)=RESIN_UP+ENGAWA+YTMR+LINECL
OPLATE1(1,2,3)=OPLATE1(1,1,3)
OPLATE1(1,3,1)=RESIN_SIDE+ENGAWA+OPLATEX1
OPLATE1(1,3,2)=RESIN_UP+ENGAWA+PLATEY
OPLATE1(1,3,3)=OPLATE1(1,1,3)
OPLATE1(1,4,1)=RESIN_SIDE+ENGAWA
OPLATE1(1,4,2)=RESIN_UP+ENGAWA+PLATEY
OPLATE1(1,4,3)=OPLATE1(1,1,3)
*DO,ii,1,4,1
	OPLATE1(2,ii,1)=OPLATE1(1,ii,1)
	OPLATE1(2,ii,2)=OPLATE1(1,ii,2)
	OPLATE1(2,ii,3)=OPLATE1(1,ii,3)+PLATEZ
*ENDDO
OPLATE2(1,1,1)=OPLATE1(1,2,1)
OPLATE2(1,1,2)=OPLATE1(1,2,2)
OPLATE2(1,1,3)=OPLATE1(1,2,3)
OPLATE2(1,2,1)=RESIN_SIDE+ENGAWA+OPLATEX-XPO
OPLATE2(1,2,2)=OPLATE2(1,1,2)
OPLATE2(1,2,3)=OPLATE2(1,1,3)
OPLATE2(1,3,1)=RESIN_SIDE+ENGAWA+OPLATEX-XPO
OPLATE2(1,3,2)=OPLATE1(1,3,2)-NY-GROOVE
OPLATE2(1,3,3)=OPLATE2(1,1,3)
OPLATE2(1,4,1)=OPLATE1(1,2,1)
OPLATE2(1,4,2)=OPLATE1(1,3,2)-NY-GROOVE
OPLATE2(1,4,3)=OPLATE2(1,1,3)
*DO,ii,1,4,1
	OPLATE2(2,ii,1)=OPLATE2(1,ii,1)
	OPLATE2(2,ii,2)=OPLATE2(1,ii,2)
	OPLATE2(2,ii,3)=OPLATE2(1,ii,3)+PLATEZ
*ENDDO

OPLATE3(1,1,1)=OPLATE2(1,2,1)
OPLATE3(1,1,2)=RESIN_UP+ENGAWA
OPLATE3(1,1,3)=OPLATE2(1,2,3)
OPLATE3(1,2,1)=RESIN_SIDE+ENGAWA+OPLATEX
OPLATE3(1,2,2)=OPLATE3(1,1,2)
OPLATE3(1,2,3)=OPLATE3(1,1,3)
OPLATE3(1,3,1)=RESIN_SIDE+ENGAWA+OPLATEX
OPLATE3(1,3,2)=OPLATE1(1,3,2)-NY-GROOVE
OPLATE3(1,3,3)=OPLATE3(1,1,3)
OPLATE3(1,4,1)=OPLATE3(1,1,1)
OPLATE3(1,4,2)=OPLATE1(1,3,2)-NY-GROOVE
OPLATE3(1,4,3)=OPLATE3(1,1,3)
*DO,ii,1,4,1
	OPLATE3(2,ii,1)=OPLATE3(1,ii,1)
	OPLATE3(2,ii,2)=OPLATE3(1,ii,2)
	OPLATE3(2,ii,3)=OPLATE3(1,ii,3)+PLATEZ
*ENDDO


PPLATE1(1,1,1)=OPLATE3(1,2,1)+GROOVE
PPLATE1(1,1,2)=RESIN_UP+ENGAWA+YTMR+LINECL
PPLATE1(1,1,3)=OPLATE3(1,2,3)
PPLATE1(1,2,1)=PPLATE1(1,1,1)+PPLATEX
PPLATE1(1,2,2)=PPLATE1(1,1,2)
PPLATE1(1,2,3)=PPLATE1(1,1,3)
PPLATE1(1,3,1)=PPLATE1(1,1,1)+PPLATEX
PPLATE1(1,3,2)=RESIN_UP+ENGAWA+PLATEY
PPLATE1(1,3,3)=PPLATE1(1,1,3)
PPLATE1(1,4,1)=PPLATE1(1,1,1)
PPLATE1(1,4,2)=RESIN_UP+ENGAWA+PLATEY
PPLATE1(1,4,3)=PPLATE1(1,1,3)
*DO,ii,1,4,1
	PPLATE1(2,ii,1)=PPLATE1(1,ii,1)
	PPLATE1(2,ii,2)=PPLATE1(1,ii,2)
	PPLATE1(2,ii,3)=PPLATE1(1,ii,3)+PLATEZ
*ENDDO

PPLATE2(1,1,1)=PPLATE1(1,2,1)-XDESAT
PPLATE2(1,1,2)=RESIN_UP+ENGAWA
PPLATE2(1,1,3)=PPLATE1(1,2,3)
PPLATE2(1,2,1)=PPLATE1(1,2,1)
PPLATE2(1,2,2)=RESIN_UP+ENGAWA
PPLATE2(1,2,3)=PPLATE1(1,2,3)
PPLATE2(1,3,1)=PPLATE1(1,2,1)
PPLATE2(1,3,2)=PPLATE1(1,1,2)
PPLATE2(1,3,3)=PPLATE1(1,2,3)
PPLATE2(1,4,1)=PPLATE1(1,2,1)-XDESAT
PPLATE2(1,4,2)=PPLATE1(1,1,2)
PPLATE2(1,4,3)=PPLATE1(1,2,3)
*DO,ii,1,4,1
	PPLATE2(2,ii,1)=PPLATE2(1,ii,1)
	PPLATE2(2,ii,2)=PPLATE2(1,ii,2)
	PPLATE2(2,ii,3)=PPLATE2(1,ii,3)+PLATEZ
*ENDDO

NPLATE1(1,1,1)=RESIN_SIDE+ENGAWA+OPLATEX1+GROOVE
NPLATE1(1,1,2)=RESIN_UP+ENGAWA+PLATEY-NY
NPLATE1(1,1,3)=PPLATE1(1,2,3)
NPLATE1(1,2,1)=NPLATE1(1,1,1)+NX
NPLATE1(1,2,2)=NPLATE1(1,1,2)
NPLATE1(1,2,3)=NPLATE1(1,1,3)
NPLATE1(1,3,1)=NPLATE1(1,1,1)+NX
NPLATE1(1,3,2)=NPLATE1(1,1,2)+NY
NPLATE1(1,3,3)=NPLATE1(1,1,3)
NPLATE1(1,4,1)=NPLATE1(1,1,1)
NPLATE1(1,4,2)=NPLATE1(1,1,2)+NY
NPLATE1(1,4,3)=NPLATE1(1,1,3)
*DO,ii,1,4,1
	NPLATE1(2,ii,1)=NPLATE1(1,ii,1)
	NPLATE1(2,ii,2)=NPLATE1(1,ii,2)
	NPLATE1(2,ii,3)=NPLATE1(1,ii,3)+PLATEZ
*ENDDO

OGSIGNAL(1,1,1)=RESIN_SIDE+ENGAWA
OGSIGNAL(1,1,2)=RESIN_UP+ENGAWA+YLINE+LINECL
OGSIGNAL(1,1,3)=PLATEZ3+DBC_CERA_T2+PLATEZ2+DBC_CERA_T
OGSIGNAL(1,2,1)=RESIN_SIDE+ENGAWA+XOLINE
OGSIGNAL(1,2,2)=RESIN_UP+ENGAWA+YLINE+LINECL
OGSIGNAL(1,2,3)=OGSIGNAL(1,1,3)
OGSIGNAL(1,3,1)=RESIN_SIDE+ENGAWA+XOLINE
OGSIGNAL(1,3,2)=RESIN_UP+ENGAWA+YLINE+LINECL+YLINE
OGSIGNAL(1,3,3)=OGSIGNAL(1,1,3)
OGSIGNAL(1,4,1)=RESIN_SIDE+ENGAWA
OGSIGNAL(1,4,2)=RESIN_UP+ENGAWA+YLINE+LINECL+YLINE
OGSIGNAL(1,4,3)=OGSIGNAL(1,1,3)
*DO,ii,1,4,1
	OGSIGNAL(2,ii,1)=OGSIGNAL(1,ii,1)
	OGSIGNAL(2,ii,2)=OGSIGNAL(1,ii,2)
	OGSIGNAL(2,ii,3)=OGSIGNAL(1,ii,3)+PLATEZ
*ENDDO

*DO,ii,1,4,1
	*DO,jj,1,2,1
		OSSIGNAL(jj,ii,1)=OGSIGNAL(jj,ii,1)
		OSSIGNAL(jj,ii,2)=OGSIGNAL(jj,ii,2)-LINECL-YLINE
		OSSIGNAL(jj,ii,3)=OGSIGNAL(jj,ii,3)
	*ENDDO
*ENDDO

PGSIGNAL(1,1,1)=RESIN_SIDE+ENGAWA+XTMR+LINECL+XOLINE+LINECL+XPO+LINECL
PGSIGNAL(1,1,2)=RESIN_UP+ENGAWA+YLINE+LINECL
PGSIGNAL(1,1,3)=PLATEZ3+DBC_CERA_T2+PLATEZ2+DBC_CERA_T
PGSIGNAL(1,2,1)=RESIN_SIDE+ENGAWA+XTMR+LINECL+XOLINE+LINECL+XPO+LINECL+XLINE
PGSIGNAL(1,2,2)=RESIN_UP+ENGAWA+YLINE+LINECL
PGSIGNAL(1,2,3)=PGSIGNAL(1,1,3)
PGSIGNAL(1,3,1)=RESIN_SIDE+ENGAWA+XTMR+LINECL+XOLINE+LINECL+XPO+LINECL+XLINE
PGSIGNAL(1,3,2)=RESIN_UP+ENGAWA+YLINE+LINECL+YLINE
PGSIGNAL(1,3,3)=PGSIGNAL(1,1,3)
PGSIGNAL(1,4,1)=RESIN_SIDE+ENGAWA+XTMR+LINECL+XOLINE+LINECL+XPO+LINECL
PGSIGNAL(1,4,2)=RESIN_UP+ENGAWA+YLINE+LINECL+YLINE
PGSIGNAL(1,4,3)=PGSIGNAL(1,1,3)
*DO,ii,1,4,1
	PGSIGNAL(2,ii,1)=PGSIGNAL(1,ii,1)
	PGSIGNAL(2,ii,2)=PGSIGNAL(1,ii,2)
	PGSIGNAL(2,ii,3)=PGSIGNAL(1,ii,3)+PLATEZ
*ENDDO

*DO,ii,1,4,1
	*DO,jj,1,2,1
		PSSIGNAL(jj,ii,1)=PGSIGNAL(jj,ii,1)
		PSSIGNAL(jj,ii,2)=PGSIGNAL(jj,ii,2)-LINECL-YLINE
		PSSIGNAL(jj,ii,3)=PGSIGNAL(jj,ii,3)
	*ENDDO
*ENDDO

THERM(1,1,1)=RESIN_SIDE+ENGAWA+XOLINE+LINECL
THERM(1,1,2)=RESIN_UP+ENGAWA
THERM(1,1,3)=PLATEZ3+DBC_CERA_T2+PLATEZ2+DBC_CERA_T
THERM(1,2,1)=RESIN_SIDE+ENGAWA+XOLINE+LINECL+XTMR
THERM(1,2,2)=RESIN_UP+ENGAWA
THERM(1,2,3)=THERM(1,1,3)
THERM(1,3,1)=RESIN_SIDE+ENGAWA+XOLINE+LINECL+XTMR
THERM(1,3,2)=RESIN_UP+ENGAWA+YTMR
THERM(1,3,3)=THERM(1,1,3)
THERM(1,4,1)=RESIN_SIDE+ENGAWA+XOLINE+LINECL
THERM(1,4,2)=RESIN_UP+ENGAWA+YTMR
THERM(1,4,3)=THERM(1,1,3)
*DO,ii,1,4,1
	THERM(2,ii,1)=THERM(1,ii,1)
	THERM(2,ii,2)=THERM(1,ii,2)
	THERM(2,ii,3)=THERM(1,ii,3)+PLATEZ
*ENDDO


LCERA(1,1,1)=RESIN_SIDE
LCERA(1,1,2)=RESIN_UP
LCERA(1,1,3)=PLATEZ3+DBC_CERA_T2+PLATEZ2
LCERA(1,2,1)=RESIN_SIDE+ENGAWA+PLATEX+ENGAWA
LCERA(1,2,2)=RESIN_UP
LCERA(1,2,3)=LCERA(1,1,3)
LCERA(1,3,1)=RESIN_SIDE+ENGAWA+PLATEX+ENGAWA
LCERA(1,3,2)=RESIN_UP+ENGAWA+PLATEY+ENGAWA
LCERA(1,3,3)=LCERA(1,1,3)
LCERA(1,4,1)=RESIN_SIDE
LCERA(1,4,2)=RESIN_UP+ENGAWA+PLATEY+ENGAWA
LCERA(1,4,3)=LCERA(1,1,3)
*DO,ii,1,4,1
	LCERA(2,ii,1)=LCERA(1,ii,1)
	LCERA(2,ii,2)=LCERA(1,ii,2)
	LCERA(2,ii,3)=LCERA(1,ii,3)+DBC_CERA_T
*ENDDO

LOWCU(1,1,1)=RESIN_SIDE+ENGAWA
LOWCU(1,1,2)=RESIN_UP+ENGAWA
LOWCU(1,1,3)=0
LOWCU(1,2,1)=RESIN_SIDE+ENGAWA+PLATEX
LOWCU(1,2,2)=RESIN_UP+ENGAWA
LOWCU(1,2,3)=0
LOWCU(1,3,1)=RESIN_SIDE+ENGAWA+PLATEX
LOWCU(1,3,2)=RESIN_UP+ENGAWA+PLATEY
LOWCU(1,3,3)=0
LOWCU(1,4,1)=RESIN_SIDE+ENGAWA
LOWCU(1,4,2)=RESIN_UP+ENGAWA+PLATEY
LOWCU(1,4,3)=0
*DO,ii,1,4,1
	LOWCU(2,ii,1)=LOWCU(1,ii,1)
	LOWCU(2,ii,2)=LOWCU(1,ii,2)
	LOWCU(2,ii,3)=LOWCU(1,ii,3)+PLATEZ3
*ENDDO
!--------上側DBC-------------------------------------
NPLATE2(1,1,1)=RESIN_SIDE+ENGAWA
NPLATE2(1,1,2)=RESIN_UP+ENGAWA+UPPLATEOFFSET
NPLATE2(1,1,3)=PLATEZ3+DBC_CERA_T2+PLATEZ+DSOLT+ESOLT+SPSOLT+ISPCZ+IGBTZ+PLATEZ2+DBC_CERA_T
NPLATE2(1,2,1)=RESIN_SIDE+ENGAWA+UPNPLATEX1
NPLATE2(1,2,2)=RESIN_UP+ENGAWA+UPPLATEOFFSET
NPLATE2(1,2,3)=NPLATE2(1,1,3)
NPLATE2(1,3,1)=RESIN_SIDE+ENGAWA+UPNPLATEX1
NPLATE2(1,3,2)=RESIN_UP+ENGAWA+UPPLATEOFFSET+UPPLATEY
NPLATE2(1,3,3)=NPLATE2(1,1,3)
NPLATE2(1,4,1)=RESIN_SIDE+ENGAWA
NPLATE2(1,4,2)=RESIN_UP+ENGAWA+UPPLATEOFFSET+UPPLATEY
NPLATE2(1,4,3)=NPLATE2(1,1,3)
*DO,ii,1,4,1
	NPLATE2(2,ii,1)=NPLATE2(1,ii,1)
	NPLATE2(2,ii,2)=NPLATE2(1,ii,2)
	NPLATE2(2,ii,3)=NPLATE2(1,ii,3)+PLATEUPZ
*ENDDO

NPLATE3(1,1,1)=RESIN_SIDE+ENGAWA+UPNPLATEX1
NPLATE3(1,1,2)=NPLATE1(1,1,2)
NPLATE3(1,1,3)=PLATEZ3+DBC_CERA_T2+PLATEZ+DSOLT+ESOLT+SPSOLT+ISPCZ+IGBTZ+PLATEZ2+DBC_CERA_T
NPLATE3(1,2,1)=RESIN_SIDE+ENGAWA+UPNPLATEX
NPLATE3(1,2,2)=NPLATE1(1,1,2)
NPLATE3(1,2,3)=NPLATE3(1,1,3)
NPLATE3(1,3,1)=RESIN_SIDE+ENGAWA+UPNPLATEX
NPLATE3(1,3,2)=RESIN_UP+ENGAWA+UPPLATEOFFSET+UPPLATEY
NPLATE3(1,3,3)=NPLATE3(1,1,3)
NPLATE3(1,4,1)=RESIN_SIDE+ENGAWA+UPNPLATEX1
NPLATE3(1,4,2)=RESIN_UP+ENGAWA+UPPLATEOFFSET+UPPLATEY
NPLATE3(1,4,3)=NPLATE3(1,1,3)
*DO,ii,1,4,1
	NPLATE3(2,ii,1)=NPLATE3(1,ii,1)
	NPLATE3(2,ii,2)=NPLATE3(1,ii,2)
	NPLATE3(2,ii,3)=NPLATE3(1,ii,3)+PLATEUPZ
*ENDDO

OPLATE4(1,1,1)=RESIN_SIDE+ENGAWA+UPNPLATEX1+GROOVE
OPLATE4(1,1,2)=RESIN_UP+ENGAWA+UPPLATEOFFSET
OPLATE4(1,1,3)=PLATEZ3+DBC_CERA_T2+PLATEZ+DSOLT+ESOLT+SPSOLT+ISPCZ+IGBTZ+PLATEZ2+DBC_CERA_T
OPLATE4(1,2,1)=RESIN_SIDE+ENGAWA+PLATEX-UPOPLATEX1
OPLATE4(1,2,2)=RESIN_UP+ENGAWA+UPPLATEOFFSET
OPLATE4(1,2,3)=OPLATE4(1,1,3)
OPLATE4(1,3,1)=RESIN_SIDE+ENGAWA+PLATEX-UPOPLATEX1
OPLATE4(1,3,2)=OPLATE3(1,3,2)
OPLATE4(1,3,3)=OPLATE4(1,1,3)
OPLATE4(1,4,1)=RESIN_SIDE+ENGAWA+UPNPLATEX1+GROOVE
OPLATE4(1,4,2)=OPLATE3(1,3,2)
OPLATE4(1,4,3)=OPLATE4(1,1,3)
*DO,ii,1,4,1
	OPLATE4(2,ii,1)=OPLATE4(1,ii,1)
	OPLATE4(2,ii,2)=OPLATE4(1,ii,2)
	OPLATE4(2,ii,3)=OPLATE4(1,ii,3)+PLATEUPZ
*ENDDO

OPLATE5(1,1,1)=RESIN_SIDE+ENGAWA+UPNPLATEX+GROOVE
OPLATE5(1,1,2)=RESIN_UP+ENGAWA+UPPLATEOFFSET
OPLATE5(1,1,3)=PLATEZ3+DBC_CERA_T2+PLATEZ+DSOLT+ESOLT+SPSOLT+ISPCZ+IGBTZ+PLATEZ2+DBC_CERA_T
OPLATE5(1,2,1)=RESIN_SIDE+ENGAWA+PLATEX
OPLATE5(1,2,2)=RESIN_UP+ENGAWA+UPPLATEOFFSET
OPLATE5(1,2,3)=OPLATE5(1,1,3)
OPLATE5(1,3,1)=RESIN_SIDE+ENGAWA+PLATEX
OPLATE5(1,3,2)=RESIN_UP+ENGAWA+UPPLATEOFFSET+UPPLATEY
OPLATE5(1,3,3)=OPLATE5(1,1,3)
OPLATE5(1,4,1)=RESIN_SIDE+ENGAWA+UPNPLATEX+GROOVE
OPLATE5(1,4,2)=RESIN_UP+ENGAWA+UPPLATEOFFSET+UPPLATEY
OPLATE5(1,4,3)=OPLATE5(1,1,3)
*DO,ii,1,4,1
	OPLATE5(2,ii,1)=OPLATE5(1,ii,1)
	OPLATE5(2,ii,2)=OPLATE5(1,ii,2)
	OPLATE5(2,ii,3)=OPLATE5(1,ii,3)+PLATEUPZ
*ENDDO


UCERA(1,1,1)=RESIN_SIDE
UCERA(1,1,2)=RESIN_UP+UPPLATEOFFSET
UCERA(1,1,3)=PLATEZ3+DBC_CERA_T2+PLATEZ2+DBC_CERA_T+PLATEZ+DSOLT
UCERA(1,1,3)=UCERA(1,1,3)+IGBTZ+ESOLT+ISPCZ+SPSOLT+PLATEUPZ
UCERA(1,2,1)=RESIN_SIDE+ENGAWA+PLATEX+ENGAWA
UCERA(1,2,2)=RESIN_UP+UPPLATEOFFSET
UCERA(1,2,3)=UCERA(1,1,3)
UCERA(1,3,1)=RESIN_SIDE+ENGAWA+PLATEX+ENGAWA
UCERA(1,3,2)=RESIN_UP+ENGAWA+PLATEY+ENGAWA-UPPLATEBUSOFFSET
UCERA(1,3,3)=UCERA(1,1,3)
UCERA(1,4,1)=RESIN_SIDE
UCERA(1,4,2)=RESIN_UP+ENGAWA+PLATEY+ENGAWA-UPPLATEBUSOFFSET
UCERA(1,4,3)=UCERA(1,1,3)
*DO,ii,1,4,1
	UCERA(2,ii,1)=UCERA(1,ii,1)
	UCERA(2,ii,2)=UCERA(1,ii,2)
	UCERA(2,ii,3)=UCERA(1,ii,3)+DBC_CERA_UPT
*ENDDO

UPCU(1,1,1)=RESIN_SIDE+ENGAWA
UPCU(1,1,2)=RESIN_UP+ENGAWA+UPPLATEOFFSET
UPCU(1,1,3)=PLATEZ3+DBC_CERA_T2+PLATEZ2+DBC_CERA_T+PLATEZ+DSOLT+IGBTZ+ESOLT
UPCU(1,1,3)=UPCU(1,1,3)+ISPCZ+SPSOLT+PLATEUPZ+DBC_CERA_UPT+PLATEUPZ2+DBC_CERA_UPT2
UPCU(1,2,1)=RESIN_SIDE+ENGAWA+PLATEX
UPCU(1,2,2)=RESIN_UP+ENGAWA+UPPLATEOFFSET
UPCU(1,2,3)=UPCU(1,1,3)
UPCU(1,3,1)=RESIN_SIDE+ENGAWA+PLATEX
UPCU(1,3,2)=RESIN_UP+ENGAWA+UPPLATEOFFSET+UPPLATEY
UPCU(1,3,3)=UPCU(1,1,3)
UPCU(1,4,1)=RESIN_SIDE+ENGAWA
UPCU(1,4,2)=RESIN_UP+ENGAWA+UPPLATEOFFSET+UPPLATEY
UPCU(1,4,3)=UPCU(1,1,3)
*DO,ii,1,4,1
	UPCU(2,ii,1)=UPCU(1,ii,1)
	UPCU(2,ii,2)=UPCU(1,ii,2)
	UPCU(2,ii,3)=UPCU(1,ii,3)+PLATEUPZ3
*ENDDO

!--------------------信号ピン------------------------------
*DO,ii,1,8,1
	*DO,jj,1,2,1
		SIGNAL(ii,jj,1,1)=SIGLEFT(ii)
		SIGNAL(ii,jj,1,2)=SIGLOW
		SIGNAL(ii,jj,1,3)=BUSHEIGHT+(jj-1)*BUSTHICK
		SIGNAL(ii,jj,2,1)=SIGLEFT(ii)+SIGWID
		SIGNAL(ii,jj,2,2)=SIGLOW
		SIGNAL(ii,jj,2,3)=BUSHEIGHT+(jj-1)*BUSTHICK
		SIGNAL(ii,jj,3,1)=SIGLEFT(ii)+SIGWID
		SIGNAL(ii,jj,3,2)=RESIN_UP
		SIGNAL(ii,jj,3,3)=BUSHEIGHT+(jj-1)*BUSTHICK
		SIGNAL(ii,jj,4,1)=SIGLEFT(ii)
		SIGNAL(ii,jj,4,2)=RESIN_UP
		SIGNAL(ii,jj,4,3)=BUSHEIGHT+(jj-1)*BUSTHICK
	*ENDDO
*ENDDO
*DO,ii,1,8,1
	*DO,jj,1,2,1
		NEEDLE(ii,jj,1,1)=SIGLEFT(ii)+(SIGWID-NEEDLEWID)/2
		NEEDLE(ii,jj,1,2)=NEEDLELOW
		NEEDLE(ii,jj,1,3)=BUSHEIGHT+(jj-1)*BUSTHICK
		NEEDLE(ii,jj,2,1)=SIGLEFT(ii)+(SIGWID-NEEDLEWID)/2+NEEDLEWID
		NEEDLE(ii,jj,2,2)=NEEDLELOW
		NEEDLE(ii,jj,2,3)=BUSHEIGHT+(jj-1)*BUSTHICK
		NEEDLE(ii,jj,3,1)=SIGLEFT(ii)+(SIGWID-NEEDLEWID)/2+NEEDLEWID
		NEEDLE(ii,jj,3,2)=SIGLOW
		NEEDLE(ii,jj,3,3)=BUSHEIGHT+(jj-1)*BUSTHICK
		NEEDLE(ii,jj,4,1)=SIGLEFT(ii)+(SIGWID-NEEDLEWID)/2
		NEEDLE(ii,jj,4,2)=SIGLOW
		NEEDLE(ii,jj,4,3)=BUSHEIGHT+(jj-1)*BUSTHICK
	*ENDDO
*ENDDO

!バス--------------------------------------------------
*DO,ii,1,2,1
	OBUS(1,ii,1,1)=OBUSLEFT
	OBUS(1,ii,1,2)=BUSLOW
	OBUS(1,ii,1,3)=BUSHEIGHT+(ii-1)*BUSTHICK
	OBUS(1,ii,2,1)=OBUSLEFT+OBUSIN
	OBUS(1,ii,2,2)=BUSLOW
	OBUS(1,ii,2,3)=BUSHEIGHT+(ii-1)*BUSTHICK
	OBUS(1,ii,3,1)=OBUSLEFT+OBUSIN
	OBUS(1,ii,3,2)=BUSLOW+BUSSOLH
	OBUS(1,ii,3,3)=BUSHEIGHT+(ii-1)*BUSTHICK
	OBUS(1,ii,4,1)=OBUSLEFT
	OBUS(1,ii,4,2)=BUSLOW+BUSSOLH
	OBUS(1,ii,4,3)=BUSHEIGHT+(ii-1)*BUSTHICK
*ENDDO
*DO,ii,1,2,1
	OBUS(2,ii,1,1)=OBUSLEFT
	OBUS(2,ii,1,2)=BUSLOW+BUSSOLH
	OBUS(2,ii,1,3)=BUSHEIGHT+(ii-1)*BUSTHICK
	OBUS(2,ii,2,1)=OBUSLEFT+OBUSWID
	OBUS(2,ii,2,2)=BUSLOW+BUSSOLH
	OBUS(2,ii,2,3)=BUSHEIGHT+(ii-1)*BUSTHICK
	OBUS(2,ii,3,1)=OBUSLEFT+OBUSWID
	OBUS(2,ii,3,2)=BUSUP
	OBUS(2,ii,3,3)=BUSHEIGHT+(ii-1)*BUSTHICK
	OBUS(2,ii,4,1)=OBUSLEFT
	OBUS(2,ii,4,2)=BUSUP
	OBUS(2,ii,4,3)=BUSHEIGHT+(ii-1)*BUSTHICK
*ENDDO

*DO,ii,1,2,1
	NBUS(1,ii,1,1)=NBUSLEFT+(NBUSWID-NBUSIN)/2
	NBUS(1,ii,1,2)=BUSLOW
	NBUS(1,ii,1,3)=BUSHEIGHT+(ii-1)*BUSTHICK
	NBUS(1,ii,2,1)=NBUSLEFT+(NBUSWID-NBUSIN)/2+NBUSIN
	NBUS(1,ii,2,2)=BUSLOW
	NBUS(1,ii,2,3)=BUSHEIGHT+(ii-1)*BUSTHICK
	NBUS(1,ii,3,1)=NBUSLEFT+(NBUSWID-NBUSIN)/2+NBUSIN
	NBUS(1,ii,3,2)=BUSLOW+BUSSOLH
	NBUS(1,ii,3,3)=BUSHEIGHT+(ii-1)*BUSTHICK
	NBUS(1,ii,4,1)=NBUSLEFT+(NBUSWID-NBUSIN)/2
	NBUS(1,ii,4,2)=BUSLOW+BUSSOLH
	NBUS(1,ii,4,3)=BUSHEIGHT+(ii-1)*BUSTHICK
*ENDDO

*DO,ii,1,2,1
	NBUS(2,ii,1,1)=NBUSLEFT+(NBUSWID-NBUSIN)/2
	NBUS(2,ii,1,2)=BUSLOW+BUSSOLH
	NBUS(2,ii,1,3)=BUSHEIGHT+(ii-1)*BUSTHICK
	NBUS(2,ii,2,1)=NBUSLEFT+(NBUSWID-NBUSIN)/2+NBUSIN
	NBUS(2,ii,2,2)=BUSLOW+BUSSOLH
	NBUS(2,ii,2,3)=BUSHEIGHT+(ii-1)*BUSTHICK
	NBUS(2,ii,3,1)=NBUSLEFT+NBUSWID
	NBUS(2,ii,3,2)=BUSLOW+BUSSOLH+NBUSDH
	NBUS(2,ii,3,3)=BUSHEIGHT+(ii-1)*BUSTHICK
	NBUS(2,ii,4,1)=NBUSLEFT
	NBUS(2,ii,4,2)=BUSLOW+BUSSOLH+NBUSDH
	NBUS(2,ii,4,3)=BUSHEIGHT+(ii-1)*BUSTHICK
*ENDDO

*DO,ii,1,2,1
	NBUS(3,ii,1,1)=NBUSLEFT
	NBUS(3,ii,1,2)=BUSLOW+BUSSOLH+NBUSDH
	NBUS(3,ii,1,3)=BUSHEIGHT+(ii-1)*BUSTHICK
	NBUS(3,ii,2,1)=NBUSLEFT+NBUSWID
	NBUS(3,ii,2,2)=BUSLOW+BUSSOLH+NBUSDH
	NBUS(3,ii,2,3)=BUSHEIGHT+(ii-1)*BUSTHICK
	NBUS(3,ii,3,1)=NBUSLEFT+NBUSWID
	NBUS(3,ii,3,2)=BUSUP
	NBUS(3,ii,3,3)=BUSHEIGHT+(ii-1)*BUSTHICK
	NBUS(3,ii,4,1)=NBUSLEFT
	NBUS(3,ii,4,2)=BUSUP
	NBUS(3,ii,4,3)=BUSHEIGHT+(ii-1)*BUSTHICK
*ENDDO

*DO,ii,1,2,1
	PBUS(1,ii,1,1)=PBUSLEFT+PBUSWID-PBUSIN-(PBUSWID-PBUSIN)	!調整のためすべてのxに-(PBUSWID-PBUSIN)付記
	PBUS(1,ii,1,2)=BUSLOW
	PBUS(1,ii,1,3)=BUSHEIGHT+(ii-1)*BUSTHICK
	PBUS(1,ii,2,1)=PBUSLEFT+PBUSWID-PBUSIN+PBUSIN-(PBUSWID-PBUSIN)
	PBUS(1,ii,2,2)=BUSLOW
	PBUS(1,ii,2,3)=BUSHEIGHT+(ii-1)*BUSTHICK
	PBUS(1,ii,3,1)=PBUSLEFT+PBUSWID-PBUSIN+PBUSIN-(PBUSWID-PBUSIN)
	PBUS(1,ii,3,2)=BUSLOW+BUSSOLH
	PBUS(1,ii,3,3)=BUSHEIGHT+(ii-1)*BUSTHICK
	PBUS(1,ii,4,1)=PBUSLEFT+PBUSWID-PBUSIN-(PBUSWID-PBUSIN)
	PBUS(1,ii,4,2)=BUSLOW+BUSSOLH
	PBUS(1,ii,4,3)=BUSHEIGHT+(ii-1)*BUSTHICK
*ENDDO
*DO,ii,1,2,1
	PBUS(2,ii,1,1)=PBUSLEFT-(PBUSWID-PBUSIN)
	PBUS(2,ii,1,2)=BUSLOW+BUSSOLH
	PBUS(2,ii,1,3)=BUSHEIGHT+(ii-1)*BUSTHICK
	PBUS(2,ii,2,1)=PBUSLEFT+PBUSWID-(PBUSWID-PBUSIN)
	PBUS(2,ii,2,2)=BUSLOW+BUSSOLH
	PBUS(2,ii,2,3)=BUSHEIGHT+(ii-1)*BUSTHICK
	PBUS(2,ii,3,1)=PBUSLEFT+PBUSWID-(PBUSWID-PBUSIN)
	PBUS(2,ii,3,2)=BUSUP
	PBUS(2,ii,3,3)=BUSHEIGHT+(ii-1)*BUSTHICK
	PBUS(2,ii,4,1)=PBUSLEFT-(PBUSWID-PBUSIN)
	PBUS(2,ii,4,2)=BUSUP
	PBUS(2,ii,4,3)=BUSHEIGHT+(ii-1)*BUSTHICK
*ENDDO

*DO,ii,1,2,1
	DBUS(1,ii,1,1)=DBUSLEFT-(DBUSIN-DBUSWID)/2
	DBUS(1,ii,1,2)=DBUSUP-DBUSINH
	DBUS(1,ii,1,3)=BUSHEIGHT+(ii-1)*BUSTHICK
	DBUS(1,ii,2,1)=DBUSLEFT+DBUSIN-(DBUSIN-DBUSWID)/2
	DBUS(1,ii,2,2)=DBUSUP-DBUSINH
	DBUS(1,ii,2,3)=BUSHEIGHT+(ii-1)*BUSTHICK
	DBUS(1,ii,3,1)=DBUSLEFT+DBUSIN-(DBUSIN-DBUSWID)/2
	DBUS(1,ii,3,2)=DBUSUP
	DBUS(1,ii,3,3)=BUSHEIGHT+(ii-1)*BUSTHICK
	DBUS(1,ii,4,1)=DBUSLEFT-(DBUSIN-DBUSWID)/2
	DBUS(1,ii,4,2)=DBUSUP
	DBUS(1,ii,4,3)=BUSHEIGHT+(ii-1)*BUSTHICK
*ENDDO
*DO,ii,1,2,1
	DBUS(2,ii,1,1)=DBUSLEFT
	DBUS(2,ii,1,2)=DBUSLOW
	DBUS(2,ii,1,3)=BUSHEIGHT+(ii-1)*BUSTHICK
	DBUS(2,ii,2,1)=DBUSLEFT+DBUSWID
	DBUS(2,ii,2,2)=DBUSLOW
	DBUS(2,ii,2,3)=BUSHEIGHT+(ii-1)*BUSTHICK
	DBUS(2,ii,3,1)=DBUSLEFT+DBUSWID
	DBUS(2,ii,3,2)=DBUSUP-DBUSINH
	DBUS(2,ii,3,3)=BUSHEIGHT+(ii-1)*BUSTHICK
	DBUS(2,ii,4,1)=DBUSLEFT
	DBUS(2,ii,4,2)=DBUSUP-DBUSINH
	DBUS(2,ii,4,3)=BUSHEIGHT+(ii-1)*BUSTHICK
*ENDDO
!*GO,:OWARI
!---------RCIGBTの座標---------------------------------
*DO,kk,1,PARA,1
jj=NINT((kk)/2)
!mm=MOD(kk,2)	!1→mm=1  2→0  3→1  4→0
!nn=MOD(kk+1,2)	!1→nn=0  2→1  3→0  4→1
mm=MOD(kk+1,2)	!1→mm=0  2→1  3→0  4→1
nn=MOD(kk,2)	!1→nn=1  2→0  3→1  4→0
RCIGBT(1,kk,1,1,1)=RESIN_SIDE+ENGAWA+XOLSIDE_CHIP+(jj-1)*(IGBTX+PARACL)+PARAOFFSET*nn
RCIGBT(1,kk,1,1,2)=RESIN_UP+ENGAWA+YUSIDE_CHIP+(YLINE+LINECL)*2+mm*(IGBTY+YMID_CHIP)
RCIGBT(1,kk,1,1,3)=PLATEZ3+DBC_CERA_T+PLATEZ+DSOLT+PLATEZ2+DBC_CERA_T2
RCIGBT(1,kk,1,2,1)=RESIN_SIDE+ENGAWA+XOLSIDE_CHIP+IGBTX+(jj-1)*(IGBTX+PARACL)+PARAOFFSET*nn
RCIGBT(1,kk,1,2,2)=RESIN_UP+ENGAWA+YUSIDE_CHIP+(YLINE+LINECL)*2+mm*(IGBTY+YMID_CHIP)
RCIGBT(1,kk,1,2,3)=PLATEZ3+DBC_CERA_T+PLATEZ+DSOLT+PLATEZ2+DBC_CERA_T2
RCIGBT(1,kk,1,3,1)=RESIN_SIDE+ENGAWA+XOLSIDE_CHIP+IGBTX+(jj-1)*(IGBTX+PARACL)+PARAOFFSET*nn
RCIGBT(1,kk,1,3,2)=RESIN_UP+ENGAWA+YUSIDE_CHIP+IGBTY+(YLINE+LINECL)*2+mm*(IGBTY+YMID_CHIP)
RCIGBT(1,kk,1,3,3)=PLATEZ3+DBC_CERA_T+PLATEZ+DSOLT+PLATEZ2+DBC_CERA_T2
RCIGBT(1,kk,1,4,1)=RESIN_SIDE+ENGAWA+XOLSIDE_CHIP+(jj-1)*(IGBTX+PARACL)+PARAOFFSET*nn
RCIGBT(1,kk,1,4,2)=RESIN_UP+ENGAWA+YUSIDE_CHIP+IGBTY+(YLINE+LINECL)*2+mm*(IGBTY+YMID_CHIP)
RCIGBT(1,kk,1,4,3)=PLATEZ3+DBC_CERA_T+PLATEZ+DSOLT+PLATEZ2+DBC_CERA_T2
*DO,ii,1,4,1
	RCIGBT(1,kk,2,ii,1)=RCIGBT(1,kk,1,ii,1)
	RCIGBT(1,kk,2,ii,2)=RCIGBT(1,kk,1,ii,2)
	RCIGBT(1,kk,2,ii,3)=RCIGBT(1,kk,1,ii,3)+IGBTZ
*ENDDO
*ENDDO


*DO,kk,1,PARA,1
jj=NINT((kk)/2)
!mm=MOD(kk,2)	!1→mm=1  2→0  3→1  4→0
!nn=MOD(kk+1,2)	!1→nn=0  2→1  3→0  4→1
mm=MOD(kk+1,2)	!1→mm=0  2→1  3→0  4→1
nn=MOD(kk,2)	!1→nn=1  2→0  3→1  4→0
RCIGBT(2,kk,1,1,1)=RESIN_SIDE+ENGAWA+PLATEX-PPLATEX+XPLSIDE_CHIP+(jj-1)*(IGBTX+PARACL)+PARAOFFSET*nn
RCIGBT(2,kk,1,1,2)=RESIN_UP+ENGAWA+YUSIDE_CHIP+(YLINE+LINECL)*2+mm*(IGBTY+YMID_CHIP)
RCIGBT(2,kk,1,1,3)=PLATEZ3+DBC_CERA_T+PLATEZ+DSOLT+PLATEZ2+DBC_CERA_T2
RCIGBT(2,kk,1,2,1)=RESIN_SIDE+ENGAWA+PLATEX-PPLATEX+XPLSIDE_CHIP+IGBTX+(jj-1)*(IGBTX+PARACL)+PARAOFFSET*nn
RCIGBT(2,kk,1,2,2)=RESIN_UP+ENGAWA+YUSIDE_CHIP+(YLINE+LINECL)*2+mm*(IGBTY+YMID_CHIP)
RCIGBT(2,kk,1,2,3)=PLATEZ3+DBC_CERA_T+PLATEZ+DSOLT+PLATEZ2+DBC_CERA_T2
RCIGBT(2,kk,1,3,1)=RESIN_SIDE+ENGAWA+PLATEX-PPLATEX+XPLSIDE_CHIP+IGBTX+(jj-1)*(IGBTX+PARACL)+PARAOFFSET*nn
RCIGBT(2,kk,1,3,2)=RESIN_UP+ENGAWA+YUSIDE_CHIP+IGBTY+(YLINE+LINECL)*2+mm*(IGBTY+YMID_CHIP)
RCIGBT(2,kk,1,3,3)=PLATEZ3+DBC_CERA_T+PLATEZ+DSOLT+PLATEZ2+DBC_CERA_T2
RCIGBT(2,kk,1,4,1)=RESIN_SIDE+ENGAWA+PLATEX-PPLATEX+XPLSIDE_CHIP+(jj-1)*(IGBTX+PARACL)+PARAOFFSET*nn
RCIGBT(2,kk,1,4,2)=RESIN_UP+ENGAWA+YUSIDE_CHIP+IGBTY+(YLINE+LINECL)*2+mm*(IGBTY+YMID_CHIP)
RCIGBT(2,kk,1,4,3)=PLATEZ3+DBC_CERA_T+PLATEZ+DSOLT+PLATEZ2+DBC_CERA_T2
*DO,ii,1,4,1
	RCIGBT(2,kk,2,ii,1)=RCIGBT(2,kk,1,ii,1)
	RCIGBT(2,kk,2,ii,2)=RCIGBT(2,kk,1,ii,2)
	RCIGBT(2,kk,2,ii,3)=RCIGBT(2,kk,1,ii,3)+IGBTZ
*ENDDO
*ENDDO

!---------ダイはんだ----------------------------
*DO,kk,1,PARA,1
*DO,ii,1,2,1
	SOL1(ii,kk,1,1,1)=RCIGBT(ii,kk,1,1,1)-TAN50*DSOLT
	SOL1(ii,kk,1,1,2)=RCIGBT(ii,kk,1,1,2)-TAN50*DSOLT
	SOL1(ii,kk,1,1,3)=RCIGBT(ii,kk,1,1,3)-DSOLT
	SOL1(ii,kk,1,2,1)=RCIGBT(ii,kk,1,2,1)+TAN50*DSOLT
	SOL1(ii,kk,1,2,2)=RCIGBT(ii,kk,1,2,2)-TAN50*DSOLT
	SOL1(ii,kk,1,2,3)=RCIGBT(ii,kk,1,2,3)-DSOLT
	SOL1(ii,kk,1,3,1)=RCIGBT(ii,kk,1,3,1)+TAN50*DSOLT
	SOL1(ii,kk,1,3,2)=RCIGBT(ii,kk,1,3,2)+TAN50*DSOLT
	SOL1(ii,kk,1,3,3)=RCIGBT(ii,kk,1,3,3)-DSOLT
	SOL1(ii,kk,1,4,1)=RCIGBT(ii,kk,1,4,1)-TAN50*DSOLT
	SOL1(ii,kk,1,4,2)=RCIGBT(ii,kk,1,4,2)+TAN50*DSOLT
	SOL1(ii,kk,1,4,3)=RCIGBT(ii,kk,1,4,3)-DSOLT
	SOL1(ii,kk,2,1,1)=RCIGBT(ii,kk,1,1,1)
	SOL1(ii,kk,2,1,2)=RCIGBT(ii,kk,1,1,2)
	SOL1(ii,kk,2,1,3)=RCIGBT(ii,kk,1,1,3)
	SOL1(ii,kk,2,2,1)=RCIGBT(ii,kk,1,2,1)
	SOL1(ii,kk,2,2,2)=RCIGBT(ii,kk,1,2,2)
	SOL1(ii,kk,2,2,3)=RCIGBT(ii,kk,1,2,3)
	SOL1(ii,kk,2,3,1)=RCIGBT(ii,kk,1,3,1)
	SOL1(ii,kk,2,3,2)=RCIGBT(ii,kk,1,3,2)
	SOL1(ii,kk,2,3,3)=RCIGBT(ii,kk,1,3,3)
	SOL1(ii,kk,2,4,1)=RCIGBT(ii,kk,1,4,1)
	SOL1(ii,kk,2,4,2)=RCIGBT(ii,kk,1,4,2)
	SOL1(ii,kk,2,4,3)=RCIGBT(ii,kk,1,4,3)
*ENDDO
*ENDDO

!-------------スペーサ----------------------------
*SET,SPCDIF,0*MAG
*DO,kk,1,PARA,1
*DO,ii,1,2,1
	*DO,jj,1,2,1
		SPC(ii,kk,jj,1,1)=RCIGBT(ii,kk,2,1,1)+IGBT_LEFT_CL
		SPC(ii,kk,jj,1,2)=RCIGBT(ii,kk,2,1,2)+IGBT_LOW_CL+CL_PAD-0.25*MAG
		SPC(ii,kk,jj,1,3)=RCIGBT(ii,kk,2,1,3)+ESOLT+SPCZ*(jj-1)
		SPC(ii,kk,jj,2,1)=RCIGBT(ii,kk,2,1,1)+IGBT_LEFT_CL+ISPCX
		SPC(ii,kk,jj,2,2)=RCIGBT(ii,kk,2,1,2)+IGBT_LOW_CL+CL_PAD-0.25*MAG
		SPC(ii,kk,jj,2,3)=RCIGBT(ii,kk,2,1,3)+ESOLT+SPCZ*(jj-1)
		SPC(ii,kk,jj,3,1)=RCIGBT(ii,kk,2,1,1)+IGBT_LEFT_CL+ISPCX
		SPC(ii,kk,jj,3,2)=RCIGBT(ii,kk,2,1,2)+IGBT_LOW_CL+CL_PAD+ISPCY-0.25*MAG
		SPC(ii,kk,jj,3,3)=RCIGBT(ii,kk,2,1,3)+ESOLT+SPCZ*(jj-1)
		SPC(ii,kk,jj,4,1)=RCIGBT(ii,kk,2,1,1)+IGBT_LEFT_CL
		SPC(ii,kk,jj,4,2)=RCIGBT(ii,kk,2,1,2)+IGBT_LOW_CL+CL_PAD+ISPCY-0.25*MAG
		SPC(ii,kk,jj,4,3)=RCIGBT(ii,kk,2,1,3)+ESOLT+SPCZ*(jj-1)
	*ENDDO
*ENDDO
*ENDDO

*DO,kk,1,PARA,1
*DO,ii,1,2,1
		SPC(ii,kk,2,1,1)=SPC(ii,kk,2,1,1)-SPCDIF
		SPC(ii,kk,2,1,2)=SPC(ii,kk,2,1,2)-SPCDIF
		SPC(ii,kk,2,2,1)=SPC(ii,kk,2,2,1)+SPCDIF
		SPC(ii,kk,2,2,2)=SPC(ii,kk,2,2,2)-SPCDIF
		SPC(ii,kk,2,3,1)=SPC(ii,kk,2,3,1)+SPCDIF
		SPC(ii,kk,2,3,2)=SPC(ii,kk,2,3,2)+SPCDIF
		SPC(ii,kk,2,4,1)=SPC(ii,kk,2,4,1)-SPCDIF
		SPC(ii,kk,2,4,2)=SPC(ii,kk,2,4,2)+SPCDIF
*ENDDO
*ENDDO

!SUBSPC-----------------------------------------------------
*DIM,SUBSPC,ARR5,2,PARA,2,4,3
*DO,kk,1,PARA,1
*DO,ii,1,2,1
	*DO,jj,1,2,1
		SUBSPC(ii,kk,jj,1,1)=RCIGBT(ii,kk,2,1,1)+IGBT_LEFT_CL
		SUBSPC(ii,kk,jj,1,2)=RCIGBT(ii,kk,2,1,2)+IGBT_LOW_CL+CL_PAD-SUBSPCY-0.25*MAG
		SUBSPC(ii,kk,jj,1,3)=RCIGBT(ii,kk,2,1,3)+ESOLT+SPCZ*(jj-1)
		SUBSPC(ii,kk,jj,2,1)=RCIGBT(ii,kk,2,1,1)+IGBT_LEFT_CL+SUBSPCX
		SUBSPC(ii,kk,jj,2,2)=RCIGBT(ii,kk,2,1,2)+IGBT_LOW_CL+CL_PAD-SUBSPCY-0.25*MAG
		SUBSPC(ii,kk,jj,2,3)=RCIGBT(ii,kk,2,1,3)+ESOLT+SPCZ*(jj-1)
		SUBSPC(ii,kk,jj,3,1)=RCIGBT(ii,kk,2,1,1)+IGBT_LEFT_CL+SUBSPCX
		SUBSPC(ii,kk,jj,3,2)=RCIGBT(ii,kk,2,1,2)+IGBT_LOW_CL+CL_PAD-0.25*MAG
		SUBSPC(ii,kk,jj,3,3)=RCIGBT(ii,kk,2,1,3)+ESOLT+SPCZ*(jj-1)
		SUBSPC(ii,kk,jj,4,1)=RCIGBT(ii,kk,2,1,1)+IGBT_LEFT_CL
		SUBSPC(ii,kk,jj,4,2)=RCIGBT(ii,kk,2,1,2)+IGBT_LOW_CL+CL_PAD-0.25*MAG
		SUBSPC(ii,kk,jj,4,3)=RCIGBT(ii,kk,2,1,3)+ESOLT+SPCZ*(jj-1)
	*ENDDO
*ENDDO
*ENDDO

!----SUBSPCここまで-----------------------------


!MDSPC---上下中間のSPC----------------------------------------
*DIM,MDSPC,ARR5,2,PARA,2,4,3
!----20220303 MDSPC下面----------------------
*DO,kk,1,PARA,1
*DO,ii,1,2,1
	*DO,jj,1,1,1
		MDSPC(ii,kk,jj,1,1)=RCIGBT(ii,kk,2,1,1) +MDSPCZ
		MDSPC(ii,kk,jj,1,2)=RCIGBT(ii,kk,2,1,2)+IGBT_LOW_CL+CL_PAD-SUBSPCY-0.25*MAG
		MDSPC(ii,kk,jj,1,3)=RCIGBT(ii,kk,2,1,3)+ESOLT+SPCZ
		MDSPC(ii,kk,jj,2,1)=RCIGBT(ii,kk,2,1,1)+UPSPCX -MDSPCZ
		MDSPC(ii,kk,jj,2,2)=RCIGBT(ii,kk,2,1,2)+IGBT_LOW_CL+CL_PAD-SUBSPCY-0.25*MAG
		MDSPC(ii,kk,jj,2,3)=RCIGBT(ii,kk,2,1,3)+ESOLT+SPCZ
		MDSPC(ii,kk,jj,3,1)=RCIGBT(ii,kk,2,1,1)+UPSPCX -MDSPCZ
		MDSPC(ii,kk,jj,3,2)=RCIGBT(ii,kk,2,1,2)+IGBT_LOW_CL+CL_PAD-SUBSPCY+UPSPCY-MDSPCZ-0.25*MAG
		MDSPC(ii,kk,jj,3,3)=RCIGBT(ii,kk,2,1,3)+ESOLT+SPCZ
		MDSPC(ii,kk,jj,4,1)=RCIGBT(ii,kk,2,1,1) +MDSPCZ
		MDSPC(ii,kk,jj,4,2)=RCIGBT(ii,kk,2,1,2)+IGBT_LOW_CL+CL_PAD-SUBSPCY+UPSPCY-MDSPCZ-0.25*MAG
		MDSPC(ii,kk,jj,4,3)=RCIGBT(ii,kk,2,1,3)+ESOLT+SPCZ
	*ENDDO
*ENDDO
*ENDDO
*DO,kk,1,PARA,1
*DO,ii,1,2,1
	*DO,jj,2,2,1
		MDSPC(ii,kk,jj,1,1)=RCIGBT(ii,kk,2,1,1)
		MDSPC(ii,kk,jj,1,2)=RCIGBT(ii,kk,2,1,2)+IGBT_LOW_CL+CL_PAD-SUBSPCY-0.25*MAG
		MDSPC(ii,kk,jj,1,3)=RCIGBT(ii,kk,2,1,3)+ESOLT+SPCZ+MDSPCZ
		MDSPC(ii,kk,jj,2,1)=RCIGBT(ii,kk,2,1,1)+UPSPCX
		MDSPC(ii,kk,jj,2,2)=RCIGBT(ii,kk,2,1,2)+IGBT_LOW_CL+CL_PAD-SUBSPCY-0.25*MAG
		MDSPC(ii,kk,jj,2,3)=RCIGBT(ii,kk,2,1,3)+ESOLT+SPCZ+MDSPCZ
		MDSPC(ii,kk,jj,3,1)=RCIGBT(ii,kk,2,1,1)+UPSPCX
		MDSPC(ii,kk,jj,3,2)=RCIGBT(ii,kk,2,1,2)+IGBT_LOW_CL+CL_PAD-SUBSPCY+UPSPCY-0.25*MAG
		MDSPC(ii,kk,jj,3,3)=RCIGBT(ii,kk,2,1,3)+ESOLT+SPCZ+MDSPCZ
		MDSPC(ii,kk,jj,4,1)=RCIGBT(ii,kk,2,1,1)
		MDSPC(ii,kk,jj,4,2)=RCIGBT(ii,kk,2,1,2)+IGBT_LOW_CL+CL_PAD-SUBSPCY+UPSPCY-0.25*MAG
		MDSPC(ii,kk,jj,4,3)=RCIGBT(ii,kk,2,1,3)+ESOLT+SPCZ+MDSPCZ
	*ENDDO
*ENDDO
*ENDDO


!----20220303 MDSPC下面ここまで----------------------


!MDSPCここまで------------------------------------------------

!UPSPC-----------------------------------------------------
*DIM,UPSPC,ARR5,2,PARA,2,4,3
*DO,kk,1,PARA,1
*DO,ii,1,2,1
	*DO,jj,1,2,1
		UPSPC(ii,kk,jj,1,1)=RCIGBT(ii,kk,2,1,1) !+IGBT_LEFT_CL
		UPSPC(ii,kk,jj,1,2)=RCIGBT(ii,kk,2,1,2)+IGBT_LOW_CL+CL_PAD-SUBSPCY-0.25*MAG
		UPSPC(ii,kk,jj,1,3)=RCIGBT(ii,kk,2,1,3)+ESOLT+SPCZ+MDSPCZ+UPSPCZ*(jj-1)
		UPSPC(ii,kk,jj,2,1)=RCIGBT(ii,kk,2,1,1)+UPSPCX !+IGBT_LEFT_CL+SUBSPCX
		UPSPC(ii,kk,jj,2,2)=RCIGBT(ii,kk,2,1,2)+IGBT_LOW_CL+CL_PAD-SUBSPCY-0.25*MAG
		UPSPC(ii,kk,jj,2,3)=RCIGBT(ii,kk,2,1,3)+ESOLT+SPCZ+MDSPCZ+UPSPCZ*(jj-1)
		UPSPC(ii,kk,jj,3,1)=RCIGBT(ii,kk,2,1,1)+UPSPCX !+IGBT_LEFT_CL+SUBSPCX
		UPSPC(ii,kk,jj,3,2)=RCIGBT(ii,kk,2,1,2)+IGBT_LOW_CL+CL_PAD-SUBSPCY+UPSPCY-0.25*MAG
		UPSPC(ii,kk,jj,3,3)=RCIGBT(ii,kk,2,1,3)+ESOLT+SPCZ+MDSPCZ+UPSPCZ*(jj-1)
		UPSPC(ii,kk,jj,4,1)=RCIGBT(ii,kk,2,1,1) !+IGBT_LEFT_CL
		UPSPC(ii,kk,jj,4,2)=RCIGBT(ii,kk,2,1,2)+IGBT_LOW_CL+CL_PAD-SUBSPCY+UPSPCY-0.25*MAG
		UPSPC(ii,kk,jj,4,3)=RCIGBT(ii,kk,2,1,3)+ESOLT+SPCZ+MDSPCZ+UPSPCZ*(jj-1)
	*ENDDO
*ENDDO
*ENDDO


!----UPSPCここまで-----------------------------


!-------------エミッタはんだ---------------------
*DO,kk,1,PARA,1
*DO,ii,1,2,1
	SOL2(ii,kk,1,1,1)=SPC(ii,kk,1,1,1)-TAN50*ESOLT
	SOL2(ii,kk,1,1,2)=SUBSPC(ii,kk,1,3,2)-TAN50*ESOLT
	SOL2(ii,kk,1,1,3)=SPC(ii,kk,1,1,3)-ESOLT
	SOL2(ii,kk,2,1,1)=SPC(ii,kk,1,1,1)
	SOL2(ii,kk,2,1,2)=SUBSPC(ii,kk,1,3,2)
	SOL2(ii,kk,2,1,3)=SPC(ii,kk,1,1,3)
	SOL2(ii,kk,1,2,1)=SUBSPC(ii,kk,1,3,1)+TAN50*ESOLT
	SOL2(ii,kk,1,2,2)=SUBSPC(ii,kk,1,3,2)-TAN50*ESOLT
	SOL2(ii,kk,1,2,3)=SPC(ii,kk,1,2,3)-ESOLT
	SOL2(ii,kk,2,2,1)=SUBSPC(ii,kk,1,3,1)
	SOL2(ii,kk,2,2,2)=SUBSPC(ii,kk,1,3,2)
	SOL2(ii,kk,2,2,3)=SPC(ii,kk,1,2,3)
	SOL2(ii,kk,1,3,1)=SUBSPC(ii,kk,1,3,1)+TAN50*ESOLT
	SOL2(ii,kk,1,3,2)=SPC(ii,kk,1,3,2)+TAN50*ESOLT
	SOL2(ii,kk,1,3,3)=SPC(ii,kk,1,3,3)-ESOLT
	SOL2(ii,kk,2,3,1)=SUBSPC(ii,kk,1,3,1)
	SOL2(ii,kk,2,3,2)=SPC(ii,kk,1,3,2)
	SOL2(ii,kk,2,3,3)=SPC(ii,kk,1,3,3)
	SOL2(ii,kk,1,4,1)=SPC(ii,kk,1,4,1)-TAN50*ESOLT
	SOL2(ii,kk,1,4,2)=SPC(ii,kk,1,4,2)+TAN50*ESOLT
	SOL2(ii,kk,1,4,3)=SPC(ii,kk,1,4,3)-ESOLT
	SOL2(ii,kk,2,4,1)=SPC(ii,kk,1,4,1)
	SOL2(ii,kk,2,4,2)=SPC(ii,kk,1,4,2)
	SOL2(ii,kk,2,4,3)=SPC(ii,kk,1,4,3)
*ENDDO
*ENDDO
!-------スペーサはんだ--------------------------
*DO,kk,1,PARA,1
*DO,ii,1,2,1
	SOL3(ii,kk,1,1,1)=UPSPC(ii,kk,2,1,1)
	SOL3(ii,kk,1,1,2)=UPSPC(ii,kk,2,1,2)
	SOL3(ii,kk,1,1,3)=UPSPC(ii,kk,2,1,3)
	SOL3(ii,kk,2,1,1)=UPSPC(ii,kk,2,1,1)-TAN50*SPSOLT
	SOL3(ii,kk,2,1,2)=UPSPC(ii,kk,2,1,2)-TAN50*SPSOLT
	SOL3(ii,kk,2,1,3)=UPSPC(ii,kk,2,1,3)+SPSOLT
	SOL3(ii,kk,1,2,1)=UPSPC(ii,kk,2,2,1)
	SOL3(ii,kk,1,2,2)=UPSPC(ii,kk,2,2,2)
	SOL3(ii,kk,1,2,3)=UPSPC(ii,kk,2,2,3)
	SOL3(ii,kk,2,2,1)=UPSPC(ii,kk,2,2,1)+TAN50*SPSOLT
	SOL3(ii,kk,2,2,2)=UPSPC(ii,kk,2,2,2)-TAN50*SPSOLT
	SOL3(ii,kk,2,2,3)=UPSPC(ii,kk,2,2,3)+SPSOLT
	SOL3(ii,kk,1,3,1)=UPSPC(ii,kk,2,3,1)
	SOL3(ii,kk,1,3,2)=UPSPC(ii,kk,2,3,2)
	SOL3(ii,kk,1,3,3)=UPSPC(ii,kk,2,3,3)
	SOL3(ii,kk,2,3,1)=UPSPC(ii,kk,2,3,1)+TAN50*SPSOLT
	SOL3(ii,kk,2,3,2)=UPSPC(ii,kk,2,3,2)+TAN50*SPSOLT
	SOL3(ii,kk,2,3,3)=UPSPC(ii,kk,2,3,3)+SPSOLT
	SOL3(ii,kk,1,4,1)=UPSPC(ii,kk,2,4,1)
	SOL3(ii,kk,1,4,2)=UPSPC(ii,kk,2,4,2)
	SOL3(ii,kk,1,4,3)=UPSPC(ii,kk,2,4,3)
	SOL3(ii,kk,2,4,1)=UPSPC(ii,kk,2,4,1)-TAN50*SPSOLT
	SOL3(ii,kk,2,4,2)=UPSPC(ii,kk,2,4,2)+TAN50*SPSOLT
	SOL3(ii,kk,2,4,3)=UPSPC(ii,KK,2,4,3)+SPSOLT
*ENDDO
*ENDDO


!-------------エミッタはんだ---------------------
*DO,kk,1,PARA,1
*DO,ii,1,2,1
	SOL2B(ii,kk,1,1,1)=SUBSPC(ii,kk,1,1,1)-TAN50*ESOLT
	SOL2B(ii,kk,1,1,2)=SUBSPC(ii,kk,1,1,2)-TAN50*ESOLT
	SOL2B(ii,kk,1,1,3)=SUBSPC(ii,kk,1,1,3)-ESOLT
	SOL2B(ii,kk,2,1,1)=SUBSPC(ii,kk,1,1,1)
	SOL2B(ii,kk,2,1,2)=SUBSPC(ii,kk,1,1,2)
	SOL2B(ii,kk,2,1,3)=SUBSPC(ii,kk,1,1,3)
	SOL2B(ii,kk,1,2,1)=SUBSPC(ii,kk,1,2,1)+TAN50*ESOLT
	SOL2B(ii,kk,1,2,2)=SUBSPC(ii,kk,1,2,2)-TAN50*ESOLT
	SOL2B(ii,kk,1,2,3)=SUBSPC(ii,kk,1,2,3)-ESOLT
	SOL2B(ii,kk,2,2,1)=SUBSPC(ii,kk,1,2,1)
	SOL2B(ii,kk,2,2,2)=SUBSPC(ii,kk,1,2,2)
	SOL2B(ii,kk,2,2,3)=SUBSPC(ii,kk,1,2,3)
	SOL2B(ii,kk,1,3,1)=SUBSPC(ii,kk,1,3,1)+TAN50*ESOLT
	SOL2B(ii,kk,1,3,2)=SUBSPC(ii,kk,1,3,2)-TAN50*ESOLT
	SOL2B(ii,kk,1,3,3)=SUBSPC(ii,kk,1,3,3)-ESOLT
	SOL2B(ii,kk,2,3,1)=SUBSPC(ii,kk,1,3,1)
	SOL2B(ii,kk,2,3,2)=SUBSPC(ii,kk,1,3,2)
	SOL2B(ii,kk,2,3,3)=SUBSPC(ii,kk,1,3,3)
	SOL2B(ii,kk,1,4,1)=SUBSPC(ii,kk,1,4,1)-TAN50*ESOLT
	SOL2B(ii,kk,1,4,2)=SUBSPC(ii,kk,1,4,2)-TAN50*ESOLT
	SOL2B(ii,kk,1,4,3)=SUBSPC(ii,kk,1,4,3)-ESOLT
	SOL2B(ii,kk,2,4,1)=SUBSPC(ii,kk,1,4,1)
	SOL2B(ii,kk,2,4,2)=SUBSPC(ii,kk,1,4,2)
	SOL2B(ii,kk,2,4,3)=SUBSPC(ii,kk,1,4,3)
*ENDDO
*ENDDO

!-------------エミッタはんだ---------------------
*DO,kk,1,PARA,1
*DO,ii,1,2,1
	SOL2C(ii,kk,1,1,1)=SUBSPC(ii,kk,1,3,1)+TAN50*ESOLT
	SOL2C(ii,kk,1,1,2)=SUBSPC(ii,kk,1,3,2)-TAN50*ESOLT
	SOL2C(ii,kk,1,1,3)=SUBSPC(ii,kk,1,3,3)-ESOLT
	SOL2C(ii,kk,2,1,1)=SUBSPC(ii,kk,1,3,1)
	SOL2C(ii,kk,2,1,2)=SUBSPC(ii,kk,1,3,2)
	SOL2C(ii,kk,2,1,3)=SUBSPC(ii,kk,1,3,3)
	SOL2C(ii,kk,1,2,1)=SPC(ii,kk,1,2,1)+TAN50*ESOLT
	SOL2C(ii,kk,1,2,2)=SPC(ii,kk,1,2,2)-TAN50*ESOLT
	SOL2C(ii,kk,1,2,3)=SPC(ii,kk,1,2,3)-ESOLT
	SOL2C(ii,kk,2,2,1)=SPC(ii,kk,1,2,1)
	SOL2C(ii,kk,2,2,2)=SPC(ii,kk,1,2,2)
	SOL2C(ii,kk,2,2,3)=SPC(ii,kk,1,2,3)
	SOL2C(ii,kk,1,3,1)=SPC(ii,kk,1,3,1)+TAN50*ESOLT
	SOL2C(ii,kk,1,3,2)=SPC(ii,kk,1,3,2)+TAN50*ESOLT
	SOL2C(ii,kk,1,3,3)=SPC(ii,kk,1,3,3)-ESOLT
	SOL2C(ii,kk,2,3,1)=SPC(ii,kk,1,3,1)
	SOL2C(ii,kk,2,3,2)=SPC(ii,kk,1,3,2)
	SOL2C(ii,kk,2,3,3)=SPC(ii,kk,1,3,3)
	SOL2C(ii,kk,1,4,1)=SUBSPC(ii,kk,1,3,1)+TAN50*ESOLT
	SOL2C(ii,kk,1,4,2)=SPC(ii,kk,1,4,2)+TAN50*ESOLT
	SOL2C(ii,kk,1,4,3)=SPC(ii,kk,1,4,3)-ESOLT
	SOL2C(ii,kk,2,4,1)=SUBSPC(ii,kk,1,3,1)
	SOL2C(ii,kk,2,4,2)=SPC(ii,kk,1,4,2)
	SOL2C(ii,kk,2,4,3)=SPC(ii,kk,1,4,3)
*ENDDO
*ENDDO


!-----------P-O柱のはんだ-----------------------------------
*DO,ii,1,2,1
	*DO,jj,1,2,1
		SOL4(ii,jj,1,1)=OPLATE3(1,2,1)-(XPO-OPOLEX)/2-OPOLEX
		SOL4(ii,jj,1,2)=OPLATE3(1,2,2)+(PLATEY-NY-GROOVE-DBUSINH)/2-OPOLEY/2+DBUSINH
		SOL4(ii,jj,1,3)=OPLATE3(2,2,3)+(BSOLT+OPOLEZ)*(ii-1)+BSOLT*(jj-1)
		SOL4(ii,jj,2,1)=OPLATE3(1,2,1)-(XPO-OPOLEX)/2
		SOL4(ii,jj,2,2)=OPLATE3(1,2,2)+(PLATEY-NY-GROOVE-DBUSINH)/2-OPOLEY/2+DBUSINH
		SOL4(ii,jj,2,3)=OPLATE3(2,2,3)+(BSOLT+OPOLEZ)*(ii-1)+BSOLT*(jj-1)
		SOL4(ii,jj,3,1)=OPLATE3(1,2,1)-(XPO-OPOLEX)/2
		SOL4(ii,jj,3,2)=OPLATE3(1,2,2)+(PLATEY-NY-GROOVE-DBUSINH)/2+DBUSINH+OPOLEY/2
		SOL4(ii,jj,3,3)=OPLATE3(2,2,3)+(BSOLT+OPOLEZ)*(ii-1)+BSOLT*(jj-1)
		SOL4(ii,jj,4,1)=OPLATE3(1,2,1)-(XPO-OPOLEX)/2-OPOLEX
		SOL4(ii,jj,4,2)=OPLATE3(1,2,2)+(PLATEY-NY-GROOVE-DBUSINH)/2+DBUSINH+OPOLEY/2
		SOL4(ii,jj,4,3)=OPLATE3(2,2,3)+(BSOLT+OPOLEZ)*(ii-1)+BSOLT*(jj-1)
	*ENDDO
*ENDDO

*DO,ii,1,2,1
	mm=2-MOD(ii+1,2)
	*DO,jj,1,4,1
		*DO,kk,1,3,1
			OPOLE(ii,jj,kk)=SOL4(ii,mm,jj,kk)
		*ENDDO
	*ENDDO
*ENDDO
!-----------N-N柱のはんだ-----------------------------------
*DO,ii,1,2,1
	*DO,jj,1,2,1
		SOL5(ii,jj,1,1)=NPLATE1(1,1,1)+(NX-NPOLEX)/2
		SOL5(ii,jj,1,2)=NPLATE1(1,1,2)+(NY-NPOLEY)/2
		SOL5(ii,jj,1,3)=NPLATE1(2,1,3)+(BSOLT+NPOLEZ)*(ii-1)+BSOLT*(jj-1)
		SOL5(ii,jj,2,1)=NPLATE1(1,1,1)+(NX-NPOLEX)/2+NPOLEX
		SOL5(ii,jj,2,2)=NPLATE1(1,2,2)+(NY-NPOLEY)/2
		SOL5(ii,jj,2,3)=NPLATE1(2,2,3)+(BSOLT+NPOLEZ)*(ii-1)+BSOLT*(jj-1)
		SOL5(ii,jj,3,1)=NPLATE1(1,1,1)+(NX-NPOLEX)/2+NPOLEX
		SOL5(ii,jj,3,2)=NPLATE1(1,2,2)+(NY-NPOLEY)/2+NPOLEY
		SOL5(ii,jj,3,3)=NPLATE1(2,2,3)+(BSOLT+NPOLEZ)*(ii-1)+BSOLT*(jj-1)
		SOL5(ii,jj,4,1)=NPLATE1(1,1,1)+(NX-NPOLEX)/2
		SOL5(ii,jj,4,2)=NPLATE1(1,2,2)+(NY-NPOLEY)/2+NPOLEY
		SOL5(ii,jj,4,3)=NPLATE1(2,2,3)+(BSOLT+NPOLEZ)*(ii-1)+BSOLT*(jj-1)
	*ENDDO
*ENDDO
!モデルの都合上柱のx位置を揃える---------------------------------
!これはいったｎ保留

!以下N柱作成
!*DO,ii,1,2,1
!	*DO,jj,1,2,1


*DO,ii,1,2,1
	mm=2-MOD(ii+1,2)
	*DO,jj,1,4,1
		*DO,kk,1,3,1
			NPOLE(ii,jj,kk)=SOL5(ii,mm,jj,kk)
		*ENDDO
	*ENDDO
*ENDDO

!----------BUSのはんだ------------------------------------------
*DO,ii,1,2,1
	*DO,jj,1,4,1
		SOL6(1,ii,jj,1)=OBUS(1,1,jj,1)
		SOL6(1,ii,jj,2)=OBUS(1,1,jj,2)
		SOL6(1,ii,jj,3)=OBUS(1,1,jj,3)-BSOLT+(ii-1)*BSOLT
	*ENDDO
*ENDDO

*DO,ii,1,2,1
	*DO,jj,1,4,1
		SOL6(2,ii,jj,1)=NBUS(1,1,jj,1)
		SOL6(2,ii,jj,2)=NBUS(1,1,jj,2)
		SOL6(2,ii,jj,3)=NBUS(1,1,jj,3)-BSOLT+(ii-1)*BSOLT
	*ENDDO
*ENDDO

*DO,ii,1,2,1
	*DO,jj,1,4,1
		SOL6(3,ii,jj,1)=PBUS(1,1,jj,1)
		SOL6(3,ii,jj,2)=PBUS(1,1,jj,2)
		SOL6(3,ii,jj,3)=PBUS(1,1,jj,3)-BSOLT+(ii-1)*BSOLT
	*ENDDO
*ENDDO

*DO,ii,1,2,1
	*DO,jj,1,4,1
		SOL6(4,ii,jj,1)=DBUS(1,1,jj,1)
		SOL6(4,ii,jj,2)=DBUS(1,1,jj,2)
		SOL6(4,ii,jj,3)=DBUS(1,1,jj,3)-BSOLT+(ii-1)*BSOLT
	*ENDDO
*ENDDO

!*GO,:OWARI
!まずは、チップ周辺の樹脂を作成する
!*DIM,RESINCOR,ARR5,2,4,2,4,3		!ｺﾚｸﾀ側だよ P or N ,1～4辺,
*DO,ii,1,2,1
	*DO,jj,1,PARA,1
	kk=(ii-1)*PARA+jj
	RESINCOR(kk,1,1,1,1)=SOL1(ii,jj,2,1,1)-FINERESINCOR
	RESINCOR(kk,1,1,1,2)=SOL1(ii,jj,2,1,2)-FINERESINCOR
	RESINCOR(kk,1,1,1,3)=SOL1(ii,jj,1,1,3)
	RESINCOR(kk,1,1,2,1)=SOL1(ii,jj,2,2,1)+FINERESINCOR
	RESINCOR(kk,1,1,2,2)=SOL1(ii,jj,2,2,2)-FINERESINCOR
	RESINCOR(kk,1,1,2,3)=SOL1(ii,jj,1,2,3)
	RESINCOR(kk,1,1,3,1)=SOL1(ii,jj,1,2,1)
	RESINCOR(kk,1,1,3,2)=SOL1(ii,jj,1,2,2)
	RESINCOR(kk,1,1,3,3)=SOL1(ii,jj,1,2,3)
	RESINCOR(kk,1,1,4,1)=SOL1(ii,jj,1,1,1)
	RESINCOR(kk,1,1,4,2)=SOL1(ii,jj,1,1,2)
	RESINCOR(kk,1,1,4,3)=SOL1(ii,jj,1,1,3)
	RESINCOR(kk,1,2,1,1)=SOL1(ii,jj,2,1,1)-FINERESINCOR
	RESINCOR(kk,1,2,1,2)=SOL1(ii,jj,2,1,2)-FINERESINCOR
	RESINCOR(kk,1,2,1,3)=SOL1(ii,jj,2,1,3)
	RESINCOR(kk,1,2,2,1)=SOL1(ii,jj,2,2,1)+FINERESINCOR
	RESINCOR(kk,1,2,2,2)=SOL1(ii,jj,2,2,2)-FINERESINCOR
	RESINCOR(kk,1,2,2,3)=SOL1(ii,jj,2,2,3)
	RESINCOR(kk,1,2,3,1)=SOL1(ii,jj,2,2,1)
	RESINCOR(kk,1,2,3,2)=SOL1(ii,jj,2,2,2)
	RESINCOR(kk,1,2,3,3)=SOL1(ii,jj,2,2,3)
	RESINCOR(kk,1,2,4,1)=SOL1(ii,jj,2,1,1)
	RESINCOR(kk,1,2,4,2)=SOL1(ii,jj,2,1,2)
	RESINCOR(kk,1,2,4,3)=SOL1(ii,jj,2,1,3)

	RESINCOR(kk,2,1,1,1)=SOL1(ii,jj,1,2,1)
	RESINCOR(kk,2,1,1,2)=SOL1(ii,jj,1,2,2)
	RESINCOR(kk,2,1,1,3)=SOL1(ii,jj,1,2,3)
	RESINCOR(kk,2,1,2,1)=SOL1(ii,jj,2,2,1)+FINERESINCOR
	RESINCOR(kk,2,1,2,2)=SOL1(ii,jj,2,2,2)-FINERESINCOR
	RESINCOR(kk,2,1,2,3)=SOL1(ii,jj,1,2,3)
	RESINCOR(kk,2,1,3,1)=SOL1(ii,jj,2,3,1)+FINERESINCOR
	RESINCOR(kk,2,1,3,2)=SOL1(ii,jj,2,3,2)+FINERESINCOR
	RESINCOR(kk,2,1,3,3)=SOL1(ii,jj,1,3,3)
	RESINCOR(kk,2,1,4,1)=SOL1(ii,jj,1,3,1)
	RESINCOR(kk,2,1,4,2)=SOL1(ii,jj,1,3,2)
	RESINCOR(kk,2,1,4,3)=SOL1(ii,jj,1,3,3)
	RESINCOR(kk,2,2,1,1)=SOL1(ii,jj,2,2,1)
	RESINCOR(kk,2,2,1,2)=SOL1(ii,jj,2,2,2)
	RESINCOR(kk,2,2,1,3)=SOL1(ii,jj,2,2,3)
	RESINCOR(kk,2,2,2,1)=SOL1(ii,jj,2,2,1)+FINERESINCOR
	RESINCOR(kk,2,2,2,2)=SOL1(ii,jj,2,2,2)-FINERESINCOR
	RESINCOR(kk,2,2,2,3)=SOL1(ii,jj,2,2,3)
	RESINCOR(kk,2,2,3,1)=SOL1(ii,jj,2,3,1)+FINERESINCOR
	RESINCOR(kk,2,2,3,2)=SOL1(ii,jj,2,3,2)+FINERESINCOR
	RESINCOR(kk,2,2,3,3)=SOL1(ii,jj,2,3,3)
	RESINCOR(kk,2,2,4,1)=SOL1(ii,jj,2,3,1)
	RESINCOR(kk,2,2,4,2)=SOL1(ii,jj,2,3,2)
	RESINCOR(kk,2,2,4,3)=SOL1(ii,jj,2,3,3)

	RESINCOR(kk,3,1,1,1)=SOL1(ii,jj,1,4,1)
	RESINCOR(kk,3,1,1,2)=SOL1(ii,jj,1,4,2)
	RESINCOR(kk,3,1,1,3)=SOL1(ii,jj,1,4,3)
	RESINCOR(kk,3,1,2,1)=SOL1(ii,jj,1,3,1)
	RESINCOR(kk,3,1,2,2)=SOL1(ii,jj,1,3,2)
	RESINCOR(kk,3,1,2,3)=SOL1(ii,jj,1,3,3)
	RESINCOR(kk,3,1,3,1)=SOL1(ii,jj,2,3,1)+FINERESINCOR
	RESINCOR(kk,3,1,3,2)=SOL1(ii,jj,2,3,2)+FINERESINCOR
	RESINCOR(kk,3,1,3,3)=SOL1(ii,jj,1,3,3)
	RESINCOR(kk,3,1,4,1)=SOL1(ii,jj,2,4,1)-FINERESINCOR
	RESINCOR(kk,3,1,4,2)=SOL1(ii,jj,2,4,2)+FINERESINCOR
	RESINCOR(kk,3,1,4,3)=SOL1(ii,jj,1,4,3)
	RESINCOR(kk,3,2,1,1)=SOL1(ii,jj,2,4,1)
	RESINCOR(kk,3,2,1,2)=SOL1(ii,jj,2,4,2)
	RESINCOR(kk,3,2,1,3)=SOL1(ii,jj,2,4,3)
	RESINCOR(kk,3,2,2,1)=SOL1(ii,jj,2,3,1)
	RESINCOR(kk,3,2,2,2)=SOL1(ii,jj,2,3,2)
	RESINCOR(kk,3,2,2,3)=SOL1(ii,jj,2,3,3)
	RESINCOR(kk,3,2,3,1)=SOL1(ii,jj,2,3,1)+FINERESINCOR
	RESINCOR(kk,3,2,3,2)=SOL1(ii,jj,2,3,2)+FINERESINCOR
	RESINCOR(kk,3,2,3,3)=SOL1(ii,jj,2,3,3)
	RESINCOR(kk,3,2,4,1)=SOL1(ii,jj,2,4,1)-FINERESINCOR
	RESINCOR(kk,3,2,4,2)=SOL1(ii,jj,2,4,2)+FINERESINCOR
	RESINCOR(kk,3,2,4,3)=SOL1(ii,jj,2,4,3)

	RESINCOR(kk,4,1,1,1)=SOL1(ii,jj,2,1,1)-FINERESINCOR
	RESINCOR(kk,4,1,1,2)=SOL1(ii,jj,2,1,2)-FINERESINCOR
	RESINCOR(kk,4,1,1,3)=SOL1(ii,jj,1,1,3)
	RESINCOR(kk,4,1,2,1)=SOL1(ii,jj,1,1,1)
	RESINCOR(kk,4,1,2,2)=SOL1(ii,jj,1,1,2)
	RESINCOR(kk,4,1,2,3)=SOL1(ii,jj,1,1,3)
	RESINCOR(kk,4,1,3,1)=SOL1(ii,jj,1,4,1)
	RESINCOR(kk,4,1,3,2)=SOL1(ii,jj,1,4,2)
	RESINCOR(kk,4,1,3,3)=SOL1(ii,jj,1,4,3)
	RESINCOR(kk,4,1,4,1)=SOL1(ii,jj,2,4,1)-FINERESINCOR
	RESINCOR(kk,4,1,4,2)=SOL1(ii,jj,2,4,2)+FINERESINCOR
	RESINCOR(kk,4,1,4,3)=SOL1(ii,jj,1,4,3)
	RESINCOR(kk,4,2,1,1)=SOL1(ii,jj,2,1,1)-FINERESINCOR
	RESINCOR(kk,4,2,1,2)=SOL1(ii,jj,2,1,2)-FINERESINCOR
	RESINCOR(kk,4,2,1,3)=SOL1(ii,jj,2,1,3)
	RESINCOR(kk,4,2,2,1)=SOL1(ii,jj,2,1,1)
	RESINCOR(kk,4,2,2,2)=SOL1(ii,jj,2,1,2)
	RESINCOR(kk,4,2,2,3)=SOL1(ii,jj,2,1,3)
	RESINCOR(kk,4,2,3,1)=SOL1(ii,jj,2,4,1)
	RESINCOR(kk,4,2,3,2)=SOL1(ii,jj,2,4,2)
	RESINCOR(kk,4,2,3,3)=SOL1(ii,jj,2,4,3)
	RESINCOR(kk,4,2,4,1)=SOL1(ii,jj,2,4,1)-FINERESINCOR
	RESINCOR(kk,4,2,4,2)=SOL1(ii,jj,2,4,2)+FINERESINCOR
	RESINCOR(kk,4,2,4,3)=SOL1(ii,jj,2,4,3)
	*ENDDO
*ENDDO


!ｼﾘｺﾝ側面の樹脂
!*DIM,RESINCORSI,ARR5,2,4,2,4,3		!ｺﾚｸﾀ側だよ PorN,1～4辺,
*DO,ii,1,PARA,1
	*DO,jj,1,2,1
	mm=(jj-1)*PARA+ii
		*do,kk,1,4,1
			*do,ll,1,4,1
				RESINCORSI(mm,kk,1,ll,1)=RESINCOR(mm,kk,2,ll,1)
				RESINCORSI(mm,kk,2,ll,1)=RESINCOR(mm,kk,2,ll,1)
				RESINCORSI(mm,kk,1,ll,2)=RESINCOR(mm,kk,2,ll,2)
				RESINCORSI(mm,kk,2,ll,2)=RESINCOR(mm,kk,2,ll,2)
				RESINCORSI(mm,kk,1,ll,3)=RESINCOR(mm,kk,2,ll,3)
				RESINCORSI(mm,kk,2,ll,3)=RESINCOR(mm,kk,2,ll,3)+IGBTZ	!ここではDI,IGBTの厚みをそろえているよ
			*enddo
		*enddo
	*enddo
*ENDDO


!チップ上のはんだ周辺の樹脂-----------------------------------------------
!*DIM,RESINEMI,ARR5,2,4,2,4,3		!ｴﾐｯﾀ側だよ  PorN,1～4辺,
*DO,ii,1,2,1
	*DO,jj,1,PARA,1
	kk=(ii-1)*PARA+jj
	RESINEMI(kk,1,1,1,1)=SOL2B(ii,jj,2,1,1)-FINERESINEMI
	RESINEMI(kk,1,1,1,2)=SOL2B(ii,jj,2,1,2)-FINERESINEMI
	RESINEMI(kk,1,1,1,3)=SOL2B(ii,jj,1,1,3)
	RESINEMI(kk,1,1,2,1)=SOL2B(ii,jj,2,2,1)+FINERESINEMI
	RESINEMI(kk,1,1,2,2)=SOL2B(ii,jj,2,2,2)-FINERESINEMI
	RESINEMI(kk,1,1,2,3)=SOL2B(ii,jj,1,2,3)
	RESINEMI(kk,1,1,3,1)=SOL2B(ii,jj,1,2,1)
	RESINEMI(kk,1,1,3,2)=SOL2B(ii,jj,1,2,2)
	RESINEMI(kk,1,1,3,3)=SOL2B(ii,jj,1,2,3)
	RESINEMI(kk,1,1,4,1)=SOL2B(ii,jj,1,1,1)
	RESINEMI(kk,1,1,4,2)=SOL2B(ii,jj,1,1,2)
	RESINEMI(kk,1,1,4,3)=SOL2B(ii,jj,1,1,3)
	RESINEMI(kk,1,2,1,1)=SOL2B(ii,jj,2,1,1)-FINERESINEMI
	RESINEMI(kk,1,2,1,2)=SOL2B(ii,jj,2,1,2)-FINERESINEMI
	RESINEMI(kk,1,2,1,3)=SOL2B(ii,jj,2,1,3)
	RESINEMI(kk,1,2,2,1)=SOL2B(ii,jj,2,2,1)+FINERESINEMI
	RESINEMI(kk,1,2,2,2)=SOL2B(ii,jj,2,2,2)-FINERESINEMI
	RESINEMI(kk,1,2,2,3)=SOL2B(ii,jj,2,2,3)
	RESINEMI(kk,1,2,3,1)=SOL2B(ii,jj,2,2,1)
	RESINEMI(kk,1,2,3,2)=SOL2B(ii,jj,2,2,2)
	RESINEMI(kk,1,2,3,3)=SOL2B(ii,jj,2,2,3)
	RESINEMI(kk,1,2,4,1)=SOL2B(ii,jj,2,1,1)
	RESINEMI(kk,1,2,4,2)=SOL2B(ii,jj,2,1,2)
	RESINEMI(kk,1,2,4,3)=SOL2B(ii,jj,2,1,3)

	RESINEMI(kk,2,1,1,1)=SOL2B(ii,jj,1,2,1)
	RESINEMI(kk,2,1,1,2)=SOL2B(ii,jj,1,2,2)
	RESINEMI(kk,2,1,1,3)=SOL2B(ii,jj,1,2,3)
	RESINEMI(kk,2,1,2,1)=SOL2B(ii,jj,2,2,1)+FINERESINEMI
	RESINEMI(kk,2,1,2,2)=SOL2B(ii,jj,2,2,2)-FINERESINEMI
	RESINEMI(kk,2,1,2,3)=SOL2B(ii,jj,1,2,3)
	RESINEMI(kk,2,1,3,1)=SOL2B(ii,jj,2,3,1)+FINERESINEMI
	RESINEMI(kk,2,1,3,2)=SOL2B(ii,jj,2,3,2)-FINERESINEMI
	RESINEMI(kk,2,1,3,3)=SOL2B(ii,jj,1,3,3)
	RESINEMI(kk,2,1,4,1)=SOL2B(ii,jj,1,3,1)
	RESINEMI(kk,2,1,4,2)=SOL2B(ii,jj,1,3,2)
	RESINEMI(kk,2,1,4,3)=SOL2B(ii,jj,1,3,3)
	RESINEMI(kk,2,2,1,1)=SOL2B(ii,jj,2,2,1)
	RESINEMI(kk,2,2,1,2)=SOL2B(ii,jj,2,2,2)
	RESINEMI(kk,2,2,1,3)=SOL2B(ii,jj,2,2,3)
	RESINEMI(kk,2,2,2,1)=SOL2B(ii,jj,2,2,1)+FINERESINEMI
	RESINEMI(kk,2,2,2,2)=SOL2B(ii,jj,2,2,2)-FINERESINEMI
	RESINEMI(kk,2,2,2,3)=SOL2B(ii,jj,2,2,3)
	RESINEMI(kk,2,2,3,1)=SOL2B(ii,jj,2,3,1)+FINERESINEMI
	RESINEMI(kk,2,2,3,2)=SOL2B(ii,jj,2,3,2)-FINERESINEMI
	RESINEMI(kk,2,2,3,3)=SOL2B(ii,jj,2,3,3)
	RESINEMI(kk,2,2,4,1)=SOL2B(ii,jj,2,3,1)
	RESINEMI(kk,2,2,4,2)=SOL2B(ii,jj,2,3,2)
	RESINEMI(kk,2,2,4,3)=SOL2B(ii,jj,2,3,3)

	RESINEMI(kk,3,1,1,1)=SOL2B(ii,jj,2,3,1)+FINERESINEMI
	RESINEMI(kk,3,1,1,2)=SOL2B(ii,jj,2,3,2)-FINERESINEMI
	RESINEMI(kk,3,1,1,3)=SOL2B(ii,jj,1,3,3)
	RESINEMI(kk,3,1,2,1)=SOL2C(ii,jj,2,2,1)+FINERESINEMI
	RESINEMI(kk,3,1,2,2)=SOL2C(ii,jj,2,2,2)-FINERESINEMI
	RESINEMI(kk,3,1,2,3)=SOL2C(ii,jj,1,2,3)
	RESINEMI(kk,3,1,3,1)=SOL2C(ii,jj,1,2,1)
	RESINEMI(kk,3,1,3,2)=SOL2C(ii,jj,1,2,2)
	RESINEMI(kk,3,1,3,3)=SOL2C(ii,jj,1,3,3)
	RESINEMI(kk,3,1,4,1)=SOL2B(ii,jj,1,3,1)
	RESINEMI(kk,3,1,4,2)=SOL2B(ii,jj,1,3,2)
	RESINEMI(kk,3,1,4,3)=SOL2B(ii,jj,1,3,3)
	RESINEMI(kk,3,2,1,1)=SOL2B(ii,jj,2,2,1)+FINERESINEMI
	RESINEMI(kk,3,2,1,2)=SOL2B(ii,jj,2,2,2)-FINERESINEMI
	RESINEMI(kk,3,2,1,3)=SOL2B(ii,jj,2,2,3)
	RESINEMI(kk,3,2,2,1)=SOL2C(ii,jj,2,2,1)+FINERESINEMI
	RESINEMI(kk,3,2,2,2)=SOL2C(ii,jj,2,2,2)-FINERESINEMI
	RESINEMI(kk,3,2,2,3)=SOL2C(ii,jj,2,2,3)
	RESINEMI(kk,3,2,3,1)=SOL2C(ii,jj,2,2,1)
	RESINEMI(kk,3,2,3,2)=SOL2C(ii,jj,2,2,2)
	RESINEMI(kk,3,2,3,3)=SOL2C(ii,jj,2,2,3)
	RESINEMI(kk,3,2,4,1)=SOL2B(ii,jj,2,3,1)
	RESINEMI(kk,3,2,4,2)=SOL2B(ii,jj,2,3,2)
	RESINEMI(kk,3,2,4,3)=SOL2B(ii,jj,2,3,3)

	RESINEMI(kk,4,1,1,1)=SOL2C(ii,jj,1,2,1)
	RESINEMI(kk,4,1,1,2)=SOL2C(ii,jj,1,2,2)
	RESINEMI(kk,4,1,1,3)=SOL2C(ii,jj,1,2,3)
	RESINEMI(kk,4,1,2,1)=SOL2C(ii,jj,2,2,1)+FINERESINEMI
	RESINEMI(kk,4,1,2,2)=SOL2C(ii,jj,2,2,2)-FINERESINEMI
	RESINEMI(kk,4,1,2,3)=SOL2C(ii,jj,1,2,3)
	RESINEMI(kk,4,1,3,1)=SOL2C(ii,jj,2,3,1)+FINERESINEMI
	RESINEMI(kk,4,1,3,2)=SOL2C(ii,jj,2,3,2)+FINERESINEMI
	RESINEMI(kk,4,1,3,3)=SOL2C(ii,jj,1,3,3)
	RESINEMI(kk,4,1,4,1)=SOL2C(ii,jj,1,3,1)
	RESINEMI(kk,4,1,4,2)=SOL2C(ii,jj,1,3,2)
	RESINEMI(kk,4,1,4,3)=SOL2C(ii,jj,1,3,3)
	RESINEMI(kk,4,2,1,1)=SOL2C(ii,jj,2,2,1)
	RESINEMI(kk,4,2,1,2)=SOL2C(ii,jj,2,2,2)
	RESINEMI(kk,4,2,1,3)=SOL2C(ii,jj,2,2,3)
	RESINEMI(kk,4,2,2,1)=SOL2C(ii,jj,2,2,1)+FINERESINEMI
	RESINEMI(kk,4,2,2,2)=SOL2C(ii,jj,2,2,2)-FINERESINEMI
	RESINEMI(kk,4,2,2,3)=SOL2C(ii,jj,2,2,3)
	RESINEMI(kk,4,2,3,1)=SOL2C(ii,jj,2,3,1)+FINERESINEMI
	RESINEMI(kk,4,2,3,2)=SOL2C(ii,jj,2,3,2)+FINERESINEMI
	RESINEMI(kk,4,2,3,3)=SOL2C(ii,jj,2,3,3)
	RESINEMI(kk,4,2,4,1)=SOL2C(ii,jj,2,3,1)
	RESINEMI(kk,4,2,4,2)=SOL2C(ii,jj,2,3,2)
	RESINEMI(kk,4,2,4,3)=SOL2C(ii,jj,2,3,3)

	RESINEMI(kk,5,1,1,1)=SOL2(ii,jj,1,4,1)
	RESINEMI(kk,5,1,1,2)=SOL2(ii,jj,1,4,2)
	RESINEMI(kk,5,1,1,3)=SOL2(ii,jj,1,4,3)
	RESINEMI(kk,5,1,2,1)=SOL2C(ii,jj,1,3,1)
	RESINEMI(kk,5,1,2,2)=SOL2C(ii,jj,1,3,2)
	RESINEMI(kk,5,1,2,3)=SOL2C(ii,jj,1,3,3)
	RESINEMI(kk,5,1,3,1)=SOL2C(ii,jj,2,3,1)+FINERESINEMI
	RESINEMI(kk,5,1,3,2)=SOL2C(ii,jj,2,3,2)+FINERESINEMI
	RESINEMI(kk,5,1,3,3)=SOL2C(ii,jj,1,3,3)
	RESINEMI(kk,5,1,4,1)=SOL2(ii,jj,2,4,1)-FINERESINEMI
	RESINEMI(kk,5,1,4,2)=SOL2(ii,jj,2,4,2)+FINERESINEMI
	RESINEMI(kk,5,1,4,3)=SOL2(ii,jj,1,4,3)
	RESINEMI(kk,5,2,1,1)=SOL2(ii,jj,2,4,1)
	RESINEMI(kk,5,2,1,2)=SOL2(ii,jj,2,4,2)
	RESINEMI(kk,5,2,1,3)=SOL2(ii,jj,2,4,3)
	RESINEMI(kk,5,2,2,1)=SOL2C(ii,jj,2,3,1)
	RESINEMI(kk,5,2,2,2)=SOL2C(ii,jj,2,3,2)
	RESINEMI(kk,5,2,2,3)=SOL2C(ii,jj,2,3,3)
	RESINEMI(kk,5,2,3,1)=SOL2C(ii,jj,2,3,1)+FINERESINEMI
	RESINEMI(kk,5,2,3,2)=SOL2C(ii,jj,2,3,2)+FINERESINEMI
	RESINEMI(kk,5,2,3,3)=SOL2C(ii,jj,2,3,3)
	RESINEMI(kk,5,2,4,1)=SOL2(ii,jj,2,4,1)-FINERESINEMI
	RESINEMI(kk,5,2,4,2)=SOL2(ii,jj,2,4,2)+FINERESINEMI
	RESINEMI(kk,5,2,4,3)=SOL2(ii,jj,2,4,3)

	RESINEMI(kk,6,1,1,1)=SOL2B(ii,jj,2,1,1)-FINERESINEMI
	RESINEMI(kk,6,1,1,2)=SOL2B(ii,jj,2,1,2)-FINERESINEMI
	RESINEMI(kk,6,1,1,3)=SOL2B(ii,jj,1,1,3)
	RESINEMI(kk,6,1,2,1)=SOL2B(ii,jj,1,1,1)
	RESINEMI(kk,6,1,2,2)=SOL2B(ii,jj,1,1,2)
	RESINEMI(kk,6,1,2,3)=SOL2B(ii,jj,1,1,3)
	RESINEMI(kk,6,1,3,1)=SOL2(ii,jj,1,4,1)
	RESINEMI(kk,6,1,3,2)=SOL2(ii,jj,1,4,2)
	RESINEMI(kk,6,1,3,3)=SOL2(ii,jj,1,4,3)
	RESINEMI(kk,6,1,4,1)=SOL2(ii,jj,2,4,1)-FINERESINEMI
	RESINEMI(kk,6,1,4,2)=SOL2(ii,jj,2,4,2)+FINERESINEMI
	RESINEMI(kk,6,1,4,3)=SOL2(ii,jj,1,4,3)
	RESINEMI(kk,6,2,1,1)=SOL2B(ii,jj,2,1,1)-FINERESINEMI
	RESINEMI(kk,6,2,1,2)=SOL2B(ii,jj,2,1,2)-FINERESINEMI
	RESINEMI(kk,6,2,1,3)=SOL2B(ii,jj,2,1,3)
	RESINEMI(kk,6,2,2,1)=SOL2B(ii,jj,2,1,1)
	RESINEMI(kk,6,2,2,2)=SOL2B(ii,jj,2,1,2)
	RESINEMI(kk,6,2,2,3)=SOL2B(ii,jj,2,1,3)
	RESINEMI(kk,6,2,3,1)=SOL2(ii,jj,2,4,1)
	RESINEMI(kk,6,2,3,2)=SOL2(ii,jj,2,4,2)
	RESINEMI(kk,6,2,3,3)=SOL2(ii,jj,2,4,3)
	RESINEMI(kk,6,2,4,1)=SOL2(ii,jj,2,4,1)-FINERESINEMI
	RESINEMI(kk,6,2,4,2)=SOL2(ii,jj,2,4,2)+FINERESINEMI
	RESINEMI(kk,6,2,4,3)=SOL2(ii,jj,2,4,3)
	*ENDDO
*ENDDO


!スペーサ側面の樹脂	異形部の垂直の壁に沿う樹脂 6個
!*DIM,RESINEMISP,ARR5,2,5,2,4,3		!ｴﾐｯﾀ側だよ  PorN,1～4辺,
*DO,ii,1,PARA,1
	*DO,jj,1,2,1
	mm=(jj-1)*PARA+ii
		*do,kk,1,6,1
			*do,ll,1,4,1
				RESINEMISP(mm,kk,1,ll,1)=RESINEMI(mm,kk,2,ll,1)
				RESINEMISP(mm,kk,2,ll,1)=RESINEMI(mm,kk,2,ll,1)
				RESINEMISP(mm,kk,1,ll,2)=RESINEMI(mm,kk,2,ll,2)
				RESINEMISP(mm,kk,2,ll,2)=RESINEMI(mm,kk,2,ll,2)
				RESINEMISP(mm,kk,1,ll,3)=RESINEMI(mm,kk,2,ll,3)
				RESINEMISP(mm,kk,2,ll,3)=RESINEMI(mm,kk,2,ll,3)+SPCZ	!ここではDI,IGBTの厚みをそろえているよ
			*enddo
		*enddo
	*enddo
*ENDDO
!2021DECここまで

!異形部のくぼみに入る樹脂
*DO,ii,1,PARA,1
	*DO,jj,1,2,1
	mm=(jj-1)*PARA+ii
				RESINEMIDENT(mm,1,1,1)=RESINEMI(mm,1,1,2,1)
				RESINEMIDENT(mm,2,1,1)=RESINEMI(mm,1,2,2,1)
				RESINEMIDENT(mm,1,1,2)=RESINEMI(mm,1,2,2,2)
				RESINEMIDENT(mm,2,1,2)=RESINEMI(mm,1,2,2,2)
				RESINEMIDENT(mm,1,1,3)=RESINEMI(mm,1,1,2,3)
				RESINEMIDENT(mm,2,1,3)=RESINEMI(mm,1,1,2,3)+ESOLT	!ここではDI,IGBTの厚みをそろえているよ

				RESINEMIDENT(mm,1,2,1)=RESINEMI(mm,3,2,2,1)
				RESINEMIDENT(mm,2,2,1)=RESINEMI(mm,3,2,2,1)
				RESINEMIDENT(mm,1,2,2)=RESINEMI(mm,1,2,2,2)
				RESINEMIDENT(mm,2,2,2)=RESINEMI(mm,1,2,2,2)
				RESINEMIDENT(mm,1,2,3)=RESINEMI(mm,1,1,2,3)
				RESINEMIDENT(mm,2,2,3)=RESINEMI(mm,1,1,2,3)+ESOLT	!ここではDI,IGBTの厚みをそろえているよ

				RESINEMIDENT(mm,1,3,1)=RESINEMI(mm,3,2,2,1)
				RESINEMIDENT(mm,2,3,1)=RESINEMI(mm,3,2,2,1)
				RESINEMIDENT(mm,1,3,2)=RESINEMI(mm,3,2,2,2)
				RESINEMIDENT(mm,2,3,2)=RESINEMI(mm,3,2,2,2)
				RESINEMIDENT(mm,1,3,3)=RESINEMI(mm,1,1,2,3)
				RESINEMIDENT(mm,2,3,3)=RESINEMI(mm,1,1,2,3)+ESOLT	!ここではDI,IGBTの厚みをそろえているよ

				RESINEMIDENT(mm,1,4,1)=RESINEMI(mm,3,2,1,1)
				RESINEMIDENT(mm,2,4,1)=RESINEMI(mm,3,2,1,1)
				RESINEMIDENT(mm,1,4,2)=RESINEMI(mm,3,2,1,2)
				RESINEMIDENT(mm,2,4,2)=RESINEMI(mm,3,2,1,2)
				RESINEMIDENT(mm,1,4,3)=RESINEMI(mm,1,1,2,3)
				RESINEMIDENT(mm,2,4,3)=RESINEMI(mm,1,1,2,3)+ESOLT	!ここではDI,IGBTの厚みをそろえているよ

	*enddo
*ENDDO

!段差の面取り部側面の樹脂 RESINEMICHAN  面取り幅はMDSPCZと同じ値
*DO,ii,1,PARA,1
	*DO,jj,1,2,1
	mm=(jj-1)*PARA+ii
!				RESINEMICHAN(mm,1,1,1,1)=MDSPC(jj,ii,2,1,1)-FINERESINCOR
!				RESINEMICHAN(mm,1,1,1,2)=MDSPC(jj,ii,2,1,2)-FINERESINCOR
!				RESINEMICHAN(mm,1,1,1,3)=MDSPC(jj,ii,1,1,3)
!				RESINEMICHAN(mm,1,1,2,1)=MDSPC(jj,ii,2,2,1)+FINERESINCOR
!				RESINEMICHAN(mm,1,1,2,2)=MDSPC(jj,ii,2,2,2)-FINERESINCOR
!				RESINEMICHAN(mm,1,1,2,3)=MDSPC(jj,ii,1,2,3)
				RESINEMICHAN(mm,1,1,1,1)=RESINEMISP(mm,1,1,1,1)
				RESINEMICHAN(mm,1,1,1,2)=RESINEMISP(mm,1,1,1,2)
				RESINEMICHAN(mm,1,1,1,3)=MDSPC(jj,ii,1,1,3)
				RESINEMICHAN(mm,1,1,2,1)=RESINEMIDENT(mm,1,2,1)
				RESINEMICHAN(mm,1,1,2,2)=RESINEMIDENT(mm,1,2,2)
				RESINEMICHAN(mm,1,1,2,3)=MDSPC(jj,ii,1,2,3)
				RESINEMICHAN(mm,1,1,3,1)=MDSPC(jj,ii,1,2,1)
				RESINEMICHAN(mm,1,1,3,2)=MDSPC(jj,ii,1,2,2)
				RESINEMICHAN(mm,1,1,3,3)=MDSPC(jj,ii,1,2,3)
				RESINEMICHAN(mm,1,1,4,1)=MDSPC(jj,ii,1,1,1)
				RESINEMICHAN(mm,1,1,4,2)=MDSPC(jj,ii,1,1,2)
				RESINEMICHAN(mm,1,1,4,3)=MDSPC(jj,ii,1,1,3)

!				RESINEMICHAN(mm,1,2,1,1)=MDSPC(jj,ii,2,1,1)-FINERESINCOR
!				RESINEMICHAN(mm,1,2,1,2)=MDSPC(jj,ii,2,1,2)-FINERESINCOR
!				RESINEMICHAN(mm,1,2,1,3)=MDSPC(jj,ii,1,1,3)+MDSPCZ
!				RESINEMICHAN(mm,1,2,2,1)=MDSPC(jj,ii,2,2,1)+FINERESINCOR
!				RESINEMICHAN(mm,1,2,2,2)=MDSPC(jj,ii,2,2,2)-FINERESINCOR
!				RESINEMICHAN(mm,1,2,2,3)=MDSPC(jj,ii,1,2,3)+MDSPCZ
				RESINEMICHAN(mm,1,2,1,1)=RESINEMISP(mm,1,1,1,1)
				RESINEMICHAN(mm,1,2,1,2)=RESINEMISP(mm,1,1,1,2)
				RESINEMICHAN(mm,1,2,1,3)=MDSPC(jj,ii,1,1,3)+MDSPCZ
				RESINEMICHAN(mm,1,2,2,1)=RESINEMIDENT(mm,1,2,1)
				RESINEMICHAN(mm,1,2,2,2)=RESINEMIDENT(mm,1,2,2)
				RESINEMICHAN(mm,1,2,2,3)=MDSPC(jj,ii,1,2,3)+MDSPCZ
				RESINEMICHAN(mm,1,2,3,1)=MDSPC(jj,ii,2,2,1)
				RESINEMICHAN(mm,1,2,3,2)=MDSPC(jj,ii,2,2,2)
				RESINEMICHAN(mm,1,2,3,3)=MDSPC(jj,ii,1,2,3)+MDSPCZ
				RESINEMICHAN(mm,1,2,4,1)=MDSPC(jj,ii,2,1,1)
				RESINEMICHAN(mm,1,2,4,2)=MDSPC(jj,ii,2,1,2)
				RESINEMICHAN(mm,1,2,4,3)=MDSPC(jj,ii,1,1,3)+MDSPCZ


				RESINEMICHAN(mm,2,1,1,1)=MDSPC(jj,ii,1,2,1)
				RESINEMICHAN(mm,2,1,1,2)=MDSPC(jj,ii,1,2,2)
				RESINEMICHAN(mm,2,1,1,3)=MDSPC(jj,ii,1,2,3)
!				RESINEMICHAN(mm,2,1,2,1)=MDSPC(jj,ii,2,2,1)+FINERESINCOR
!				RESINEMICHAN(mm,2,1,2,2)=MDSPC(jj,ii,2,2,2)-FINERESINCOR
!				RESINEMICHAN(mm,2,1,2,3)=MDSPC(jj,ii,1,2,3)
!				RESINEMICHAN(mm,2,1,3,1)=MDSPC(jj,ii,2,3,1)+FINERESINCOR
!				RESINEMICHAN(mm,2,1,3,2)=MDSPC(jj,ii,2,3,2)+FINERESINCOR
!				RESINEMICHAN(mm,2,1,3,3)=MDSPC(jj,ii,1,3,3)
				RESINEMICHAN(mm,2,1,2,1)=RESINEMIDENT(mm,1,2,1)
				RESINEMICHAN(mm,2,1,2,2)=RESINEMIDENT(mm,1,2,2)
				RESINEMICHAN(mm,2,1,2,3)=MDSPC(jj,ii,1,2,3)
				RESINEMICHAN(mm,2,1,3,1)=RESINEMISP(mm,4,1,3,1)
				RESINEMICHAN(mm,2,1,3,2)=RESINEMISP(mm,4,1,3,2)
				RESINEMICHAN(mm,2,1,3,3)=MDSPC(jj,ii,1,3,3)
				RESINEMICHAN(mm,2,1,4,1)=MDSPC(jj,ii,1,3,1)
				RESINEMICHAN(mm,2,1,4,2)=MDSPC(jj,ii,1,3,2)
				RESINEMICHAN(mm,2,1,4,3)=MDSPC(jj,ii,1,3,3)

				RESINEMICHAN(mm,2,2,1,1)=MDSPC(jj,ii,2,2,1)
				RESINEMICHAN(mm,2,2,1,2)=MDSPC(jj,ii,2,2,2)
				RESINEMICHAN(mm,2,2,1,3)=MDSPC(jj,ii,2,2,3)
!				RESINEMICHAN(mm,2,2,2,1)=MDSPC(jj,ii,2,2,1)+FINERESINCOR
!				RESINEMICHAN(mm,2,2,2,2)=MDSPC(jj,ii,2,2,2)-FINERESINCOR
!				RESINEMICHAN(mm,2,2,2,3)=MDSPC(jj,ii,2,2,3)
!				RESINEMICHAN(mm,2,2,3,2)=MDSPC(jj,ii,2,3,2)+FINERESINCOR
!				RESINEMICHAN(mm,2,2,3,1)=MDSPC(jj,ii,2,3,1)+FINERESINCOR
!				RESINEMICHAN(mm,2,2,3,3)=MDSPC(jj,ii,2,3,3)
				RESINEMICHAN(mm,2,2,2,1)=RESINEMIDENT(mm,1,2,1)
				RESINEMICHAN(mm,2,2,2,2)=RESINEMIDENT(mm,1,2,2)
				RESINEMICHAN(mm,2,2,2,3)=MDSPC(jj,ii,2,2,3)
				RESINEMICHAN(mm,2,2,3,1)=RESINEMISP(mm,4,1,3,1)
				RESINEMICHAN(mm,2,2,3,2)=RESINEMISP(mm,4,1,3,2)
				RESINEMICHAN(mm,2,2,3,3)=MDSPC(jj,ii,2,3,3)
				RESINEMICHAN(mm,2,2,4,1)=MDSPC(jj,ii,2,3,1)
				RESINEMICHAN(mm,2,2,4,2)=MDSPC(jj,ii,2,3,2)
				RESINEMICHAN(mm,2,2,4,3)=MDSPC(jj,ii,2,3,3)


				RESINEMICHAN(mm,3,1,1,1)=MDSPC(jj,ii,2,4,1)+MDSPCZ
				RESINEMICHAN(mm,3,1,1,2)=MDSPC(jj,ii,2,4,2)-MDSPCZ
				RESINEMICHAN(mm,3,1,1,3)=MDSPC(jj,ii,1,4,3)
				RESINEMICHAN(mm,3,1,2,1)=MDSPC(jj,ii,2,3,1)-MDSPCZ
				RESINEMICHAN(mm,3,1,2,2)=MDSPC(jj,ii,2,3,2)-MDSPCZ
				RESINEMICHAN(mm,3,1,2,3)=MDSPC(jj,ii,1,3,3)
!				RESINEMICHAN(mm,3,1,3,1)=MDSPC(jj,ii,2,3,1)+FINERESINCOR
!				RESINEMICHAN(mm,3,1,3,2)=MDSPC(jj,ii,2,3,2)+FINERESINCOR
!				RESINEMICHAN(mm,3,1,3,3)=MDSPC(jj,ii,1,3,3)
!				RESINEMICHAN(mm,3,1,4,1)=MDSPC(jj,ii,2,4,1)-FINERESINCOR
!				RESINEMICHAN(mm,3,1,4,2)=MDSPC(jj,ii,2,4,2)+FINERESINCOR
!				RESINEMICHAN(mm,3,1,4,3)=MDSPC(jj,ii,1,4,3)
				RESINEMICHAN(mm,3,1,3,1)=RESINEMISP(mm,5,1,3,1)
				RESINEMICHAN(mm,3,1,3,2)=RESINEMISP(mm,5,1,3,2)
				RESINEMICHAN(mm,3,1,3,3)=MDSPC(jj,ii,1,3,3)
				RESINEMICHAN(mm,3,1,4,1)=RESINEMISP(mm,5,1,4,1)
				RESINEMICHAN(mm,3,1,4,2)=RESINEMISP(mm,5,1,4,2)
				RESINEMICHAN(mm,3,1,4,3)=MDSPC(jj,ii,1,4,3)

				RESINEMICHAN(mm,3,2,1,1)=MDSPC(jj,ii,2,4,1)
				RESINEMICHAN(mm,3,2,1,2)=MDSPC(jj,ii,2,4,2)
				RESINEMICHAN(mm,3,2,1,3)=MDSPC(jj,ii,1,4,3)+MDSPCZ
				RESINEMICHAN(mm,3,2,2,1)=MDSPC(jj,ii,2,3,1)
				RESINEMICHAN(mm,3,2,2,2)=MDSPC(jj,ii,2,3,2)
				RESINEMICHAN(mm,3,2,2,3)=MDSPC(jj,ii,1,3,3)+MDSPCZ
!				RESINEMICHAN(mm,3,2,3,1)=MDSPC(jj,ii,2,3,1)+FINERESINCOR
!				RESINEMICHAN(mm,3,2,3,2)=MDSPC(jj,ii,2,3,2)+FINERESINCOR
!				RESINEMICHAN(mm,3,2,3,3)=MDSPC(jj,ii,1,3,3)+MDSPCZ
!				RESINEMICHAN(mm,3,2,4,1)=MDSPC(jj,ii,2,4,1)-FINERESINCOR
!				RESINEMICHAN(mm,3,2,4,2)=MDSPC(jj,ii,2,4,2)+FINERESINCOR
!				RESINEMICHAN(mm,3,2,4,3)=MDSPC(jj,ii,1,4,3)+MDSPCZ
				RESINEMICHAN(mm,3,2,3,1)=RESINEMISP(mm,5,1,3,1)
				RESINEMICHAN(mm,3,2,3,2)=RESINEMISP(mm,5,1,3,2)
				RESINEMICHAN(mm,3,2,3,3)=MDSPC(jj,ii,1,3,3)+MDSPCZ
				RESINEMICHAN(mm,3,2,4,1)=RESINEMISP(mm,5,1,4,1)
				RESINEMICHAN(mm,3,2,4,2)=RESINEMISP(mm,5,1,4,2)
				RESINEMICHAN(mm,3,2,4,3)=MDSPC(jj,ii,1,4,3)+MDSPCZ


!				RESINEMICHAN(mm,4,1,1,1)=MDSPC(jj,ii,2,1,1)-FINERESINCOR
!				RESINEMICHAN(mm,4,1,1,2)=MDSPC(jj,ii,2,1,2)-FINERESINCOR
!				RESINEMICHAN(mm,4,1,1,3)=MDSPC(jj,ii,1,1,3)
				RESINEMICHAN(mm,4,1,1,1)=RESINEMISP(mm,6,1,1,1)
				RESINEMICHAN(mm,4,1,1,2)=RESINEMISP(mm,6,1,1,2)
				RESINEMICHAN(mm,4,1,1,3)=MDSPC(jj,ii,1,1,3)
				RESINEMICHAN(mm,4,1,2,1)=MDSPC(jj,ii,1,1,1)
				RESINEMICHAN(mm,4,1,2,2)=MDSPC(jj,ii,1,1,2)
				RESINEMICHAN(mm,4,1,2,3)=MDSPC(jj,ii,1,1,3)
				RESINEMICHAN(mm,4,1,3,1)=MDSPC(jj,ii,1,4,1)
				RESINEMICHAN(mm,4,1,3,2)=MDSPC(jj,ii,1,4,2)
				RESINEMICHAN(mm,4,1,3,3)=MDSPC(jj,ii,1,4,3)
!				RESINEMICHAN(mm,4,1,4,1)=MDSPC(jj,ii,2,4,1)-FINERESINCOR
!				RESINEMICHAN(mm,4,1,4,2)=MDSPC(jj,ii,2,4,2)+FINERESINCOR
!				RESINEMICHAN(mm,4,1,4,3)=MDSPC(jj,ii,1,4,3)
				RESINEMICHAN(mm,4,1,4,1)=RESINEMISP(mm,6,1,4,1)
				RESINEMICHAN(mm,4,1,4,2)=RESINEMISP(mm,6,1,4,2)
				RESINEMICHAN(mm,4,1,4,3)=MDSPC(jj,ii,1,4,3)

!				RESINEMICHAN(mm,4,2,1,1)=MDSPC(jj,ii,2,1,1)-FINERESINCOR
!				RESINEMICHAN(mm,4,2,1,2)=MDSPC(jj,ii,2,1,2)-FINERESINCOR
!				RESINEMICHAN(mm,4,2,1,3)=MDSPC(jj,ii,2,1,3)
				RESINEMICHAN(mm,4,2,1,1)=RESINEMISP(mm,6,1,1,1)
				RESINEMICHAN(mm,4,2,1,2)=RESINEMISP(mm,6,1,1,2)
				RESINEMICHAN(mm,4,2,1,3)=MDSPC(jj,ii,2,1,3)
				RESINEMICHAN(mm,4,2,2,1)=MDSPC(jj,ii,2,1,1)
				RESINEMICHAN(mm,4,2,2,2)=MDSPC(jj,ii,2,1,2)
				RESINEMICHAN(mm,4,2,2,3)=MDSPC(jj,ii,2,1,3)
				RESINEMICHAN(mm,4,2,3,1)=MDSPC(jj,ii,2,4,1)
				RESINEMICHAN(mm,4,2,3,2)=MDSPC(jj,ii,2,4,2)
				RESINEMICHAN(mm,4,2,3,3)=MDSPC(jj,ii,2,4,3)
!				RESINEMICHAN(mm,4,2,4,1)=MDSPC(jj,ii,2,4,1)-FINERESINCOR
!				RESINEMICHAN(mm,4,2,4,2)=MDSPC(jj,ii,2,4,2)+FINERESINCOR
!				RESINEMICHAN(mm,4,2,4,3)=MDSPC(jj,ii,2,4,3)
				RESINEMICHAN(mm,4,2,4,1)=RESINEMISP(mm,6,1,4,1)
				RESINEMICHAN(mm,4,2,4,2)=RESINEMISP(mm,6,1,4,2)
				RESINEMICHAN(mm,4,2,4,3)=MDSPC(jj,ii,2,4,3)


	*enddo
*ENDDO


!段差の面取り部側面の樹脂 RESINEMISP2  UPSPCの側面
*DO,ii,1,PARA,1
	*DO,jj,1,2,1
	mm=(jj-1)*PARA+ii
				RESINEMISP2(mm,1,1,1,1)=UPSPC(jj,ii,2,1,1)-FINERESINCOR
				RESINEMISP2(mm,1,2,1,1)=UPSPC(jj,ii,2,1,1)-FINERESINCOR
				RESINEMISP2(mm,1,1,1,2)=UPSPC(jj,ii,2,1,2)-FINERESINCOR
				RESINEMISP2(mm,1,2,1,2)=UPSPC(jj,ii,2,1,2)-FINERESINCOR
				RESINEMISP2(mm,1,1,1,3)=UPSPC(jj,ii,1,1,3)
				RESINEMISP2(mm,1,2,1,3)=UPSPC(jj,ii,1,1,3)+UPSPCZ
				RESINEMISP2(mm,1,1,2,1)=UPSPC(jj,ii,2,2,1)+FINERESINCOR
				RESINEMISP2(mm,1,2,2,1)=UPSPC(jj,ii,2,2,1)+FINERESINCOR
				RESINEMISP2(mm,1,1,2,2)=UPSPC(jj,ii,2,2,2)-FINERESINCOR
				RESINEMISP2(mm,1,2,2,2)=UPSPC(jj,ii,2,2,2)-FINERESINCOR
				RESINEMISP2(mm,1,1,2,3)=UPSPC(jj,ii,1,2,3)
				RESINEMISP2(mm,1,2,2,3)=UPSPC(jj,ii,1,2,3)+UPSPCZ
				RESINEMISP2(mm,1,1,3,1)=UPSPC(jj,ii,2,2,1)
				RESINEMISP2(mm,1,2,3,1)=UPSPC(jj,ii,2,2,1)
				RESINEMISP2(mm,1,1,3,2)=UPSPC(jj,ii,2,2,2)
				RESINEMISP2(mm,1,2,3,2)=UPSPC(jj,ii,2,2,2)
				RESINEMISP2(mm,1,1,3,3)=UPSPC(jj,ii,1,2,3)
				RESINEMISP2(mm,1,2,3,3)=UPSPC(jj,ii,1,2,3)+UPSPCZ
				RESINEMISP2(mm,1,1,4,1)=UPSPC(jj,ii,2,1,1)
				RESINEMISP2(mm,1,2,4,1)=UPSPC(jj,ii,2,1,1)
				RESINEMISP2(mm,1,1,4,2)=UPSPC(jj,ii,2,1,2)
				RESINEMISP2(mm,1,2,4,2)=UPSPC(jj,ii,2,1,2)
				RESINEMISP2(mm,1,1,4,3)=UPSPC(jj,ii,1,1,3)
				RESINEMISP2(mm,1,2,4,3)=UPSPC(jj,ii,1,1,3)+UPSPCZ

				RESINEMISP2(mm,2,1,1,1)=UPSPC(jj,ii,2,2,1)
				RESINEMISP2(mm,2,2,1,1)=UPSPC(jj,ii,2,2,1)
				RESINEMISP2(mm,2,1,1,2)=UPSPC(jj,ii,2,2,2)
				RESINEMISP2(mm,2,2,1,2)=UPSPC(jj,ii,2,2,2)
				RESINEMISP2(mm,2,1,1,3)=UPSPC(jj,ii,1,2,3)
				RESINEMISP2(mm,2,2,1,3)=UPSPC(jj,ii,1,2,3)+UPSPCZ
				RESINEMISP2(mm,2,1,2,1)=UPSPC(jj,ii,2,2,1)+FINERESINCOR
				RESINEMISP2(mm,2,2,2,1)=UPSPC(jj,ii,2,2,1)+FINERESINCOR
				RESINEMISP2(mm,2,1,2,2)=UPSPC(jj,ii,2,2,2)-FINERESINCOR
				RESINEMISP2(mm,2,2,2,2)=UPSPC(jj,ii,2,2,2)-FINERESINCOR
				RESINEMISP2(mm,2,1,2,3)=UPSPC(jj,ii,1,2,3)
				RESINEMISP2(mm,2,2,2,3)=UPSPC(jj,ii,1,2,3)+UPSPCZ
				RESINEMISP2(mm,2,1,3,1)=UPSPC(jj,ii,2,3,1)+FINERESINCOR
				RESINEMISP2(mm,2,2,3,1)=UPSPC(jj,ii,2,3,1)+FINERESINCOR
				RESINEMISP2(mm,2,1,3,2)=UPSPC(jj,ii,2,3,2)+FINERESINCOR
				RESINEMISP2(mm,2,2,3,2)=UPSPC(jj,ii,2,3,2)+FINERESINCOR
				RESINEMISP2(mm,2,1,3,3)=UPSPC(jj,ii,1,3,3)
				RESINEMISP2(mm,2,2,3,3)=UPSPC(jj,ii,1,3,3)+UPSPCZ
				RESINEMISP2(mm,2,1,4,1)=UPSPC(jj,ii,2,3,1)
				RESINEMISP2(mm,2,2,4,1)=UPSPC(jj,ii,2,3,1)
				RESINEMISP2(mm,2,1,4,2)=UPSPC(jj,ii,2,3,2)
				RESINEMISP2(mm,2,2,4,2)=UPSPC(jj,ii,2,3,2)
				RESINEMISP2(mm,2,1,4,3)=UPSPC(jj,ii,1,3,3)
				RESINEMISP2(mm,2,2,4,3)=UPSPC(jj,ii,1,3,3)+UPSPCZ

				RESINEMISP2(mm,3,1,1,1)=UPSPC(jj,ii,2,4,1)
				RESINEMISP2(mm,3,2,1,1)=UPSPC(jj,ii,2,4,1)
				RESINEMISP2(mm,3,1,1,2)=UPSPC(jj,ii,2,4,2)
				RESINEMISP2(mm,3,2,1,2)=UPSPC(jj,ii,2,4,2)
				RESINEMISP2(mm,3,1,1,3)=UPSPC(jj,ii,1,4,3)
				RESINEMISP2(mm,3,2,1,3)=UPSPC(jj,ii,1,4,3)+UPSPCZ
				RESINEMISP2(mm,3,1,2,1)=UPSPC(jj,ii,2,3,1)
				RESINEMISP2(mm,3,2,2,1)=UPSPC(jj,ii,2,3,1)
				RESINEMISP2(mm,3,1,2,2)=UPSPC(jj,ii,2,3,2)
				RESINEMISP2(mm,3,2,2,2)=UPSPC(jj,ii,2,3,2)
				RESINEMISP2(mm,3,1,2,3)=UPSPC(jj,ii,1,3,3)
				RESINEMISP2(mm,3,2,2,3)=UPSPC(jj,ii,1,3,3)+UPSPCZ
				RESINEMISP2(mm,3,1,3,1)=UPSPC(jj,ii,2,3,1)+FINERESINCOR
				RESINEMISP2(mm,3,2,3,1)=UPSPC(jj,ii,2,3,1)+FINERESINCOR
				RESINEMISP2(mm,3,1,3,2)=UPSPC(jj,ii,2,3,2)+FINERESINCOR
				RESINEMISP2(mm,3,2,3,2)=UPSPC(jj,ii,2,3,2)+FINERESINCOR
				RESINEMISP2(mm,3,1,3,3)=UPSPC(jj,ii,1,3,3)
				RESINEMISP2(mm,3,2,3,3)=UPSPC(jj,ii,1,3,3)+UPSPCZ
				RESINEMISP2(mm,3,1,4,1)=UPSPC(jj,ii,2,4,1)-FINERESINCOR
				RESINEMISP2(mm,3,2,4,1)=UPSPC(jj,ii,2,4,1)-FINERESINCOR
				RESINEMISP2(mm,3,1,4,2)=UPSPC(jj,ii,2,4,2)+FINERESINCOR
				RESINEMISP2(mm,3,2,4,2)=UPSPC(jj,ii,2,4,2)+FINERESINCOR
				RESINEMISP2(mm,3,1,4,3)=UPSPC(jj,ii,1,4,3)
				RESINEMISP2(mm,3,2,4,3)=UPSPC(jj,ii,1,4,3)+UPSPCZ

				RESINEMISP2(mm,4,1,1,1)=UPSPC(jj,ii,2,1,1)-FINERESINCOR
				RESINEMISP2(mm,4,2,1,1)=UPSPC(jj,ii,2,1,1)-FINERESINCOR
				RESINEMISP2(mm,4,1,1,2)=UPSPC(jj,ii,2,1,2)
				RESINEMISP2(mm,4,2,1,2)=UPSPC(jj,ii,2,1,2)
				RESINEMISP2(mm,4,1,1,3)=UPSPC(jj,ii,1,1,3)
				RESINEMISP2(mm,4,2,1,3)=UPSPC(jj,ii,1,1,3)+UPSPCZ
				RESINEMISP2(mm,4,1,2,1)=UPSPC(jj,ii,2,1,1)
				RESINEMISP2(mm,4,2,2,1)=UPSPC(jj,ii,2,1,1)
				RESINEMISP2(mm,4,1,2,2)=UPSPC(jj,ii,2,1,2)
				RESINEMISP2(mm,4,2,2,2)=UPSPC(jj,ii,2,1,2)
				RESINEMISP2(mm,4,1,2,3)=UPSPC(jj,ii,1,1,3)
				RESINEMISP2(mm,4,2,2,3)=UPSPC(jj,ii,1,1,3)+UPSPCZ
				RESINEMISP2(mm,4,1,3,1)=UPSPC(jj,ii,2,4,1)
				RESINEMISP2(mm,4,2,3,1)=UPSPC(jj,ii,2,4,1)
				RESINEMISP2(mm,4,1,3,2)=UPSPC(jj,ii,2,4,2)
				RESINEMISP2(mm,4,2,3,2)=UPSPC(jj,ii,2,4,2)
				RESINEMISP2(mm,4,1,3,3)=UPSPC(jj,ii,1,4,3)
				RESINEMISP2(mm,4,2,3,3)=UPSPC(jj,ii,1,4,3)+UPSPCZ
				RESINEMISP2(mm,4,1,4,1)=UPSPC(jj,ii,2,4,1)-FINERESINCOR
				RESINEMISP2(mm,4,2,4,1)=UPSPC(jj,ii,2,4,1)-FINERESINCOR
				RESINEMISP2(mm,4,1,4,2)=UPSPC(jj,ii,2,4,2)+FINERESINCOR
				RESINEMISP2(mm,4,2,4,2)=UPSPC(jj,ii,2,4,2)+FINERESINCOR
				RESINEMISP2(mm,4,1,4,3)=UPSPC(jj,ii,1,4,3)
				RESINEMISP2(mm,4,2,4,3)=UPSPC(jj,ii,1,4,3)+UPSPCZ

	*enddo
*ENDDO


!段差の面取り部側面の樹脂 RESINEMISP3  SPC上側はんだの側面
*DO,ii,1,PARA,1
	*DO,jj,1,2,1
	mm=(jj-1)*PARA+ii
				RESINEMISP3(mm,1,1,1,1)=SOL3(jj,ii,1,1,1)-FINERESINCOR
				RESINEMISP3(mm,1,2,1,1)=SOL3(jj,ii,1,1,1)-FINERESINCOR
				RESINEMISP3(mm,1,1,1,2)=SOL3(jj,ii,1,1,2)-FINERESINCOR
				RESINEMISP3(mm,1,2,1,2)=SOL3(jj,ii,1,1,2)-FINERESINCOR
				RESINEMISP3(mm,1,1,1,3)=SOL3(jj,ii,1,1,3)
				RESINEMISP3(mm,1,2,1,3)=SOL3(jj,ii,2,1,3)
				RESINEMISP3(mm,1,1,2,1)=SOL3(jj,ii,1,2,1)+FINERESINCOR
				RESINEMISP3(mm,1,2,2,1)=SOL3(jj,ii,1,2,1)+FINERESINCOR
				RESINEMISP3(mm,1,1,2,2)=SOL3(jj,ii,1,2,2)-FINERESINCOR
				RESINEMISP3(mm,1,2,2,2)=SOL3(jj,ii,1,2,2)-FINERESINCOR
				RESINEMISP3(mm,1,1,2,3)=SOL3(jj,ii,1,2,3)
				RESINEMISP3(mm,1,2,2,3)=SOL3(jj,ii,2,2,3)
				RESINEMISP3(mm,1,1,3,1)=SOL3(jj,ii,1,2,1)
				RESINEMISP3(mm,1,2,3,1)=SOL3(jj,ii,2,2,1)
				RESINEMISP3(mm,1,1,3,2)=SOL3(jj,ii,1,2,2)
				RESINEMISP3(mm,1,2,3,2)=SOL3(jj,ii,2,2,2)
				RESINEMISP3(mm,1,1,3,3)=SOL3(jj,ii,1,2,3)
				RESINEMISP3(mm,1,2,3,3)=SOL3(jj,ii,2,2,3)
				RESINEMISP3(mm,1,1,4,1)=SOL3(jj,ii,1,1,1)
				RESINEMISP3(mm,1,2,4,1)=SOL3(jj,ii,2,1,1)
				RESINEMISP3(mm,1,1,4,2)=SOL3(jj,ii,1,1,2)
				RESINEMISP3(mm,1,2,4,2)=SOL3(jj,ii,2,1,2)
				RESINEMISP3(mm,1,1,4,3)=SOL3(jj,ii,1,1,3)
				RESINEMISP3(mm,1,2,4,3)=SOL3(jj,ii,2,1,3)

				RESINEMISP3(mm,2,1,1,1)=SOL3(jj,ii,1,2,1)
				RESINEMISP3(mm,2,2,1,1)=SOL3(jj,ii,2,2,1)
				RESINEMISP3(mm,2,1,1,2)=SOL3(jj,ii,1,2,2)
				RESINEMISP3(mm,2,2,1,2)=SOL3(jj,ii,2,2,2)
				RESINEMISP3(mm,2,1,1,3)=SOL3(jj,ii,1,2,3)
				RESINEMISP3(mm,2,2,1,3)=SOL3(jj,ii,2,2,3)
				RESINEMISP3(mm,2,1,2,1)=SOL3(jj,ii,1,2,1)+FINERESINCOR
				RESINEMISP3(mm,2,2,2,1)=SOL3(jj,ii,1,2,1)+FINERESINCOR
				RESINEMISP3(mm,2,1,2,2)=SOL3(jj,ii,1,2,2)-FINERESINCOR
				RESINEMISP3(mm,2,2,2,2)=SOL3(jj,ii,1,2,2)-FINERESINCOR
				RESINEMISP3(mm,2,1,2,3)=SOL3(jj,ii,1,2,3)
				RESINEMISP3(mm,2,2,2,3)=SOL3(jj,ii,2,2,3)
				RESINEMISP3(mm,2,1,3,1)=SOL3(jj,ii,1,3,1)+FINERESINCOR
				RESINEMISP3(mm,2,2,3,1)=SOL3(jj,ii,1,3,1)+FINERESINCOR
				RESINEMISP3(mm,2,1,3,2)=SOL3(jj,ii,1,3,2)+FINERESINCOR
				RESINEMISP3(mm,2,2,3,2)=SOL3(jj,ii,1,3,2)+FINERESINCOR
				RESINEMISP3(mm,2,1,3,3)=SOL3(jj,ii,1,3,3)
				RESINEMISP3(mm,2,2,3,3)=SOL3(jj,ii,2,3,3)
				RESINEMISP3(mm,2,1,4,1)=SOL3(jj,ii,1,3,1)
				RESINEMISP3(mm,2,2,4,1)=SOL3(jj,ii,2,3,1)
				RESINEMISP3(mm,2,1,4,2)=SOL3(jj,ii,1,3,2)
				RESINEMISP3(mm,2,2,4,2)=SOL3(jj,ii,2,3,2)
				RESINEMISP3(mm,2,1,4,3)=SOL3(jj,ii,1,3,3)
				RESINEMISP3(mm,2,2,4,3)=SOL3(jj,ii,2,3,3)

				RESINEMISP3(mm,3,1,1,1)=SOL3(jj,ii,1,4,1)
				RESINEMISP3(mm,3,2,1,1)=SOL3(jj,ii,2,4,1)
				RESINEMISP3(mm,3,1,1,2)=SOL3(jj,ii,1,4,2)
				RESINEMISP3(mm,3,2,1,2)=SOL3(jj,ii,2,4,2)
				RESINEMISP3(mm,3,1,1,3)=SOL3(jj,ii,1,4,3)
				RESINEMISP3(mm,3,2,1,3)=SOL3(jj,ii,2,4,3)
				RESINEMISP3(mm,3,1,2,1)=SOL3(jj,ii,1,3,1)
				RESINEMISP3(mm,3,2,2,1)=SOL3(jj,ii,2,3,1)
				RESINEMISP3(mm,3,1,2,2)=SOL3(jj,ii,1,3,2)
				RESINEMISP3(mm,3,2,2,2)=SOL3(jj,ii,2,3,2)
				RESINEMISP3(mm,3,1,2,3)=SOL3(jj,ii,1,3,3)
				RESINEMISP3(mm,3,2,2,3)=SOL3(jj,ii,2,3,3)
				RESINEMISP3(mm,3,1,3,1)=SOL3(jj,ii,1,3,1)+FINERESINCOR
				RESINEMISP3(mm,3,2,3,1)=SOL3(jj,ii,1,3,1)+FINERESINCOR
				RESINEMISP3(mm,3,1,3,2)=SOL3(jj,ii,1,3,2)+FINERESINCOR
				RESINEMISP3(mm,3,2,3,2)=SOL3(jj,ii,1,3,2)+FINERESINCOR
				RESINEMISP3(mm,3,1,3,3)=SOL3(jj,ii,1,3,3)
				RESINEMISP3(mm,3,2,3,3)=SOL3(jj,ii,2,3,3)
				RESINEMISP3(mm,3,1,4,1)=SOL3(jj,ii,1,4,1)-FINERESINCOR
				RESINEMISP3(mm,3,2,4,1)=SOL3(jj,ii,1,4,1)-FINERESINCOR
				RESINEMISP3(mm,3,1,4,2)=SOL3(jj,ii,1,4,2)+FINERESINCOR
				RESINEMISP3(mm,3,2,4,2)=SOL3(jj,ii,1,4,2)+FINERESINCOR
				RESINEMISP3(mm,3,1,4,3)=SOL3(jj,ii,1,4,3)
				RESINEMISP3(mm,3,2,4,3)=SOL3(jj,ii,2,4,3)

				RESINEMISP3(mm,4,1,1,1)=SOL3(jj,ii,1,1,1)-FINERESINCOR
				RESINEMISP3(mm,4,2,1,1)=SOL3(jj,ii,1,1,1)-FINERESINCOR
				RESINEMISP3(mm,4,1,1,2)=SOL3(jj,ii,1,1,2)-FINERESINCOR
				RESINEMISP3(mm,4,2,1,2)=SOL3(jj,ii,1,1,2)-FINERESINCOR
				RESINEMISP3(mm,4,1,1,3)=SOL3(jj,ii,1,1,3)
				RESINEMISP3(mm,4,2,1,3)=SOL3(jj,ii,2,1,3)
				RESINEMISP3(mm,4,1,2,1)=SOL3(jj,ii,1,1,1)
				RESINEMISP3(mm,4,2,2,1)=SOL3(jj,ii,2,1,1)
				RESINEMISP3(mm,4,1,2,2)=SOL3(jj,ii,1,1,2)
				RESINEMISP3(mm,4,2,2,2)=SOL3(jj,ii,2,1,2)
				RESINEMISP3(mm,4,1,2,3)=SOL3(jj,ii,1,1,3)
				RESINEMISP3(mm,4,2,2,3)=SOL3(jj,ii,2,1,3)
				RESINEMISP3(mm,4,1,3,1)=SOL3(jj,ii,1,4,1)
				RESINEMISP3(mm,4,2,3,1)=SOL3(jj,ii,2,4,1)
				RESINEMISP3(mm,4,1,3,2)=SOL3(jj,ii,1,4,2)
				RESINEMISP3(mm,4,2,3,2)=SOL3(jj,ii,2,4,2)
				RESINEMISP3(mm,4,1,3,3)=SOL3(jj,ii,1,4,3)
				RESINEMISP3(mm,4,2,3,3)=SOL3(jj,ii,2,4,3)
				RESINEMISP3(mm,4,1,4,1)=SOL3(jj,ii,1,4,1)-FINERESINCOR
				RESINEMISP3(mm,4,2,4,1)=SOL3(jj,ii,1,4,1)-FINERESINCOR
				RESINEMISP3(mm,4,1,4,2)=SOL3(jj,ii,1,4,2)+FINERESINCOR
				RESINEMISP3(mm,4,2,4,2)=SOL3(jj,ii,1,4,2)+FINERESINCOR
				RESINEMISP3(mm,4,1,4,3)=SOL3(jj,ii,1,4,3)
				RESINEMISP3(mm,4,2,4,3)=SOL3(jj,ii,2,4,3)

	*enddo
*ENDDO

!段差の面取り部側面の樹脂 RESINEMILAST  ゲートパッド上のはんだ
*DO,ii,1,PARA,1
	*DO,jj,1,2,1
	mm=(jj-1)*PARA+ii
				RESINEMILAST(mm,1,1,1)=RCIGBT(jj,ii,2,1,1)-FINERESINCOR
				RESINEMILAST(mm,2,1,1)=RCIGBT(jj,ii,2,1,1)-FINERESINCOR
				RESINEMILAST(mm,1,1,2)=RCIGBT(jj,ii,2,1,2)-FINERESINCOR
				RESINEMILAST(mm,2,1,2)=RCIGBT(jj,ii,2,1,2)-FINERESINCOR
				RESINEMILAST(mm,1,1,3)=RCIGBT(jj,ii,2,1,3)
				RESINEMILAST(mm,2,1,3)=SOL3(jj,ii,2,1,3)
				RESINEMILAST(mm,1,2,1)=RCIGBT(jj,ii,2,2,1)+FINERESINCOR
				RESINEMILAST(mm,2,2,1)=RCIGBT(jj,ii,2,2,1)+FINERESINCOR
				RESINEMILAST(mm,1,2,2)=RCIGBT(jj,ii,2,2,2)-FINERESINCOR
				RESINEMILAST(mm,2,2,2)=RCIGBT(jj,ii,2,2,2)-FINERESINCOR
				RESINEMILAST(mm,1,2,3)=RCIGBT(jj,ii,2,1,3)
				RESINEMILAST(mm,2,2,3)=SOL3(jj,ii,2,1,3)
				RESINEMILAST(mm,1,3,1)=RCIGBT(jj,ii,2,2,1)+FINERESINCOR
				RESINEMILAST(mm,2,3,1)=RCIGBT(jj,ii,2,2,1)+FINERESINCOR
				RESINEMILAST(mm,1,3,2)=RESINEMI(mm,1,2,2,2)
				RESINEMILAST(mm,2,3,2)=RESINEMI(mm,1,2,2,2)
				RESINEMILAST(mm,1,3,3)=RCIGBT(jj,ii,2,1,3)
				RESINEMILAST(mm,2,3,3)=SOL3(jj,ii,2,2,3)
				RESINEMILAST(mm,1,4,1)=RCIGBT(jj,ii,2,1,1)-FINERESINCOR
				RESINEMILAST(mm,2,4,1)=RCIGBT(jj,ii,2,1,1)-FINERESINCOR
				RESINEMILAST(mm,1,4,2)=RESINEMI(mm,1,2,2,2)
				RESINEMILAST(mm,2,4,2)=RESINEMI(mm,1,2,2,2)
				RESINEMILAST(mm,1,4,3)=RCIGBT(jj,ii,2,1,3)
				RESINEMILAST(mm,2,4,3)=SOL3(jj,ii,2,1,3)

	*enddo
*ENDDO


*DO,ii,1,2,1
*DO,jj,1,PARA-2,1
	RESINPARA(ii,jj,1,1,1)=RCIGBT(ii,jj,1,2,1)+FINERESINCOR
	RESINPARA(ii,jj,1,1,2)=RCIGBT(ii,jj,1,2,2)-FINERESINCOR
	RESINPARA(ii,jj,1,1,3)=OPLATE1(2,1,3)
	RESINPARA(ii,jj,1,2,1)=RCIGBT(ii,jj+2,1,1,1)-FINERESINCOR
	RESINPARA(ii,jj,1,2,2)=RCIGBT(ii,jj+2,1,1,2)-FINERESINCOR
	RESINPARA(ii,jj,1,2,3)=OPLATE1(2,1,3)
	RESINPARA(ii,jj,1,3,1)=RCIGBT(ii,jj+2,1,4,1)-FINERESINCOR
	RESINPARA(ii,jj,1,3,2)=RCIGBT(ii,jj+2,1,4,2)+FINERESINCOR
	RESINPARA(ii,jj,1,3,3)=OPLATE1(2,1,3)
	RESINPARA(ii,jj,1,4,1)=RCIGBT(ii,jj,1,3,1)+FINERESINCOR
	RESINPARA(ii,jj,1,4,2)=RCIGBT(ii,jj,1,3,2)+FINERESINCOR
	RESINPARA(ii,jj,1,4,3)=OPLATE1(2,1,3)
*ENDDO
*ENDDO

*DO,ii,1,2,1
*DO,jj,1,PARA-2,1
*DO,kk,1,4,1
	RESINPARA(ii,jj,2,kk,1)=RESINPARA(ii,jj,1,kk,1)
	RESINPARA(ii,jj,2,kk,2)=RESINPARA(ii,jj,1,kk,2)
	RESINPARA(ii,jj,2,kk,3)=OPLATE4(1,1,3)
*ENDDO
*ENDDO
*ENDDO

*DO,ii,1,2,1
	RESINMID(1,ii,1,1)=OPLATE1(1,1,1)
	RESINMID(1,ii,1,2)=RCIGBT(1,1,1,3,2)+FINERESINCOR
	RESINMID(1,ii,1,3)=OPLATE1(2,1,3)+(BSOLT*2+OPOLEZ)*(ii-1)
	RESINMID(1,ii,2,1)=OPOLE(1,1,1)
	RESINMID(1,ii,2,2)=RCIGBT(1,1,1,3,2)+FINERESINCOR
	RESINMID(1,ii,2,3)=OPLATE1(2,1,3)+(BSOLT*2+OPOLEZ)*(ii-1)
	RESINMID(1,ii,3,1)=OPOLE(1,1,1)
	RESINMID(1,ii,3,2)=RCIGBT(1,1,1,3,2)+YMID_CHIP-FINERESINCOR
	RESINMID(1,ii,3,3)=OPLATE1(2,1,3)+(BSOLT*2+OPOLEZ)*(ii-1)
	RESINMID(1,ii,4,1)=OPLATE1(1,1,1)
	RESINMID(1,ii,4,2)=RCIGBT(1,1,1,3,2)+YMID_CHIP-FINERESINCOR
	RESINMID(1,ii,4,3)=OPLATE1(2,1,3)+(BSOLT*2+OPOLEZ)*(ii-1)
*ENDDO

*DO,ii,1,2,1
	RESINMID(2,ii,1,1)=OPOLE(1,2,1)
	RESINMID(2,ii,1,2)=RCIGBT(2,1,1,3,2)+FINERESINCOR
	RESINMID(2,ii,1,3)=OPLATE1(2,1,3)+(BSOLT*2+OPOLEZ)*(ii-1)
	RESINMID(2,ii,2,1)=PPLATE2(1,2,1)
	RESINMID(2,ii,2,2)=RCIGBT(2,1,1,3,2)+FINERESINCOR
	RESINMID(2,ii,2,3)=OPLATE1(2,1,3)+(BSOLT*2+OPOLEZ)*(ii-1)
	RESINMID(2,ii,3,1)=PPLATE2(1,2,1)
	RESINMID(2,ii,3,2)=RCIGBT(2,1,1,3,2)+YMID_CHIP-FINERESINCOR
	RESINMID(2,ii,3,3)=OPLATE1(2,1,3)+(BSOLT*2+OPOLEZ)*(ii-1)
	RESINMID(2,ii,4,1)=OPOLE(1,2,1)
	RESINMID(2,ii,4,2)=RCIGBT(2,1,1,3,2)+YMID_CHIP-FINERESINCOR
	RESINMID(2,ii,4,3)=OPLATE1(2,1,3)+(BSOLT*2+OPOLEZ)*(ii-1)
*ENDDO

*DO,jj,1,2,1
*DO,ii,1,2,1	!RESINCHIPSIDEは今回は左したから右上に作っていく
	RESINCHIPSIDE(jj,ii,1,1)=OPLATE1(1,1,1)
	RESINCHIPSIDE(jj,ii,1,2)=RCIGBT(1,jj,1,1,2)-FINERESINCOR
	RESINCHIPSIDE(jj,ii,1,3)=OPLATE1(2,1,3)+(BSOLT*2+OPOLEZ)*(ii-1)

	RESINCHIPSIDE(jj,ii,2,1)=RCIGBT(1,jj,1,1,1)-FINERESINCOR
	RESINCHIPSIDE(jj,ii,2,2)=RCIGBT(1,jj,1,1,2)-FINERESINCOR
	RESINCHIPSIDE(jj,ii,2,3)=OPLATE1(2,1,3)+(BSOLT*2+OPOLEZ)*(ii-1)

	RESINCHIPSIDE(jj,ii,3,1)=RCIGBT(1,jj,1,1,1)-FINERESINCOR
	RESINCHIPSIDE(jj,ii,3,2)=RCIGBT(1,jj,1,4,2)+FINERESINCOR
	RESINCHIPSIDE(jj,ii,3,3)=OPLATE1(2,1,3)+(BSOLT*2+OPOLEZ)*(ii-1)

	RESINCHIPSIDE(jj,ii,4,1)=OPLATE1(1,1,1)
	RESINCHIPSIDE(jj,ii,4,2)=RCIGBT(1,jj,1,4,2)+FINERESINCOR
	RESINCHIPSIDE(jj,ii,4,3)=OPLATE1(2,1,3)+(BSOLT*2+OPOLEZ)*(ii-1)
*ENDDO
*ENDDO

*DO,ii,1,2,1	!O側中央
	mm=PARA-MOD(PARA+1,2)
	RESINCHIPSIDE(3,ii,1,1)=RCIGBT(1,mm,1,2,1)+FINERESINCOR
	RESINCHIPSIDE(3,ii,1,2)=RCIGBT(1,mm,1,2,2)-FINERESINCOR
	RESINCHIPSIDE(3,ii,1,3)=OPLATE1(2,1,3)+(BSOLT*2+OPOLEZ)*(ii-1)

	RESINCHIPSIDE(3,ii,2,1)=OPOLE(1,1,1)
	RESINCHIPSIDE(3,ii,2,2)=RCIGBT(1,mm,1,2,2)-FINERESINCOR
	RESINCHIPSIDE(3,ii,2,3)=OPLATE1(2,1,3)+(BSOLT*2+OPOLEZ)*(ii-1)

	RESINCHIPSIDE(3,ii,3,1)=OPOLE(1,1,1)
	RESINCHIPSIDE(3,ii,3,2)=RCIGBT(1,mm,1,3,2)+FINERESINCOR
	RESINCHIPSIDE(3,ii,3,3)=OPLATE1(2,1,3)+(BSOLT*2+OPOLEZ)*(ii-1)

	RESINCHIPSIDE(3,ii,4,1)=RCIGBT(1,mm,1,3,1)+FINERESINCOR
	RESINCHIPSIDE(3,ii,4,2)=RCIGBT(1,mm,1,3,2)+FINERESINCOR
	RESINCHIPSIDE(3,ii,4,3)=OPLATE1(2,1,3)+(BSOLT*2+OPOLEZ)*(ii-1)
*ENDDO

*DO,ii,1,2,1	!O側中央
	mm=PARA-MOD(PARA,2)
	RESINCHIPSIDE(4,ii,1,1)=RCIGBT(1,mm,1,2,1)+FINERESINCOR
	RESINCHIPSIDE(4,ii,1,2)=RCIGBT(1,mm,1,2,2)-FINERESINCOR
	RESINCHIPSIDE(4,ii,1,3)=OPLATE1(2,1,3)+(BSOLT*2+OPOLEZ)*(ii-1)

	RESINCHIPSIDE(4,ii,2,1)=NPOLE(1,1,1)
	RESINCHIPSIDE(4,ii,2,2)=RCIGBT(1,mm,1,2,2)-FINERESINCOR
	RESINCHIPSIDE(4,ii,2,3)=OPLATE1(2,1,3)+(BSOLT*2+OPOLEZ)*(ii-1)

	RESINCHIPSIDE(4,ii,3,1)=NPOLE(1,1,1)
	RESINCHIPSIDE(4,ii,3,2)=RCIGBT(1,mm,1,3,2)+FINERESINCOR
	RESINCHIPSIDE(4,ii,3,3)=OPLATE1(2,1,3)+(BSOLT*2+OPOLEZ)*(ii-1)

	RESINCHIPSIDE(4,ii,4,1)=RCIGBT(1,mm,1,3,1)+FINERESINCOR
	RESINCHIPSIDE(4,ii,4,2)=RCIGBT(1,mm,1,3,2)+FINERESINCOR
	RESINCHIPSIDE(4,ii,4,3)=OPLATE1(2,1,3)+(BSOLT*2+OPOLEZ)*(ii-1)
*ENDDO

*DO,ii,1,2,1	!P側中央
	RESINCHIPSIDE(5,ii,1,1)=OPOLE(1,2,1)
	RESINCHIPSIDE(5,ii,1,2)=RCIGBT(2,1,1,1,2)-FINERESINCOR
	RESINCHIPSIDE(5,ii,1,3)=OPLATE1(2,1,3)+(BSOLT*2+OPOLEZ)*(ii-1)

	RESINCHIPSIDE(5,ii,2,1)=RCIGBT(2,1,1,1,1)-FINERESINCOR
	RESINCHIPSIDE(5,ii,2,2)=RCIGBT(2,1,1,1,2)-FINERESINCOR
	RESINCHIPSIDE(5,ii,2,3)=OPLATE1(2,1,3)+(BSOLT*2+OPOLEZ)*(ii-1)

	RESINCHIPSIDE(5,ii,3,1)=RCIGBT(2,1,1,4,1)-FINERESINCOR
	RESINCHIPSIDE(5,ii,3,2)=RCIGBT(2,1,1,4,2)+FINERESINCOR
	RESINCHIPSIDE(5,ii,3,3)=OPLATE1(2,1,3)+(BSOLT*2+OPOLEZ)*(ii-1)

	RESINCHIPSIDE(5,ii,4,1)=OPOLE(1,2,1)
	RESINCHIPSIDE(5,ii,4,2)=RCIGBT(2,1,1,4,2)+FINERESINCOR
	RESINCHIPSIDE(5,ii,4,3)=OPLATE1(2,1,3)+(BSOLT*2+OPOLEZ)*(ii-1)
*ENDDO

*DO,ii,1,2,1	!P側中央
	RESINCHIPSIDE(6,ii,1,1)=NPOLE(1,2,1)
	RESINCHIPSIDE(6,ii,1,2)=RCIGBT(2,2,1,1,2)-FINERESINCOR
	RESINCHIPSIDE(6,ii,1,3)=OPLATE1(2,1,3)+(BSOLT*2+OPOLEZ)*(ii-1)

	RESINCHIPSIDE(6,ii,2,1)=RCIGBT(2,2,1,1,1)-FINERESINCOR
	RESINCHIPSIDE(6,ii,2,2)=RCIGBT(2,2,1,1,2)-FINERESINCOR
	RESINCHIPSIDE(6,ii,2,3)=OPLATE1(2,1,3)+(BSOLT*2+OPOLEZ)*(ii-1)

	RESINCHIPSIDE(6,ii,3,1)=RCIGBT(2,2,1,4,1)-FINERESINCOR
	RESINCHIPSIDE(6,ii,3,2)=RCIGBT(2,2,1,4,2)+FINERESINCOR
	RESINCHIPSIDE(6,ii,3,3)=OPLATE1(2,1,3)+(BSOLT*2+OPOLEZ)*(ii-1)

	RESINCHIPSIDE(6,ii,4,1)=NPOLE(1,2,1)
	RESINCHIPSIDE(6,ii,4,2)=RCIGBT(2,2,1,4,2)+FINERESINCOR
	RESINCHIPSIDE(6,ii,4,3)=OPLATE1(2,1,3)+(BSOLT*2+OPOLEZ)*(ii-1)
*ENDDO

*DO,ii,1,2,1	!RESINCHIPSIDEは今回は左したから右上に作っていく
	mm=PARA-MOD(PARA+1,2)
	RESINCHIPSIDE(7,ii,1,1)=RCIGBT(2,mm,1,2,1)+FINERESINCOR
	RESINCHIPSIDE(7,ii,1,2)=RCIGBT(2,mm,1,2,2)-FINERESINCOR
	RESINCHIPSIDE(7,ii,1,3)=OPLATE1(2,1,3)+(BSOLT*2+OPOLEZ)*(ii-1)

	RESINCHIPSIDE(7,ii,2,1)=PPLATE2(1,2,1)
	RESINCHIPSIDE(7,ii,2,2)=RCIGBT(2,mm,1,2,2)-FINERESINCOR
	RESINCHIPSIDE(7,ii,2,3)=OPLATE1(2,1,3)+(BSOLT*2+OPOLEZ)*(ii-1)

	RESINCHIPSIDE(7,ii,3,1)=PPLATE2(1,2,1)
	RESINCHIPSIDE(7,ii,3,2)=RCIGBT(2,mm,1,3,2)+FINERESINCOR
	RESINCHIPSIDE(7,ii,3,3)=OPLATE1(2,1,3)+(BSOLT*2+OPOLEZ)*(ii-1)

	RESINCHIPSIDE(7,ii,4,1)=RCIGBT(2,mm,1,3,1)+FINERESINCOR
	RESINCHIPSIDE(7,ii,4,2)=RCIGBT(2,mm,1,3,2)+FINERESINCOR
	RESINCHIPSIDE(7,ii,4,3)=OPLATE1(2,1,3)+(BSOLT*2+OPOLEZ)*(ii-1)
*ENDDO

*DO,ii,1,2,1	!RESINCHIPSIDEは今回は左したから右上に作っていく
	mm=PARA-MOD(PARA,2)
	RESINCHIPSIDE(8,ii,1,1)=RCIGBT(2,mm,1,2,1)+FINERESINCOR
	RESINCHIPSIDE(8,ii,1,2)=RCIGBT(2,mm,1,2,2)-FINERESINCOR
	RESINCHIPSIDE(8,ii,1,3)=OPLATE1(2,1,3)+(BSOLT*2+OPOLEZ)*(ii-1)
	RESINCHIPSIDE(8,ii,2,1)=PPLATE2(1,2,1)
	RESINCHIPSIDE(8,ii,2,2)=RCIGBT(2,mm,1,2,2)-FINERESINCOR
	RESINCHIPSIDE(8,ii,2,3)=OPLATE1(2,1,3)+(BSOLT*2+OPOLEZ)*(ii-1)
	RESINCHIPSIDE(8,ii,3,1)=PPLATE2(1,2,1)
	RESINCHIPSIDE(8,ii,3,2)=RCIGBT(2,mm,1,3,2)+FINERESINCOR
	RESINCHIPSIDE(8,ii,3,3)=OPLATE1(2,1,3)+(BSOLT*2+OPOLEZ)*(ii-1)
	RESINCHIPSIDE(8,ii,4,1)=RCIGBT(2,mm,1,3,1)+FINERESINCOR
	RESINCHIPSIDE(8,ii,4,2)=RCIGBT(2,mm,1,3,2)+FINERESINCOR
	RESINCHIPSIDE(8,ii,4,3)=OPLATE1(2,1,3)+(BSOLT*2+OPOLEZ)*(ii-1)
*ENDDO

!RESINBUSSIDE 中央の柱間→O,P側の横の樹脂へ------------------------------------
*DO,ii,1,2,1
	RESINBUSSIDE(1,ii,1,1)=OPOLE(1,1,1)
	RESINBUSSIDE(1,ii,1,2)=DBUS(1,1,3,2)
	RESINBUSSIDE(1,ii,1,3)=NPLATE1(2,1,3)+(BSOLT*2+OPOLEZ)*(ii-1)
	RESINBUSSIDE(1,ii,2,1)=OPOLE(1,2,1)
	RESINBUSSIDE(1,ii,2,2)=DBUS(1,1,3,2)
	RESINBUSSIDE(1,ii,2,3)=NPLATE1(2,1,3)+(BSOLT*2+OPOLEZ)*(ii-1)
	RESINBUSSIDE(1,ii,3,1)=OPOLE(1,2,1)
	RESINBUSSIDE(1,ii,3,2)=OPOLE(1,2,2)
	RESINBUSSIDE(1,ii,3,3)=NPLATE1(2,1,3)+(BSOLT*2+OPOLEZ)*(ii-1)
	RESINBUSSIDE(1,ii,4,1)=OPOLE(1,1,1)
	RESINBUSSIDE(1,ii,4,2)=OPOLE(1,1,2)
	RESINBUSSIDE(1,ii,4,3)=NPLATE1(2,1,3)+(BSOLT*2+OPOLEZ)*(ii-1)
*ENDDO

*DO,ii,1,2,1
	RESINBUSSIDE(2,ii,1,1)=OPOLE(1,4,1)
	RESINBUSSIDE(2,ii,1,2)=OPOLE(1,4,2)
	RESINBUSSIDE(2,ii,1,3)=NPLATE1(2,1,3)+(BSOLT*2+OPOLEZ)*(ii-1)
	RESINBUSSIDE(2,ii,2,1)=OPOLE(1,3,1)
	RESINBUSSIDE(2,ii,2,2)=OPOLE(1,3,2)
	RESINBUSSIDE(2,ii,2,3)=NPLATE1(2,1,3)+(BSOLT*2+OPOLEZ)*(ii-1)
	RESINBUSSIDE(2,ii,3,1)=OPOLE(1,3,1)
	RESINBUSSIDE(2,ii,3,2)=RESINMID(2,1,4,2)
	RESINBUSSIDE(2,ii,3,3)=NPLATE1(2,1,3)+(BSOLT*2+OPOLEZ)*(ii-1)
	RESINBUSSIDE(2,ii,4,1)=OPOLE(1,4,1)
	RESINBUSSIDE(2,ii,4,2)=RESINMID(1,1,3,2)
	RESINBUSSIDE(2,ii,4,3)=NPLATE1(2,1,3)+(BSOLT*2+OPOLEZ)*(ii-1)
*ENDDO

*DO,ii,1,2,1
	RESINBUSSIDE(3,ii,1,1)=NPOLE(1,1,1)
	RESINBUSSIDE(3,ii,1,2)=RESINMID(1,1,3,2)
	RESINBUSSIDE(3,ii,1,3)=NPLATE1(2,1,3)+(BSOLT*2+OPOLEZ)*(ii-1)
	RESINBUSSIDE(3,ii,2,1)=NPOLE(1,2,1)
	RESINBUSSIDE(3,ii,2,2)=RESINMID(2,1,4,2)
	RESINBUSSIDE(3,ii,2,3)=NPLATE1(2,1,3)+(BSOLT*2+OPOLEZ)*(ii-1)
	RESINBUSSIDE(3,ii,3,1)=NPOLE(1,2,1)
	RESINBUSSIDE(3,ii,3,2)=NPOLE(1,2,2)
	RESINBUSSIDE(3,ii,3,3)=NPLATE1(2,1,3)+(BSOLT*2+OPOLEZ)*(ii-1)
	RESINBUSSIDE(3,ii,4,1)=NPOLE(1,1,1)
	RESINBUSSIDE(3,ii,4,2)=NPOLE(1,1,2)
	RESINBUSSIDE(3,ii,4,3)=NPLATE1(2,1,3)+(BSOLT*2+OPOLEZ)*(ii-1)
*ENDDO

*DO,ii,1,2,1
	RESINBUSSIDE(4,ii,1,1)=NPOLE(1,4,1)
	RESINBUSSIDE(4,ii,1,2)=NPOLE(1,4,2)
	RESINBUSSIDE(4,ii,1,3)=NPLATE1(2,1,3)+(BSOLT*2+OPOLEZ)*(ii-1)
	RESINBUSSIDE(4,ii,2,1)=NPOLE(1,3,1)
	RESINBUSSIDE(4,ii,2,2)=NPOLE(1,3,2)
	RESINBUSSIDE(4,ii,2,3)=NPLATE1(2,1,3)+(BSOLT*2+OPOLEZ)*(ii-1)
	RESINBUSSIDE(4,ii,3,1)=NPOLE(1,3,1)
	RESINBUSSIDE(4,ii,3,2)=NBUS(1,1,2,2)
	RESINBUSSIDE(4,ii,3,3)=NPLATE1(2,1,3)+(BSOLT*2+OPOLEZ)*(ii-1)
	RESINBUSSIDE(4,ii,4,1)=NPOLE(1,4,1)
	RESINBUSSIDE(4,ii,4,2)=NBUS(1,1,1,2)
	RESINBUSSIDE(4,ii,4,3)=NPLATE1(2,1,3)+(BSOLT*2+OPOLEZ)*(ii-1)
*ENDDO

*DO,ii,1,2,1
	RESINBUSSIDE(5,ii,1,1)=OPLATE1(1,1,1)
	RESINBUSSIDE(5,ii,1,2)=DBUS(1,1,4,2)
	RESINBUSSIDE(5,ii,1,3)=NPLATE1(2,1,3)+(BSOLT*2+OPOLEZ)*(ii-1)
	RESINBUSSIDE(5,ii,2,1)=OPOLE(1,1,1)
	RESINBUSSIDE(5,ii,2,2)=DBUS(1,1,4,2)
	RESINBUSSIDE(5,ii,2,3)=NPLATE1(2,1,3)+(BSOLT*2+OPOLEZ)*(ii-1)
	RESINBUSSIDE(5,ii,3,1)=OPOLE(1,1,1)
	RESINBUSSIDE(5,ii,3,2)=RCIGBT(1,1,1,1,2)-FINERESINCOR
	RESINBUSSIDE(5,ii,3,3)=NPLATE1(2,1,3)+(BSOLT*2+OPOLEZ)*(ii-1)
	RESINBUSSIDE(5,ii,4,1)=OPLATE1(1,1,1)
	RESINBUSSIDE(5,ii,4,2)=RCIGBT(1,1,1,1,2)-FINERESINCOR
	RESINBUSSIDE(5,ii,4,3)=NPLATE1(2,1,3)+(BSOLT*2+OPOLEZ)*(ii-1)
*ENDDO

*DO,ii,1,2,1
	RESINBUSSIDE(6,ii,1,1)=OPLATE1(1,1,1)
	RESINBUSSIDE(6,ii,1,2)=RCIGBT(1,2,1,4,2)+FINERESINCOR
	RESINBUSSIDE(6,ii,1,3)=NPLATE1(2,1,3)+(BSOLT*2+OPOLEZ)*(ii-1)
	RESINBUSSIDE(6,ii,2,1)=NPOLE(1,1,1)
	RESINBUSSIDE(6,ii,2,2)=RCIGBT(1,2,1,4,2)+FINERESINCOR
	RESINBUSSIDE(6,ii,2,3)=NPLATE1(2,1,3)+(BSOLT*2+OPOLEZ)*(ii-1)
	RESINBUSSIDE(6,ii,3,1)=NPOLE(1,1,1)
	RESINBUSSIDE(6,ii,3,2)=OBUS(1,1,1,2)
	RESINBUSSIDE(6,ii,3,3)=NPLATE1(2,1,3)+(BSOLT*2+OPOLEZ)*(ii-1)
	RESINBUSSIDE(6,ii,4,1)=OPLATE1(1,1,1)
	RESINBUSSIDE(6,ii,4,2)=OBUS(1,1,1,2)
	RESINBUSSIDE(6,ii,4,3)=NPLATE1(2,1,3)+(BSOLT*2+OPOLEZ)*(ii-1)
*ENDDO

*DO,ii,1,2,1
	RESINBUSSIDE(7,ii,1,1)=OPOLE(1,2,1)
	RESINBUSSIDE(7,ii,1,2)=DBUS(1,1,4,2)
	RESINBUSSIDE(7,ii,1,3)=NPLATE1(2,1,3)+(BSOLT*2+OPOLEZ)*(ii-1)
	RESINBUSSIDE(7,ii,2,1)=PPLATE2(1,3,1)
	RESINBUSSIDE(7,ii,2,2)=DBUS(1,1,4,2)
	RESINBUSSIDE(7,ii,2,3)=NPLATE1(2,1,3)+(BSOLT*2+OPOLEZ)*(ii-1)
	RESINBUSSIDE(7,ii,3,1)=PPLATE2(1,2,1)
	RESINBUSSIDE(7,ii,3,2)=RCIGBT(2,1,1,1,2)-FINERESINCOR
	RESINBUSSIDE(7,ii,3,3)=NPLATE1(2,1,3)+(BSOLT*2+OPOLEZ)*(ii-1)
	RESINBUSSIDE(7,ii,4,1)=OPOLE(1,2,1)
	RESINBUSSIDE(7,ii,4,2)=RCIGBT(2,1,1,1,2)-FINERESINCOR
	RESINBUSSIDE(7,ii,4,3)=NPLATE1(2,1,3)+(BSOLT*2+OPOLEZ)*(ii-1)
*ENDDO

*DO,ii,1,2,1
	RESINBUSSIDE(8,ii,1,1)=NPOLE(1,2,1)
	RESINBUSSIDE(8,ii,1,2)=RCIGBT(2,2,1,4,2)+FINERESINCOR
	RESINBUSSIDE(8,ii,1,3)=NPLATE1(2,1,3)+(BSOLT*2+OPOLEZ)*(ii-1)
	RESINBUSSIDE(8,ii,2,1)=PPLATE2(1,2,1)
	RESINBUSSIDE(8,ii,2,2)=RCIGBT(2,2,1,4,2)+FINERESINCOR
	RESINBUSSIDE(8,ii,2,3)=NPLATE1(2,1,3)+(BSOLT*2+OPOLEZ)*(ii-1)
	RESINBUSSIDE(8,ii,3,1)=PPLATE2(1,2,1)
	RESINBUSSIDE(8,ii,3,2)=PBUS(1,1,1,2)
	RESINBUSSIDE(8,ii,3,3)=NPLATE1(2,1,3)+(BSOLT*2+OPOLEZ)*(ii-1)
	RESINBUSSIDE(8,ii,4,1)=NPOLE(1,2,1)
	RESINBUSSIDE(8,ii,4,2)=PBUS(1,1,1,2)
	RESINBUSSIDE(8,ii,4,3)=NPLATE1(2,1,3)+(BSOLT*2+OPOLEZ)*(ii-1)
*ENDDO


!-------------BUS下の樹脂および、OPN BUS間の小樹脂----------------------
!OBUS下薄樹脂
*DO,ii,1,2,1
	RESINBUSLOW(1,ii,1,1)=OBUS(2,1,1,1)
	RESINBUSLOW(1,ii,1,2)=OBUS(2,1,1,2)
	RESINBUSLOW(1,ii,1,3)=NPLATE1(2,4,3)+BSOLT*(ii-1)
	RESINBUSLOW(1,ii,2,1)=OBUS(2,1,2,1)
	RESINBUSLOW(1,ii,2,2)=OBUS(2,1,2,2)
	RESINBUSLOW(1,ii,2,3)=NPLATE1(2,4,3)+BSOLT*(ii-1)
	RESINBUSLOW(1,ii,3,1)=OBUS(2,1,2,1)
	RESINBUSLOW(1,ii,3,2)=LCERA(1,4,2)+RESIN_LOW
	RESINBUSLOW(1,ii,3,3)=NPLATE1(2,1,3)+BSOLT*(ii-1)
	RESINBUSLOW(1,ii,4,1)=OBUS(2,1,1,1)
	RESINBUSLOW(1,ii,4,2)=LCERA(1,4,2)+RESIN_LOW
	RESINBUSLOW(1,ii,4,3)=NPLATE1(2,1,3)+BSOLT*(ii-1)
*ENDDO

!NBUS下薄樹脂
*DO,ii,1,2,1
	RESINBUSLOW(2,ii,1,1)=NBUS(2,1,1,1)
	RESINBUSLOW(2,ii,1,2)=NBUS(2,1,1,2)
	RESINBUSLOW(2,ii,1,3)=NPLATE1(2,4,3)+BSOLT*(ii-1)
	RESINBUSLOW(2,ii,2,1)=NBUS(2,1,2,1)
	RESINBUSLOW(2,ii,2,2)=NBUS(2,1,2,2)
	RESINBUSLOW(2,ii,2,3)=NPLATE1(2,4,3)+BSOLT*(ii-1)
	RESINBUSLOW(2,ii,3,1)=NBUS(2,1,3,1)
	RESINBUSLOW(2,ii,3,2)=NBUS(2,1,3,2)
	RESINBUSLOW(2,ii,3,3)=NPLATE1(2,1,3)+BSOLT*(ii-1)
	RESINBUSLOW(2,ii,4,1)=NBUS(2,1,4,1)
	RESINBUSLOW(2,ii,4,2)=NBUS(2,1,4,2)
	RESINBUSLOW(2,ii,4,3)=NPLATE1(2,1,3)+BSOLT*(ii-1)
*ENDDO

!PBUS下薄樹脂
*DO,ii,1,2,1
	RESINBUSLOW(3,ii,1,1)=PBUS(2,1,1,1)
	RESINBUSLOW(3,ii,1,2)=PBUS(2,1,1,2)
	RESINBUSLOW(3,ii,1,3)=NPLATE1(2,4,3)+BSOLT*(ii-1)
	RESINBUSLOW(3,ii,2,1)=PBUS(2,1,2,1)
	RESINBUSLOW(3,ii,2,2)=PBUS(2,1,2,2)
	RESINBUSLOW(3,ii,2,3)=NPLATE1(2,4,3)+BSOLT*(ii-1)
	RESINBUSLOW(3,ii,3,1)=PBUS(2,1,2,1)
	RESINBUSLOW(3,ii,3,2)=LCERA(1,4,2)+RESIN_LOW
	RESINBUSLOW(3,ii,3,3)=NPLATE1(2,1,3)+BSOLT*(ii-1)
	RESINBUSLOW(3,ii,4,1)=PBUS(2,1,1,1)
	RESINBUSLOW(3,ii,4,2)=LCERA(1,4,2)+RESIN_LOW
	RESINBUSLOW(3,ii,4,3)=NPLATE1(2,1,3)+BSOLT*(ii-1)
*ENDDO

!DBUS下薄樹脂
*DO,ii,1,2,1
	RESINBUSLOW(4,ii,1,1)=DBUS(2,1,4,1)
	RESINBUSLOW(4,ii,1,2)=LCERA(1,1,2)!-RESIN_UP
	RESINBUSLOW(4,ii,1,3)=NPLATE1(2,4,3)+BSOLT*(ii-1)
	RESINBUSLOW(4,ii,2,1)=DBUS(2,1,3,1)
	RESINBUSLOW(4,ii,2,2)=LCERA(1,1,2)!-RESIN_UP
	RESINBUSLOW(4,ii,2,3)=NPLATE1(2,4,3)+BSOLT*(ii-1)
	RESINBUSLOW(4,ii,3,1)=DBUS(2,1,3,1)
	RESINBUSLOW(4,ii,3,2)=DBUS(2,1,3,2)
	RESINBUSLOW(4,ii,3,3)=NPLATE1(2,1,3)+BSOLT*(ii-1)
	RESINBUSLOW(4,ii,4,1)=DBUS(2,1,4,1)
	RESINBUSLOW(4,ii,4,2)=DBUS(2,1,4,2)
	RESINBUSLOW(4,ii,4,3)=NPLATE1(2,1,3)+BSOLT*(ii-1)
*ENDDO

!O-N間樹脂　下
*DO,ii,1,2,1
	RESINBUSLOW(5,ii,1,1)=OBUS(1,1,2,1)
	RESINBUSLOW(5,ii,1,2)=OBUS(1,1,2,2)
	RESINBUSLOW(5,ii,1,3)=NPLATE1(2,4,3)+(BSOLT+BUSTHICK)*(ii-1)
	RESINBUSLOW(5,ii,2,1)=NBUS(1,1,1,1)
	RESINBUSLOW(5,ii,2,2)=NBUS(1,1,1,2)
	RESINBUSLOW(5,ii,2,3)=NPLATE1(2,4,3)+(BSOLT+BUSTHICK)*(ii-1)
	RESINBUSLOW(5,ii,3,1)=NBUS(1,1,1,1)
	RESINBUSLOW(5,ii,3,2)=NBUS(1,1,4,2)
	RESINBUSLOW(5,ii,3,3)=NPLATE1(2,1,3)+(BSOLT+BUSTHICK)*(ii-1)
	RESINBUSLOW(5,ii,4,1)=OBUS(1,1,2,1)
	RESINBUSLOW(5,ii,4,2)=OBUS(1,1,3,2)
	RESINBUSLOW(5,ii,4,3)=NPLATE1(2,1,3)+(BSOLT+BUSTHICK)*(ii-1)
*ENDDO

!O-N間樹脂　上
*DO,ii,1,2,1
	RESINBUSLOW(6,ii,1,1)=OBUS(2,1,2,1)
	RESINBUSLOW(6,ii,1,2)=OBUS(2,1,2,2)
	RESINBUSLOW(6,ii,1,3)=NPLATE1(2,4,3)+(BSOLT+BUSTHICK)*(ii-1)
	RESINBUSLOW(6,ii,2,1)=NBUS(2,1,1,1)
	RESINBUSLOW(6,ii,2,2)=NBUS(2,1,1,2)
	RESINBUSLOW(6,ii,2,3)=NPLATE1(2,4,3)+(BSOLT+BUSTHICK)*(ii-1)
	RESINBUSLOW(6,ii,3,1)=NBUS(2,1,4,1)
	RESINBUSLOW(6,ii,3,2)=NBUS(2,1,4,2)
	RESINBUSLOW(6,ii,3,3)=NPLATE1(2,1,3)+(BSOLT+BUSTHICK)*(ii-1)
	RESINBUSLOW(6,ii,4,1)=OBUS(2,1,2,1)
	RESINBUSLOW(6,ii,4,2)=NBUS(2,1,4,2)
	RESINBUSLOW(6,ii,4,3)=NPLATE1(2,1,3)+(BSOLT+BUSTHICK)*(ii-1)
*ENDDO

!N-P間樹脂　下
*DO,ii,1,2,1
	RESINBUSLOW(7,ii,1,1)=NBUS(1,1,2,1)
	RESINBUSLOW(7,ii,1,2)=NBUS(1,1,2,2)
	RESINBUSLOW(7,ii,1,3)=NPLATE1(2,4,3)+(BSOLT+BUSTHICK)*(ii-1)
	RESINBUSLOW(7,ii,2,1)=PBUS(1,1,1,1)
	RESINBUSLOW(7,ii,2,2)=PBUS(1,1,1,2)
	RESINBUSLOW(7,ii,2,3)=NPLATE1(2,4,3)+(BSOLT+BUSTHICK)*(ii-1)
	RESINBUSLOW(7,ii,3,1)=PBUS(1,1,1,1)
	RESINBUSLOW(7,ii,3,2)=PBUS(1,1,4,2)
	RESINBUSLOW(7,ii,3,3)=NPLATE1(2,1,3)+(BSOLT+BUSTHICK)*(ii-1)
	RESINBUSLOW(7,ii,4,1)=NBUS(1,1,2,1)
	RESINBUSLOW(7,ii,4,2)=NBUS(1,1,3,2)
	RESINBUSLOW(7,ii,4,3)=NPLATE1(2,1,3)+(BSOLT+BUSTHICK)*(ii-1)
*ENDDO


!N-P間樹脂　上
*DO,ii,1,2,1
	RESINBUSLOW(8,ii,1,1)=NBUS(2,1,2,1)
	RESINBUSLOW(8,ii,1,2)=NBUS(2,1,2,2)
	RESINBUSLOW(8,ii,1,3)=NPLATE1(2,4,3)+(BSOLT+BUSTHICK)*(ii-1)
	RESINBUSLOW(8,ii,2,1)=PBUS(2,1,1,1)
	RESINBUSLOW(8,ii,2,2)=PBUS(2,1,1,2)
	RESINBUSLOW(8,ii,2,3)=NPLATE1(2,4,3)+(BSOLT+BUSTHICK)*(ii-1)
	RESINBUSLOW(8,ii,3,1)=PBUS(2,1,1,1)
	RESINBUSLOW(8,ii,3,2)=NBUS(2,1,3,2)
	RESINBUSLOW(8,ii,3,3)=NPLATE1(2,1,3)+(BSOLT+BUSTHICK)*(ii-1)
	RESINBUSLOW(8,ii,4,1)=NBUS(2,1,3,1)
	RESINBUSLOW(8,ii,4,2)=NBUS(2,1,3,2)
	RESINBUSLOW(8,ii,4,3)=NPLATE1(2,1,3)+(BSOLT+BUSTHICK)*(ii-1)
*ENDDO

!O-N間樹脂　最上
*DO,ii,1,2,1
	RESINBUSLOW(9,ii,1,1)=OBUS(2,1,2,1)
	RESINBUSLOW(9,ii,1,2)=NBUS(2,1,4,2)
	RESINBUSLOW(9,ii,1,3)=NPLATE1(2,4,3)+(BSOLT+BUSTHICK)*(ii-1)
	RESINBUSLOW(9,ii,2,1)=NBUS(2,1,4,1)
	RESINBUSLOW(9,ii,2,2)=NBUS(2,1,4,2)
	RESINBUSLOW(9,ii,2,3)=NPLATE1(2,4,3)+(BSOLT+BUSTHICK)*(ii-1)
	RESINBUSLOW(9,ii,3,1)=NBUS(2,1,4,1)
	RESINBUSLOW(9,ii,3,2)=LCERA(1,4,2)+RESIN_LOW
	RESINBUSLOW(9,ii,3,3)=NPLATE1(2,1,3)+(BSOLT+BUSTHICK)*(ii-1)
	RESINBUSLOW(9,ii,4,1)=OBUS(2,1,2,1)
	RESINBUSLOW(9,ii,4,2)=LCERA(1,4,2)+RESIN_LOW
	RESINBUSLOW(9,ii,4,3)=NPLATE1(2,1,3)+(BSOLT+BUSTHICK)*(ii-1)
*ENDDO

!N-P間樹脂　最上
*DO,ii,1,2,1
	RESINBUSLOW(10,ii,1,1)=NBUS(2,1,3,1)
	RESINBUSLOW(10,ii,1,2)=NBUS(2,1,4,2)
	RESINBUSLOW(10,ii,1,3)=NPLATE1(2,4,3)+(BSOLT+BUSTHICK)*(ii-1)
	RESINBUSLOW(10,ii,2,1)=PBUS(2,1,1,1)
	RESINBUSLOW(10,ii,2,2)=NBUS(2,1,4,2)
	RESINBUSLOW(10,ii,2,3)=NPLATE1(2,4,3)+(BSOLT+BUSTHICK)*(ii-1)
	RESINBUSLOW(10,ii,3,1)=PBUS(2,1,1,1)
	RESINBUSLOW(10,ii,3,2)=LCERA(1,4,2)+RESIN_LOW
	RESINBUSLOW(10,ii,3,3)=NPLATE1(2,1,3)+(BSOLT+BUSTHICK)*(ii-1)
	RESINBUSLOW(10,ii,4,1)=NBUS(2,1,3,1)
	RESINBUSLOW(10,ii,4,2)=LCERA(1,4,2)+RESIN_LOW
	RESINBUSLOW(10,ii,4,3)=NPLATE1(2,1,3)+(BSOLT+BUSTHICK)*(ii-1)
*ENDDO

!N下の薄い樹脂　最上
*DO,ii,1,2,1
	RESINBUSLOW(11,ii,1,1)=NBUS(2,1,4,1)
	RESINBUSLOW(11,ii,1,2)=NBUS(2,1,4,2)
	RESINBUSLOW(11,ii,1,3)=NPLATE1(2,4,3)+(BSOLT)*(ii-1)
	RESINBUSLOW(11,ii,2,1)=NBUS(2,1,3,1)
	RESINBUSLOW(11,ii,2,2)=NBUS(2,1,3,2)
	RESINBUSLOW(11,ii,2,3)=NPLATE1(2,4,3)+(BSOLT)*(ii-1)
	RESINBUSLOW(11,ii,3,1)=NBUS(2,1,3,1)
	RESINBUSLOW(11,ii,3,2)=LCERA(1,4,2)+RESIN_LOW
	RESINBUSLOW(11,ii,3,3)=NPLATE1(2,1,3)+(BSOLT)*(ii-1)
	RESINBUSLOW(11,ii,4,1)=NBUS(2,1,4,1)
	RESINBUSLOW(11,ii,4,2)=LCERA(1,4,2)+RESIN_LOW
	RESINBUSLOW(11,ii,4,3)=NPLATE1(2,1,3)+(BSOLT)*(ii-1)
*ENDDO
!-----RESINLASTDBC 最後の8つ。OPBUSの左右とBUS上 DBUS左右とDBUS上 最後の左右の縁側----------------------
!Oバス左
*DO,ii,1,2,1
	RESINLASTDBC(1,ii,1,1)=LCERA(1,4,1)+ENGAWA
	RESINLASTDBC(1,ii,1,2)=OBUS(1,1,1,2)
	RESINLASTDBC(1,ii,1,3)=NPLATE1(2,4,3)+(PSOLT*2+OPOLEZ)*(ii-1)
	RESINLASTDBC(1,ii,2,1)=OBUS(1,1,1,1)
	RESINLASTDBC(1,ii,2,2)=OBUS(1,1,1,2)
	RESINLASTDBC(1,ii,2,3)=NPLATE1(2,4,3)+(PSOLT*2+OPOLEZ)*(ii-1)
	RESINLASTDBC(1,ii,3,1)=OBUS(1,1,1,1)
	RESINLASTDBC(1,ii,3,2)=LCERA(1,4,2)
	RESINLASTDBC(1,ii,3,3)=NPLATE1(2,4,3)+(PSOLT*2+OPOLEZ)*(ii-1)
	RESINLASTDBC(1,ii,4,1)=LCERA(1,4,1)+ENGAWA
	RESINLASTDBC(1,ii,4,2)=LCERA(1,4,2)
	RESINLASTDBC(1,ii,4,3)=NPLATE1(2,4,3)+(PSOLT*2+OPOLEZ)*(ii-1)
*ENDDO
!O～Pバス上
*DO,ii,1,2,1
	RESINLASTDBC(2,ii,1,1)=OBUS(1,1,1,1)
	RESINLASTDBC(2,ii,1,2)=OBUS(1,1,1,2)
	RESINLASTDBC(2,ii,1,3)=OBUS(1,2,1,3)+(PSOLT*2+OPOLEZ-BSOLT-BUSTHICK)*(ii-1)
	RESINLASTDBC(2,ii,2,1)=PBUS(1,1,2,1)
	RESINLASTDBC(2,ii,2,2)=PBUS(1,1,2,2)
	RESINLASTDBC(2,ii,2,3)=OBUS(1,2,1,3)+(PSOLT*2+OPOLEZ-BSOLT-BUSTHICK)*(ii-1)
	RESINLASTDBC(2,ii,3,1)=PBUS(1,1,2,1)
	RESINLASTDBC(2,ii,3,2)=LCERA(1,4,2)
	RESINLASTDBC(2,ii,3,3)=OBUS(1,2,1,3)+(PSOLT*2+OPOLEZ-BSOLT-BUSTHICK)*(ii-1)
	RESINLASTDBC(2,ii,4,1)=OBUS(1,1,1,1)
	RESINLASTDBC(2,ii,4,2)=LCERA(1,4,2)
	RESINLASTDBC(2,ii,4,3)=OBUS(1,2,1,3)+(PSOLT*2+OPOLEZ-BSOLT-BUSTHICK)*(ii-1)
*ENDDO
!Pバス右となり
*DO,ii,1,2,1
	RESINLASTDBC(3,ii,1,1)=PBUS(1,1,2,1)
	RESINLASTDBC(3,ii,1,2)=PBUS(1,1,2,2)
	RESINLASTDBC(3,ii,1,3)=NPLATE1(2,4,3)+(PSOLT*2+OPOLEZ)*(ii-1)
	RESINLASTDBC(3,ii,2,1)=LCERA(1,3,1)-ENGAWA
	RESINLASTDBC(3,ii,2,2)=PBUS(1,1,2,2)
	RESINLASTDBC(3,ii,2,3)=NPLATE1(2,4,3)+(PSOLT*2+OPOLEZ)*(ii-1)
	RESINLASTDBC(3,ii,3,1)=LCERA(1,3,1)-ENGAWA
	RESINLASTDBC(3,ii,3,2)=LCERA(1,3,2)
	RESINLASTDBC(3,ii,3,3)=NPLATE1(2,4,3)+(PSOLT*2+OPOLEZ)*(ii-1)
	RESINLASTDBC(3,ii,4,1)=PBUS(1,1,2,1)
	RESINLASTDBC(3,ii,4,2)=LCERA(1,3,2)
	RESINLASTDBC(3,ii,4,3)=NPLATE1(2,4,3)+(PSOLT*2+OPOLEZ)*(ii-1)
*ENDDO
!Dバス左
*DO,ii,1,2,1
	RESINLASTDBC(4,ii,1,1)=LCERA(1,1,1)+ENGAWA
	RESINLASTDBC(4,ii,1,2)=LCERA(1,1,2)
	RESINLASTDBC(4,ii,1,3)=NPLATE1(2,4,3)+(PSOLT*2+OPOLEZ)*(ii-1)
	RESINLASTDBC(4,ii,2,1)=DBUS(1,1,1,1)
	RESINLASTDBC(4,ii,2,2)=LCERA(1,1,2)
	RESINLASTDBC(4,ii,2,3)=NPLATE1(2,4,3)+(PSOLT*2+OPOLEZ)*(ii-1)
	RESINLASTDBC(4,ii,3,1)=DBUS(1,1,1,1)
	RESINLASTDBC(4,ii,3,2)=DBUS(1,1,4,2)
	RESINLASTDBC(4,ii,3,3)=NPLATE1(2,4,3)+(PSOLT*2+OPOLEZ)*(ii-1)
	RESINLASTDBC(4,ii,4,1)=LCERA(1,1,1)+ENGAWA
	RESINLASTDBC(4,ii,4,2)=DBUS(1,1,4,2)
	RESINLASTDBC(4,ii,4,3)=NPLATE1(2,4,3)+(PSOLT*2+OPOLEZ)*(ii-1)
*ENDDO
!Dバス上
*DO,ii,1,2,1
	RESINLASTDBC(5,ii,1,1)=DBUS(1,1,1,1)
	RESINLASTDBC(5,ii,1,2)=LCERA(1,1,2)
	RESINLASTDBC(5,ii,1,3)=DBUS(1,2,1,3)+(PSOLT*2+OPOLEZ-BSOLT-BUSTHICK)*(ii-1)
	RESINLASTDBC(5,ii,2,1)=DBUS(1,1,2,1)
	RESINLASTDBC(5,ii,2,2)=LCERA(1,1,2)
	RESINLASTDBC(5,ii,2,3)=DBUS(1,2,1,3)+(PSOLT*2+OPOLEZ-BSOLT-BUSTHICK)*(ii-1)
	RESINLASTDBC(5,ii,3,1)=DBUS(1,1,2,1)
	RESINLASTDBC(5,ii,3,2)=DBUS(1,1,3,2)
	RESINLASTDBC(5,ii,3,3)=DBUS(1,2,1,3)+(PSOLT*2+OPOLEZ-BSOLT-BUSTHICK)*(ii-1)
	RESINLASTDBC(5,ii,4,1)=DBUS(1,1,1,1)
	RESINLASTDBC(5,ii,4,2)=DBUS(1,1,4,2)
	RESINLASTDBC(5,ii,4,3)=DBUS(1,2,1,3)+(PSOLT*2+OPOLEZ-BSOLT-BUSTHICK)*(ii-1)
*ENDDO
!Dバス右となり
*DO,ii,1,2,1
	RESINLASTDBC(6,ii,1,1)=DBUS(1,1,2,1)
	RESINLASTDBC(6,ii,1,2)=LCERA(1,1,2)
	RESINLASTDBC(6,ii,1,3)=NPLATE1(2,4,3)+(PSOLT*2+OPOLEZ)*(ii-1)
	RESINLASTDBC(6,ii,2,1)=LCERA(1,2,1)-ENGAWA
	RESINLASTDBC(6,ii,2,2)=LCERA(1,1,2)
	RESINLASTDBC(6,ii,2,3)=NPLATE1(2,4,3)+(PSOLT*2+OPOLEZ)*(ii-1)
	RESINLASTDBC(6,ii,3,1)=LCERA(1,2,1)-ENGAWA
	RESINLASTDBC(6,ii,3,2)=DBUS(1,1,4,2)
	RESINLASTDBC(6,ii,3,3)=NPLATE1(2,4,3)+(PSOLT*2+OPOLEZ)*(ii-1)
	RESINLASTDBC(6,ii,4,1)=DBUS(1,1,2,1)
	RESINLASTDBC(6,ii,4,2)=DBUS(1,1,4,2)
	RESINLASTDBC(6,ii,4,3)=NPLATE1(2,4,3)+(PSOLT*2+OPOLEZ)*(ii-1)
*ENDDO
!左縁側
*DO,ii,1,2,1
	RESINLASTDBC(7,ii,1,1)=LCERA(1,1,1)
	RESINLASTDBC(7,ii,1,2)=LCERA(1,1,2)
	RESINLASTDBC(7,ii,1,3)=OPLATE1(2,1,3)+(PSOLT*2+OPOLEZ)*(ii-1)
	RESINLASTDBC(7,ii,2,1)=LCERA(1,1,1)+ENGAWA
	RESINLASTDBC(7,ii,2,2)=LCERA(1,1,2)
	RESINLASTDBC(7,ii,2,3)=OPLATE1(2,1,3)+(PSOLT*2+OPOLEZ)*(ii-1)
	RESINLASTDBC(7,ii,3,1)=LCERA(1,4,1)+ENGAWA
	RESINLASTDBC(7,ii,3,2)=LCERA(1,4,2)
	RESINLASTDBC(7,ii,3,3)=OPLATE1(2,1,3)+(PSOLT*2+OPOLEZ)*(ii-1)
	RESINLASTDBC(7,ii,4,1)=LCERA(1,4,1)
	RESINLASTDBC(7,ii,4,2)=LCERA(1,4,2)
	RESINLASTDBC(7,ii,4,3)=OPLATE1(2,1,3)+(PSOLT*2+OPOLEZ)*(ii-1)
*ENDDO
!右縁側
*DO,ii,1,2,1
	RESINLASTDBC(8,ii,1,1)=LCERA(1,2,1)-ENGAWA
	RESINLASTDBC(8,ii,1,2)=LCERA(1,2,2)
	RESINLASTDBC(8,ii,1,3)=OPLATE1(2,1,3)+(PSOLT*2+OPOLEZ)*(ii-1)
	RESINLASTDBC(8,ii,2,1)=LCERA(1,2,1)
	RESINLASTDBC(8,ii,2,2)=LCERA(1,2,2)
	RESINLASTDBC(8,ii,2,3)=OPLATE1(2,1,3)+(PSOLT*2+OPOLEZ)*(ii-1)
	RESINLASTDBC(8,ii,3,1)=LCERA(1,3,1)
	RESINLASTDBC(8,ii,3,2)=LCERA(1,3,2)
	RESINLASTDBC(8,ii,3,3)=OPLATE1(2,1,3)+(PSOLT*2+OPOLEZ)*(ii-1)
	RESINLASTDBC(8,ii,4,1)=LCERA(1,3,1)-ENGAWA
	RESINLASTDBC(8,ii,4,2)=LCERA(1,3,2)
	RESINLASTDBC(8,ii,4,3)=OPLATE1(2,1,3)+(PSOLT*2+OPOLEZ)*(ii-1)
*ENDDO

!異形DBUS左側の小樹脂
*DO,ii,1,2,1
	RESINLASTDBC(9,ii,1,1)=DBUS(1,1,1,1)
	RESINLASTDBC(9,ii,1,2)=LCERA(1,2,2)
	RESINLASTDBC(9,ii,1,3)=OPLATE1(2,1,3)+(BSOLT+BUSTHICK)*(ii-1)
	RESINLASTDBC(9,ii,2,1)=DBUS(2,1,1,1)
	RESINLASTDBC(9,ii,2,2)=LCERA(1,2,2)
	RESINLASTDBC(9,ii,2,3)=OPLATE1(2,1,3)+(BSOLT+BUSTHICK)*(ii-1)
	RESINLASTDBC(9,ii,3,1)=DBUS(2,1,1,1)
	RESINLASTDBC(9,ii,3,2)=DBUS(2,1,3,2)
	RESINLASTDBC(9,ii,3,3)=OPLATE1(2,1,3)+(BSOLT+BUSTHICK)*(ii-1)
	RESINLASTDBC(9,ii,4,1)=DBUS(1,1,1,1)
	RESINLASTDBC(9,ii,4,2)=DBUS(2,1,3,2)
	RESINLASTDBC(9,ii,4,3)=OPLATE1(2,1,3)+(BSOLT+BUSTHICK)*(ii-1)
*ENDDO

!異形DBUS右側の小樹脂
*DO,ii,1,2,1
	RESINLASTDBC(10,ii,1,1)=DBUS(2,1,3,1)
	RESINLASTDBC(10,ii,1,2)=LCERA(1,2,2)
	RESINLASTDBC(10,ii,1,3)=OPLATE1(2,1,3)+(BSOLT+BUSTHICK)*(ii-1)
	RESINLASTDBC(10,ii,2,1)=DBUS(1,1,2,1)
	RESINLASTDBC(10,ii,2,2)=LCERA(1,2,2)
	RESINLASTDBC(10,ii,2,3)=OPLATE1(2,1,3)+(BSOLT+BUSTHICK)*(ii-1)
	RESINLASTDBC(10,ii,3,1)=DBUS(1,1,2,1)
	RESINLASTDBC(10,ii,3,2)=DBUS(2,1,3,2)
	RESINLASTDBC(10,ii,3,3)=OPLATE1(2,1,3)+(BSOLT+BUSTHICK)*(ii-1)
	RESINLASTDBC(10,ii,4,1)=DBUS(2,1,3,1)
	RESINLASTDBC(10,ii,4,2)=DBUS(2,1,3,2)
	RESINLASTDBC(10,ii,4,3)=OPLATE1(2,1,3)+(BSOLT+BUSTHICK)*(ii-1)
*ENDDO

!-----------------DBC間の全ての座標定義完了-----------------------------

!信号PINの間 DBUSも含む
*DO,ii,1,4,1
	*DO,jj,1,2,1
		RESINSIG(ii,jj,1,1)=SIGNAL(ii,jj,3,1)
		RESINSIG(ii,jj,1,2)=SIGNAL(ii,jj,3,2)-RESIN_UP
		RESINSIG(ii,jj,1,3)=BUSHEIGHT+(jj-1)*BUSTHICK
		RESINSIG(ii,jj,2,1)=SIGNAL(ii+1,jj,4,1)
		RESINSIG(ii,jj,2,2)=SIGNAL(ii+1,jj,4,2)-RESIN_UP
		RESINSIG(ii,jj,2,3)=BUSHEIGHT+(jj-1)*BUSTHICK
		RESINSIG(ii,jj,3,1)=SIGNAL(ii+1,jj,4,1)
		RESINSIG(ii,jj,3,2)=SIGNAL(ii+1,jj,4,2)
		RESINSIG(ii,jj,3,3)=BUSHEIGHT+(jj-1)*BUSTHICK
		RESINSIG(ii,jj,4,1)=SIGNAL(ii,jj,3,1)
		RESINSIG(ii,jj,4,2)=SIGNAL(ii,jj,3,2)
		RESINSIG(ii,jj,4,3)=BUSHEIGHT+(jj-1)*BUSTHICK
	*ENDDO
*ENDDO

ii=5
	*DO,jj,1,2,1
		RESINSIG(ii,jj,1,1)=SIGNAL(ii,jj,3,1)
		RESINSIG(ii,jj,1,2)=SIGNAL(ii,jj,3,2)-RESIN_UP
		RESINSIG(ii,jj,1,3)=BUSHEIGHT+(jj-1)*BUSTHICK
		RESINSIG(ii,jj,2,1)=DBUS(2,1,1,1)
		RESINSIG(ii,jj,2,2)=LCERA(1,1,2)-RESIN_UP
		RESINSIG(ii,jj,2,3)=BUSHEIGHT+(jj-1)*BUSTHICK
		RESINSIG(ii,jj,3,1)=DBUS(2,1,1,1)
		RESINSIG(ii,jj,3,2)=LCERA(1,1,2)
		RESINSIG(ii,jj,3,3)=BUSHEIGHT+(jj-1)*BUSTHICK
		RESINSIG(ii,jj,4,1)=SIGNAL(ii,jj,3,1)
		RESINSIG(ii,jj,4,2)=SIGNAL(ii,jj,3,2)
		RESINSIG(ii,jj,4,3)=BUSHEIGHT+(jj-1)*BUSTHICK
	*ENDDO

ii=6
	*DO,jj,1,2,1
		RESINSIG(ii,jj,1,1)=DBUS(2,1,2,1)
		RESINSIG(ii,jj,1,2)=SIGNAL(ii,jj,4,2)-RESIN_UP
		RESINSIG(ii,jj,1,3)=BUSHEIGHT+(jj-1)*BUSTHICK
		RESINSIG(ii,jj,2,1)=SIGNAL(ii,jj,4,1)
		RESINSIG(ii,jj,2,2)=LCERA(1,1,2)-RESIN_UP
		RESINSIG(ii,jj,2,3)=BUSHEIGHT+(jj-1)*BUSTHICK
		RESINSIG(ii,jj,3,1)=SIGNAL(ii,jj,4,1)
		RESINSIG(ii,jj,3,2)=LCERA(1,1,2)
		RESINSIG(ii,jj,3,3)=BUSHEIGHT+(jj-1)*BUSTHICK
		RESINSIG(ii,jj,4,1)=DBUS(2,1,2,1)
		RESINSIG(ii,jj,4,2)=SIGNAL(ii,jj,4,2)
		RESINSIG(ii,jj,4,3)=BUSHEIGHT+(jj-1)*BUSTHICK
	*ENDDO

*DO,ii,7,8,1
	*DO,jj,1,2,1
		RESINSIG(ii,jj,1,1)=SIGNAL(ii-1,jj,3,1)
		RESINSIG(ii,jj,1,2)=SIGNAL(ii-1,jj,3,2)-RESIN_UP
		RESINSIG(ii,jj,1,3)=BUSHEIGHT+(jj-1)*BUSTHICK
		RESINSIG(ii,jj,2,1)=SIGNAL(ii,jj,4,1)
		RESINSIG(ii,jj,2,2)=SIGNAL(ii,jj,4,2)-RESIN_UP
		RESINSIG(ii,jj,2,3)=BUSHEIGHT+(jj-1)*BUSTHICK
		RESINSIG(ii,jj,3,1)=SIGNAL(ii,jj,4,1)
		RESINSIG(ii,jj,3,2)=SIGNAL(ii,jj,4,2)
		RESINSIG(ii,jj,3,3)=BUSHEIGHT+(jj-1)*BUSTHICK
		RESINSIG(ii,jj,4,1)=SIGNAL(ii-1,jj,3,1)
		RESINSIG(ii,jj,4,2)=SIGNAL(ii-1,jj,3,2)
		RESINSIG(ii,jj,4,3)=BUSHEIGHT+(jj-1)*BUSTHICK
	*ENDDO
*ENDDO

!ONPバス間のみずかき樹脂	今回ははんだの厚みも含む
	*DO,ii,1,2,1
		RESINBUS(1,ii,1,1)=OBUS(2,1,2,1)
		RESINBUS(1,ii,1,2)=NBUS(2,1,3,2)
		RESINBUS(1,ii,1,3)=NPLATE1(2,4,3)+(BSOLT+BUSTHICK)*(ii-1)
		RESINBUS(1,ii,2,1)=NBUS(2,1,1,1)
		RESINBUS(1,ii,2,2)=NBUS(2,1,3,2)
		RESINBUS(1,ii,2,3)=NPLATE1(2,4,3)+(BSOLT+BUSTHICK)*(ii-1)
		RESINBUS(1,ii,3,1)=NBUS(2,1,1,1)
		RESINBUS(1,ii,3,2)=LCERA(1,4,2)+RESIN_LOW
		RESINBUS(1,ii,3,3)=NPLATE1(2,4,3)+(BSOLT+BUSTHICK)*(ii-1)
		RESINBUS(1,ii,4,1)=OBUS(2,1,2,1)
		RESINBUS(1,ii,4,2)=LCERA(1,4,2)+RESIN_LOW
		RESINBUS(1,ii,4,3)=NPLATE1(2,4,3)+(BSOLT+BUSTHICK)*(ii-1)
	*ENDDO

	*DO,ii,1,2,1
		RESINBUS(2,ii,1,1)=NBUS(2,1,2,1)
		RESINBUS(2,ii,1,2)=NBUS(2,1,3,2)
		RESINBUS(2,ii,1,3)=NPLATE1(2,4,3)+(BSOLT+BUSTHICK)*(ii-1)
		RESINBUS(2,ii,2,1)=PBUS(2,1,1,1)
		RESINBUS(2,ii,2,2)=NBUS(2,1,3,2)
		RESINBUS(2,ii,2,3)=NPLATE1(2,4,3)+(BSOLT+BUSTHICK)*(ii-1)
		RESINBUS(2,ii,3,1)=PBUS(2,1,1,1)
		RESINBUS(2,ii,3,2)=LCERA(1,4,2)+RESIN_LOW
		RESINBUS(2,ii,3,3)=NPLATE1(2,4,3)+(BSOLT+BUSTHICK)*(ii-1)
		RESINBUS(2,ii,4,1)=NBUS(2,1,2,1)
		RESINBUS(2,ii,4,2)=LCERA(1,4,2)+RESIN_LOW
		RESINBUS(2,ii,4,3)=NPLATE1(2,4,3)+(BSOLT+BUSTHICK)*(ii-1)
	*ENDDO

	*DO,ii,1,2,1
		RESINBUS(3,ii,1,1)=NBUS(3,1,1,1)
		RESINBUS(3,ii,1,2)=NBUS(3,1,1,2)
		RESINBUS(3,ii,1,3)=NPLATE1(2,4,3)+(BSOLT)*(ii-1)
		RESINBUS(3,ii,2,1)=NBUS(3,1,2,1)
		RESINBUS(3,ii,2,2)=NBUS(3,1,2,2)
		RESINBUS(3,ii,2,3)=NPLATE1(2,4,3)+(BSOLT)*(ii-1)
		RESINBUS(3,ii,3,1)=NBUS(3,1,2,1)
		RESINBUS(3,ii,3,2)=LCERA(1,4,2)+RESIN_LOW
		RESINBUS(3,ii,3,3)=NPLATE1(2,4,3)+(BSOLT)*(ii-1)
		RESINBUS(3,ii,4,1)=NBUS(3,1,1,1)
		RESINBUS(3,ii,4,2)=LCERA(1,4,2)+RESIN_LOW
		RESINBUS(3,ii,4,3)=NPLATE1(2,4,3)+(BSOLT)*(ii-1)
	*ENDDO


!-----------信号側の樹脂完成-------------------
	*DO,ii,1,2,1
		RESINSIG2(1,ii,1,1)=LCERA(1,1,1)
		RESINSIG2(1,ii,1,2)=LCERA(1,1,2)-RESIN_UP
		RESINSIG2(1,ii,1,3)=LOWCU(1,1,3)+PMTHICK*(ii-1)
		RESINSIG2(1,ii,2,1)=SIGNAL(1,1,1,1)
		RESINSIG2(1,ii,2,2)=LCERA(1,1,2)-RESIN_UP
		RESINSIG2(1,ii,2,3)=LOWCU(1,1,3)+PMTHICK*(ii-1)
		RESINSIG2(1,ii,3,1)=SIGNAL(1,1,1,1)
		RESINSIG2(1,ii,3,2)=LCERA(1,1,2)
		RESINSIG2(1,ii,3,3)=LOWCU(1,1,3)+PMTHICK*(ii-1)
		RESINSIG2(1,ii,4,1)=LCERA(1,1,1)
		RESINSIG2(1,ii,4,2)=LCERA(1,1,2)
		RESINSIG2(1,ii,4,3)=LOWCU(1,1,3)+PMTHICK*(ii-1)
	*ENDDO

	*DO,ii,1,2,1
		RESINSIG2(2,ii,1,1)=SIGNAL(1,1,1,1)
		RESINSIG2(2,ii,1,2)=LCERA(1,1,2)-RESIN_UP
		RESINSIG2(2,ii,1,3)=LOWCU(1,1,3)+BUSHEIGHT*(ii-1)
		RESINSIG2(2,ii,2,1)=SIGNAL(8,1,2,1)
		RESINSIG2(2,ii,2,2)=LCERA(1,1,2)-RESIN_UP
		RESINSIG2(2,ii,2,3)=LOWCU(1,1,3)+BUSHEIGHT*(ii-1)
		RESINSIG2(2,ii,3,1)=SIGNAL(8,1,2,1)
		RESINSIG2(2,ii,3,2)=LCERA(1,1,2)
		RESINSIG2(2,ii,3,3)=LOWCU(1,1,3)+BUSHEIGHT*(ii-1)
		RESINSIG2(2,ii,4,1)=SIGNAL(1,1,1,1)
		RESINSIG2(2,ii,4,2)=LCERA(1,1,2)
		RESINSIG2(2,ii,4,3)=LOWCU(1,1,3)+BUSHEIGHT*(ii-1)
	*ENDDO

	*DO,ii,1,2,1
		RESINSIG2(3,ii,1,1)=SIGNAL(1,1,1,1)
		RESINSIG2(3,ii,1,2)=LCERA(1,1,2)-RESIN_UP
		RESINSIG2(3,ii,1,3)=DBUS(2,2,1,3)+(PMTHICK-DBUS(2,2,1,3))*(ii-1)
		RESINSIG2(3,ii,2,1)=SIGNAL(8,1,2,1)
		RESINSIG2(3,ii,2,2)=LCERA(1,1,2)-RESIN_UP
		RESINSIG2(3,ii,2,3)=DBUS(2,2,1,3)+(PMTHICK-DBUS(2,2,1,3))*(ii-1)
		RESINSIG2(3,ii,3,1)=SIGNAL(8,1,2,1)
		RESINSIG2(3,ii,3,2)=LCERA(1,1,2)
		RESINSIG2(3,ii,3,3)=DBUS(2,2,1,3)+(PMTHICK-DBUS(2,2,1,3))*(ii-1)
		RESINSIG2(3,ii,4,1)=SIGNAL(1,1,1,1)
		RESINSIG2(3,ii,4,2)=LCERA(1,1,2)
		RESINSIG2(3,ii,4,3)=DBUS(2,2,1,3)+(PMTHICK-DBUS(2,2,1,3))*(ii-1)
	*ENDDO

	*DO,ii,1,2,1
		RESINSIG2(4,ii,1,1)=SIGNAL(8,1,2,1)
		RESINSIG2(4,ii,1,2)=LCERA(1,1,2)-RESIN_UP
		RESINSIG2(4,ii,1,3)=LOWCU(1,1,3)+PMTHICK*(ii-1)
		RESINSIG2(4,ii,2,1)=LCERA(1,2,1)
		RESINSIG2(4,ii,2,2)=LCERA(1,1,2)-RESIN_UP
		RESINSIG2(4,ii,2,3)=LOWCU(1,1,3)+PMTHICK*(ii-1)
		RESINSIG2(4,ii,3,1)=LCERA(1,2,1)
		RESINSIG2(4,ii,3,2)=LCERA(1,1,2)
		RESINSIG2(4,ii,3,3)=LOWCU(1,1,3)+PMTHICK*(ii-1)
		RESINSIG2(4,ii,4,1)=SIGNAL(8,1,2,1)
		RESINSIG2(4,ii,4,2)=LCERA(1,1,2)
		RESINSIG2(4,ii,4,3)=LOWCU(1,1,3)+PMTHICK*(ii-1)
	*ENDDO


!-----------バス側の樹脂完成-------------------
	*DO,ii,1,2,1
		RESINBUS2(1,ii,1,1)=LCERA(1,4,1)
		RESINBUS2(1,ii,1,2)=LCERA(1,4,2)
		RESINBUS2(1,ii,1,3)=LOWCU(1,1,3)+PMTHICK*(ii-1)
		RESINBUS2(1,ii,2,1)=OBUS(2,1,1,1)
		RESINBUS2(1,ii,2,2)=LCERA(1,4,2)
		RESINBUS2(1,ii,2,3)=LOWCU(1,1,3)+PMTHICK*(ii-1)
		RESINBUS2(1,ii,3,1)=OBUS(2,1,1,1)
		RESINBUS2(1,ii,3,2)=LCERA(1,4,2)+RESIN_LOW
		RESINBUS2(1,ii,3,3)=LOWCU(1,1,3)+PMTHICK*(ii-1)
		RESINBUS2(1,ii,4,1)=LCERA(1,4,1)
		RESINBUS2(1,ii,4,2)=LCERA(1,4,2)+RESIN_LOW
		RESINBUS2(1,ii,4,3)=LOWCU(1,1,3)+PMTHICK*(ii-1)
	*ENDDO

	*DO,ii,1,2,1
		RESINBUS2(2,ii,1,1)=OBUS(2,1,1,1)
		RESINBUS2(2,ii,1,2)=LCERA(1,4,2)
		RESINBUS2(2,ii,1,3)=LOWCU(1,1,3)+(BUSHEIGHT-BSOLT)*(ii-1)
		RESINBUS2(2,ii,2,1)=PBUS(2,1,2,1)
		RESINBUS2(2,ii,2,2)=LCERA(1,4,2)
		RESINBUS2(2,ii,2,3)=LOWCU(1,4,3)+(BUSHEIGHT-BSOLT)*(ii-1)
		RESINBUS2(2,ii,3,1)=PBUS(2,1,2,1)
		RESINBUS2(2,ii,3,2)=LCERA(1,4,2)+RESIN_LOW
		RESINBUS2(2,ii,3,3)=LOWCU(1,4,3)+(BUSHEIGHT-BSOLT)*(ii-1)
		RESINBUS2(2,ii,4,1)=OBUS(2,1,1,1)
		RESINBUS2(2,ii,4,2)=LCERA(1,4,2)+RESIN_LOW
		RESINBUS2(2,ii,4,3)=LOWCU(1,4,3)+(BUSHEIGHT-BSOLT)*(ii-1)
	*ENDDO

	*DO,ii,1,2,1
		RESINBUS2(3,ii,1,1)=OBUS(2,1,1,1)
		RESINBUS2(3,ii,1,2)=LCERA(1,4,2)
		RESINBUS2(3,ii,1,3)=DBUS(2,2,1,3)+(PMTHICK-DBUS(2,2,1,3))*(ii-1)
		RESINBUS2(3,ii,2,1)=PBUS(2,1,2,1)
		RESINBUS2(3,ii,2,2)=LCERA(1,4,2)
		RESINBUS2(3,ii,2,3)=DBUS(2,2,1,3)+(PMTHICK-DBUS(2,2,1,3))*(ii-1)
		RESINBUS2(3,ii,3,1)=PBUS(2,1,2,1)
		RESINBUS2(3,ii,3,2)=LCERA(1,4,2)+RESIN_LOW
		RESINBUS2(3,ii,3,3)=DBUS(2,2,1,3)+(PMTHICK-DBUS(2,2,1,3))*(ii-1)
		RESINBUS2(3,ii,4,1)=OBUS(2,1,1,1)
		RESINBUS2(3,ii,4,2)=LCERA(1,4,2)+RESIN_LOW
		RESINBUS2(3,ii,4,3)=DBUS(2,2,1,3)+(PMTHICK-DBUS(2,2,1,3))*(ii-1)
	*ENDDO

	*DO,ii,1,2,1
		RESINBUS2(4,ii,1,1)=PBUS(2,1,2,1)
		RESINBUS2(4,ii,1,2)=LCERA(1,4,2)
		RESINBUS2(4,ii,1,3)=LOWCU(1,1,3)+PMTHICK*(ii-1)
		RESINBUS2(4,ii,2,1)=LCERA(1,3,1)
		RESINBUS2(4,ii,2,2)=LCERA(1,3,2)
		RESINBUS2(4,ii,2,3)=LOWCU(1,1,3)+PMTHICK*(ii-1)
		RESINBUS2(4,ii,3,1)=LCERA(1,3,1)
		RESINBUS2(4,ii,3,2)=LCERA(1,3,2)+RESIN_LOW
		RESINBUS2(4,ii,3,3)=LOWCU(1,1,3)+PMTHICK*(ii-1)
		RESINBUS2(4,ii,4,1)=PBUS(2,1,2,1)
		RESINBUS2(4,ii,4,2)=LCERA(1,3,2)+RESIN_LOW
		RESINBUS2(4,ii,4,3)=LOWCU(1,1,3)+PMTHICK*(ii-1)
	*ENDDO

!---------サイドの樹脂　VOLはこれで完了-------------------
	*DO,ii,1,2,1
		RESINSIDE(1,ii,1,1)=0
		RESINSIDE(1,ii,1,2)=0
		RESINSIDE(1,ii,1,3)=(ii-1)*PMTHICK
		RESINSIDE(1,ii,2,1)=RESIN_SIDE
		RESINSIDE(1,ii,2,2)=0
		RESINSIDE(1,ii,2,3)=(ii-1)*PMTHICK
		RESINSIDE(1,ii,3,1)=RESIN_SIDE
		RESINSIDE(1,ii,3,2)=PMH
		RESINSIDE(1,ii,3,3)=(ii-1)*PMTHICK
		RESINSIDE(1,ii,4,1)=0
		RESINSIDE(1,ii,4,2)=PMH
		RESINSIDE(1,ii,4,3)=(ii-1)*PMTHICK
	*ENDDO

	*DO,ii,1,2,1
		RESINSIDE(2,ii,1,1)=PMW-RESIN_SIDE
		RESINSIDE(2,ii,1,2)=0
		RESINSIDE(2,ii,1,3)=(ii-1)*PMTHICK
		RESINSIDE(2,ii,2,1)=PMW
		RESINSIDE(2,ii,2,2)=0
		RESINSIDE(2,ii,2,3)=(ii-1)*PMTHICK
		RESINSIDE(2,ii,3,1)=PMW
		RESINSIDE(2,ii,3,2)=PMH
		RESINSIDE(2,ii,3,3)=(ii-1)*PMTHICK
		RESINSIDE(2,ii,4,1)=PMW-RESIN_SIDE
		RESINSIDE(2,ii,4,2)=PMH
		RESINSIDE(2,ii,4,3)=(ii-1)*PMTHICK
	*ENDDO

!忘れてた、樹脂追加　上DBCオフセット分だよ
	*DO,ii,1,2,1
		RESINOFFSET(1,ii,1,1)=LCERA(1,1,1)
		RESINOFFSET(1,ii,1,2)=LCERA(1,1,2)
		RESINOFFSET(1,ii,1,3)=(ii-2)*(PLATEUPZ+PLATEUPZ2+PLATEUPZ3+DBC_CERA_UPT+DBC_CERA_UPT2)+PMTHICK
		RESINOFFSET(1,ii,2,1)=LCERA(1,2,1)
		RESINOFFSET(1,ii,2,2)=LCERA(1,2,2)
		RESINOFFSET(1,ii,2,3)=(ii-2)*(PLATEUPZ+PLATEUPZ2+PLATEUPZ3+DBC_CERA_UPT+DBC_CERA_UPT2)+PMTHICK
		RESINOFFSET(1,ii,3,1)=UCERA(1,2,1)
		RESINOFFSET(1,ii,3,2)=UCERA(1,2,2)
		RESINOFFSET(1,ii,3,3)=(ii-2)*(PLATEUPZ+PLATEUPZ2+PLATEUPZ3+DBC_CERA_UPT+DBC_CERA_UPT2)+PMTHICK
		RESINOFFSET(1,ii,4,1)=UCERA(1,1,1)
		RESINOFFSET(1,ii,4,2)=UCERA(1,1,2)
		RESINOFFSET(1,ii,4,3)=(ii-2)*(PLATEUPZ+PLATEUPZ2+PLATEUPZ3+DBC_CERA_UPT+DBC_CERA_UPT2)+PMTHICK
	*ENDDO

	*DO,ii,1,2,1
		RESINOFFSET(2,ii,1,1)=UCERA(1,4,1)
		RESINOFFSET(2,ii,1,2)=UCERA(1,4,2)
		RESINOFFSET(2,ii,1,3)=(ii-2)*(PLATEUPZ+PLATEUPZ2+PLATEUPZ3+DBC_CERA_UPT+DBC_CERA_UPT2)+PMTHICK
		RESINOFFSET(2,ii,2,1)=UCERA(1,3,1)
		RESINOFFSET(2,ii,2,2)=UCERA(1,3,2)
		RESINOFFSET(2,ii,2,3)=(ii-2)*(PLATEUPZ+PLATEUPZ2+PLATEUPZ3+DBC_CERA_UPT+DBC_CERA_UPT2)+PMTHICK
		RESINOFFSET(2,ii,3,1)=LCERA(1,3,1)
		RESINOFFSET(2,ii,3,2)=LCERA(1,3,2)
		RESINOFFSET(2,ii,3,3)=(ii-2)*(PLATEUPZ+PLATEUPZ2+PLATEUPZ3+DBC_CERA_UPT+DBC_CERA_UPT2)+PMTHICK
		RESINOFFSET(2,ii,4,1)=LCERA(1,4,1)
		RESINOFFSET(2,ii,4,2)=LCERA(1,4,2)
		RESINOFFSET(2,ii,4,3)=(ii-2)*(PLATEUPZ+PLATEUPZ2+PLATEUPZ3+DBC_CERA_UPT+DBC_CERA_UPT2)+PMTHICK
	*ENDDO

!-----------------------------------まずは材料の指定----------------------------------------

/ang,1					!/ANGLEの略　表示の回転。ここではデフォルトのようだ
/vup,1,z				!参照方向指定。画面1をZ-Y平面で表示　の方向を指示
/view,1,1,1,1				!モデルの参照方向の変更であるとのこと。XV(2つめのPARA)にWPナンバのみを指定するとそのWPに垂直な視点が設定される
/prep7
/pnum,mat,on !ここは要素への材料色の指定
/num,1
/prep7
					!再描画コマンド
!----材料の設定
!*
MAT,1,  !はんだ
MPREAD,'D:\Userarea\Documents\ANSYS_CAE\material\SI_UNIT_DATA\SnAgCu','SI_MPL',,LIB
!*
MPLIST,1
TBLIST,ALL,1
!*
MAT,2,  !Si
MPREAD,'D:\Userarea\Documents\ANSYS_CAE\material\SI_UNIT_DATA\SI','SI_MPL',,LIB
!*
!MPLIST,2
!TBLIST,ALL,2
!*
MAT,3,  !銅
MPREAD,'D:\Userarea\Documents\ANSYS_CAE\material\SI_UNIT_DATA\CU','SI_MPL',,LIB
!*
!MPLIST,3
!TBLIST,ALL,3
!*
MAT,4,  !Si3N4
MPREAD,'D:\Userarea\Documents\ANSYS_CAE\material\SI_UNIT_DATA\SIN','SI_MPL',,LIB
!*
MAT,5,  !アルミ
MPREAD,'D:\Userarea\Documents\ANSYS_CAE\material\SI_UNIT_DATA\Al','SI_MPL',,LIB
!*
MAT,6,  !CuMo
MPREAD,'D:\Userarea\Documents\ANSYS_CAE\material\SI_UNIT_DATA\CuMo','SI_MPL',,LIB
!材料の設定　石塚

MAT,7,  !樹脂
MPREAD,'D:\Userarea\Documents\ANSYS_CAE\material\SI_UNIT_DATA\Xresin','SI_MPL',,LIB
!材料の設定　石塚

MAT,8,  !応力を評価しない樹脂
MPREAD,'D:\Userarea\Documents\ANSYS_CAE\material\SI_UNIT_DATA\resin','SI_MPL',,LIB
!材料の設定　石塚
!応力を評価しない樹脂は　分けてナンバーを8にする

MAT,9,  !SiC
MPREAD,'D:\Userarea\Documents\ANSYS_CAE\material\SI_UNIT_DATA\SIC','SI_MPL',,LIB
!材料の設定　石塚


!----------------ここからボリューム作成＆メッシュ切り 2018.6.5 石塚------------------------
et,1,90			!これがTYPE,1 に指定するメッシュ要素 ヘキサ　高次	121008 これは伝熱用接点であることが判明
!et,1,186			!こちらが、構造用接点
et,2,200,7		!200はMESH200 OPTIONの7は3次元的なゆがみを許容する四角形面要素　8節点を有する

*DO,ii,1,2,1
	*DO,jj,1,4,1
		K,(ii-1)*4+jj,LCERA(ii,jj,1),LCERA(ii,jj,2),LCERA(ii,jj,3)
	*ENDDO
*ENDDO

V,1,2,3,4,5,6,7,8

MAT,4
TYPE,1	!ET,1のことヘキサメッシュ
MSHAP,0,3d	!0:四角形状　3d：3次元
MSHK,1		!MSHKEYの省略形 1はマップ°メッシュ
D_CERAX=NINT((LCERA(1,2,1)-LCERA(1,1,1))/M_PLTX)
D_CERAY=NINT((LCERA(1,3,2)-LCERA(1,2,2))/M_PLTY)


lsel,s,,,5,11,2
lesiz,all,,,D_CERAZ	!z分割
lsel,all
lsel,s,,,2
lsel,a,,,4,12,4		!長手方向の４辺を選択
lesiz,all,,,D_CERAY	!たぶん40分割　-20は1/20を指定しているはず　エッジ部分のサイズ
lsel,s,,,3
lsel,a,,,10		!短い4辺を選択
lsel,a,,,6		!短い4辺を選択
lsel,a,,,1
lesiz,all,,,D_CERAX	!たぶん20分割　-20は1/20を指定しているはず　エッジ部分のサイズ
lsel,all
vmesh,1		!ボリュームメッシュ

!-------下側DBCセラ上の銅を作成
MAT,3
TYPE,1	!ET,1のことヘキサメッシュ
MSHAP,0,3d	!0:四角形状　3d：3次元
MSHK,1		!MSHKEYの省略形 1はマップ°メッシュ

*DO,ii,1,2,1
	*DO,jj,1,4,1
		K,8+(ii-1)*4+jj,OPLATE1(ii,jj,1),OPLATE1(ii,jj,2),OPLATE1(ii,jj,3)
	*ENDDO
*ENDDO

V,8+1,8+2,8+3,8+4,8+5,8+6,8+7,8+8

D_PLTX=NINT((OPLATE1(1,2,1)-OPLATE1(1,1,1))/M_PLTX)
D_PLTY=NINT((OPLATE1(1,3,2)-OPLATE1(1,2,2))/M_PLTY)
D_PLTZ=NINT((OPLATE1(2,1,3)-OPLATE1(1,1,3))/M_PLTZ)
*IF,D_PLTZ,LT,3,THEN
	D_PLTZ=3
*ENDIF

lsel,s,,,12+5,
lesiz,all,,,D_PLTZ	!z分割
lsel,all
lsel,s,,,12+2
lesiz,all,,,D_PLTY	!たぶん40分割　-20は1/20を指定しているはず　エッジ部分のサイズ
lsel,S,,,12+1
lesiz,all,,,D_PLTX	!たぶん20分割　-20は1/20を指定しているはず　エッジ部分のサイズ
lsel,all
vmesh,2		!ボリュームメッシュ


*DO,ii,1,2,1
	*DO,jj,1,4,1
		K,16+(ii-1)*4+jj,OPLATE2(ii,jj,1),OPLATE2(ii,jj,2),OPLATE2(ii,jj,3)
	*ENDDO
*ENDDO
V,16+1,16+2,16+3,16+4,16+5,16+6,16+7,16+8
D_PLTX=NINT((OPLATE2(1,2,1)-OPLATE2(1,1,1))/M_PLTX)
D_PLTY=NINT((OPLATE2(1,3,2)-OPLATE2(1,2,2))/M_PLTY)
!D_PLTZ=NINT((OPLATE2(2,1,3)-OPLATE2(1,1,3))/M_PLTZ)
lsel,s,,,24+5,
lesiz,all,,,D_PLTZ	!z分割
lsel,all
lsel,s,,,24+2
lesiz,all,,,D_PLTY	!たぶん40分割　-20は1/20を指定しているはず　エッジ部分のサイズ
lsel,S,,,24+1
lesiz,all,,,D_PLTX	!たぶん20分割　-20は1/20を指定しているはず　エッジ部分のサイズ
lsel,all
vmesh,3		!ボリュームメッシュ

*DO,ii,1,2,1
	*DO,jj,1,4,1
		K,24+(ii-1)*4+jj,OPLATE3(ii,jj,1),OPLATE3(ii,jj,2),OPLATE3(ii,jj,3)
	*ENDDO
*ENDDO
V,24+1,24+2,24+3,24+4,24+5,24+6,24+7,24+8
D_PLTX=NINT((OPLATE3(1,2,1)-OPLATE3(1,1,1))/M_PLTX)
D_PLTY=NINT((OPLATE3(1,3,2)-OPLATE3(1,2,2))/M_PLTY)
!D_PLTZ=NINT((OPLATE3(2,1,3)-OPLATE3(1,1,3))/M_PLTZ)
lsel,s,,,36+5,
lesiz,all,,,D_PLTZ	!z分割
lsel,all
lsel,s,,,36+2
lesiz,all,,,D_PLTY	!たぶん40分割　-20は1/20を指定しているはず　エッジ部分のサイズ
lsel,S,,,36+1
lesiz,all,,,D_PLTX	!たぶん20分割　-20は1/20を指定しているはず　エッジ部分のサイズ
lsel,all
vmesh,4		!ボリュームメッシュ


*DO,ii,1,2,1
	*DO,jj,1,4,1
		K,32+(ii-1)*4+jj,PPLATE1(ii,jj,1),PPLATE1(ii,jj,2),PPLATE1(ii,jj,3)
	*ENDDO
*ENDDO
V,32+1,32+2,32+3,32+4,32+5,32+6,32+7,32+8
D_PLTX=NINT((PPLATE1(1,2,1)-PPLATE1(1,1,1))/M_PLTX)
D_PLTY=NINT((PPLATE1(1,3,2)-PPLATE1(1,2,2))/M_PLTY)
!D_PLTZ=NINT((PPLATE1(2,1,3)-PPLATE1(1,1,3))/M_PLTZ)
lsel,s,,,48+5,
lesiz,all,,,D_PLTZ	!z分割
lsel,all
lsel,s,,,48+2
lesiz,all,,,D_PLTY	!たぶん40分割　-20は1/20を指定しているはず　エッジ部分のサイズ
lsel,S,,,48+1
lesiz,all,,,D_PLTX	!たぶん20分割　-20は1/20を指定しているはず　エッジ部分のサイズ
lsel,all
vmesh,5		!ボリュームメッシュ

*DO,ii,1,2,1
	*DO,jj,1,4,1
		K,40+(ii-1)*4+jj,PPLATE2(ii,jj,1),PPLATE2(ii,jj,2),PPLATE2(ii,jj,3)
	*ENDDO
*ENDDO
V,40+1,40+2,40+3,40+4,40+5,40+6,40+7,40+8
D_PLTX=NINT((PPLATE2(1,2,1)-PPLATE2(1,1,1))/M_PLTX)
D_PLTY=NINT((PPLATE2(1,3,2)-PPLATE2(1,2,2))/M_PLTY)
!D_PLTZ=NINT((PPLATE2(2,1,3)-PPLATE2(1,1,3))/M_PLTZ)
lsel,s,,,60+5,
lesiz,all,,,D_PLTZ	!z分割
lsel,all
lsel,s,,,60+2
lesiz,all,,,D_PLTY	!たぶん40分割　-20は1/20を指定しているはず　エッジ部分のサイズ
lsel,S,,,60+1
lesiz,all,,,D_PLTX	!たぶん20分割　-20は1/20を指定しているはず　エッジ部分のサイズ
lsel,all
vmesh,6		!ボリュームメッシュ

*DO,ii,1,2,1
	*DO,jj,1,4,1
		K,48+(ii-1)*4+jj,NPLATE1(ii,jj,1),NPLATE1(ii,jj,2),NPLATE1(ii,jj,3)
	*ENDDO
*ENDDO
V,48+1,48+2,48+3,48+4,48+5,48+6,48+7,48+8
D_PLTX=NINT((NPLATE1(1,2,1)-NPLATE1(1,1,1))/M_PLTX)
D_PLTY=NINT((NPLATE1(1,3,2)-NPLATE1(1,2,2))/M_PLTY)
!D_PLTZ=NINT((NPLATE1(2,1,3)-NPLATE1(1,1,3))/M_PLTZ)
lsel,s,,,72+5,
lesiz,all,,,D_PLTZ	!z分割
lsel,all
lsel,s,,,72+2
lesiz,all,,,D_PLTY	!たぶん40分割　-20は1/20を指定しているはず　エッジ部分のサイズ
lsel,S,,,72+1
lesiz,all,,,D_PLTX	!たぶん20分割　-20は1/20を指定しているはず　エッジ部分のサイズ
lsel,all
vmesh,7		!ボリュームメッシュ


!--ここからTHERMとDUM-------------------
*DO,ii,1,2,1
	*DO,jj,1,4,1
		K,56+(ii-1)*4+jj,THERM(ii,jj,1),THERM(ii,jj,2),THERM(ii,jj,3)
	*ENDDO
*ENDDO
V,56+1,56+2,56+3,56+4,56+5,56+6,56+7,56+8
D_PLTX=NINT((THERM(1,2,1)-THERM(1,1,1))/M_PLTX)
D_PLTY=NINT((THERM(1,3,2)-THERM(1,2,2))/M_PLTY)
!D_PLTZ=NINT((THERM(2,1,3)-THERM(1,1,3))/M_PLTZ)
lsel,s,,,84+5,
lesiz,all,,,D_PLTZ	!z分割
lsel,all
lsel,s,,,84+2
lesiz,all,,,D_PLTY	!たぶん40分割　-20は1/20を指定しているはず　エッジ部分のサイズ
lsel,S,,,84+1
lesiz,all,,,D_PLTX	!たぶん20分割　-20は1/20を指定しているはず　エッジ部分のサイズ
lsel,all
vmesh,8		!ボリュームメッシュ

!-------信号島---------------------------
*DO,ii,1,2,1
	*DO,jj,1,4,1
		K,64+(ii-1)*4+jj,OSSIGNAL(ii,jj,1),OSSIGNAL(ii,jj,2),OSSIGNAL(ii,jj,3)
	*ENDDO
*ENDDO
V,64+1,64+2,64+3,64+4,64+5,64+6,64+7,64+8
D_PLTX=NINT((OSSIGNAL(1,2,1)-OSSIGNAL(1,1,1))/M_PLTX)
D_PLTY=NINT((OSSIGNAL(1,3,2)-OSSIGNAL(1,2,2))/M_PLTY)
!D_PLTZ=NINT((OSSIGNAL(2,1,3)-OSSIGNAL(1,1,3))/M_PLTZ)
lsel,s,,,96+5,
lesiz,all,,,D_PLTZ	!z分割
lsel,all
lsel,s,,,96+2
lesiz,all,,,D_PLTY	!たぶん40分割　-20は1/20を指定しているはず　エッジ部分のサイズ
lsel,S,,,96+1
lesiz,all,,,D_PLTX	!たぶん20分割　-20は1/20を指定しているはず　エッジ部分のサイズ
lsel,all
vmesh,9		!ボリュームメッシュ


*DO,ii,1,2,1
	*DO,jj,1,4,1
		K,72+(ii-1)*4+jj,OGSIGNAL(ii,jj,1),OGSIGNAL(ii,jj,2),OGSIGNAL(ii,jj,3)
	*ENDDO
*ENDDO
V,72+1,72+2,72+3,72+4,72+5,72+6,72+7,72+8
D_PLTX=NINT((OGSIGNAL(1,2,1)-OGSIGNAL(1,1,1))/M_PLTX)
D_PLTY=NINT((OGSIGNAL(1,3,2)-OGSIGNAL(1,2,2))/M_PLTY)
!D_PLTZ=NINT((OGSIGNAL(2,1,3)-OGSIGNAL(1,1,3))/M_PLTZ)
lsel,s,,,108+5,
lesiz,all,,,D_PLTZ	!z分割
lsel,all
lsel,s,,,108+2
lesiz,all,,,D_PLTY	!たぶん40分割　-20は1/20を指定しているはず　エッジ部分のサイズ
lsel,S,,,108+1
lesiz,all,,,D_PLTX	!たぶん20分割　-20は1/20を指定しているはず　エッジ部分のサイズ
lsel,all
vmesh,10		!ボリュームメッシュ


*DO,ii,1,2,1
	*DO,jj,1,4,1
		K,80+(ii-1)*4+jj,PSSIGNAL(ii,jj,1),PSSIGNAL(ii,jj,2),PSSIGNAL(ii,jj,3)
	*ENDDO
*ENDDO
V,80+1,80+2,80+3,80+4,80+5,80+6,80+7,80+8
D_PLTX=NINT((PSSIGNAL(1,2,1)-PSSIGNAL(1,1,1))/M_PLTX)
D_PLTY=NINT((PSSIGNAL(1,3,2)-PSSIGNAL(1,2,2))/M_PLTY)
!D_PLTZ=NINT((PSSIGNAL(2,1,3)-PSSIGNAL(1,1,3))/M_PLTZ)
lsel,s,,,120+5,
lesiz,all,,,D_PLTZ	!z分割
lsel,all
lsel,s,,,120+2
lesiz,all,,,D_PLTY	!たぶん40分割　-20は1/20を指定しているはず　エッジ部分のサイズ
lsel,S,,,120+1
lesiz,all,,,D_PLTX	!たぶん20分割　-20は1/20を指定しているはず　エッジ部分のサイズ
lsel,all
vmesh,11		!ボリュームメッシュ


*DO,ii,1,2,1
	*DO,jj,1,4,1
		K,88+(ii-1)*4+jj,PGSIGNAL(ii,jj,1),PGSIGNAL(ii,jj,2),PGSIGNAL(ii,jj,3)
	*ENDDO
*ENDDO
V,88+1,88+2,88+3,88+4,88+5,88+6,88+7,88+8
D_PLTX=NINT((PGSIGNAL(1,2,1)-PGSIGNAL(1,1,1))/M_PLTX)
D_PLTY=NINT((PGSIGNAL(1,3,2)-PGSIGNAL(1,2,2))/M_PLTY)
!D_PLTZ=NINT((PGSIGNAL(2,1,3)-PGSIGNAL(1,1,3))/M_PLTZ)
lsel,s,,,132+5,
lesiz,all,,,D_PLTZ	!z分割
lsel,all
lsel,s,,,132+2
lesiz,all,,,D_PLTY	!たぶん40分割　-20は1/20を指定しているはず　エッジ部分のサイズ
lsel,S,,,132+1
lesiz,all,,,D_PLTX	!たぶん20分割　-20は1/20を指定しているはず　エッジ部分のサイズ
lsel,all
vmesh,12		!ボリュームメッシュ

!-------------ここから樹脂-----------------------
MAT,7
TYPE,1	!ET,1のことヘキサメッシュ
MSHAP,0,3d	!0:四角形状　3d：3次元
MSHK,1		!MSHKEYの省略形 1はマップ°メッシュ

*DO,ii,1,2,1
		K,96+(ii-1)*4+1,OSSIGNAL(ii,1,1)-ENGAWA,LCERA(ii,1,2),OSSIGNAL(ii,1,3)
		K,96+(ii-1)*4+2,PPLATE2(ii,2,1)+ENGAWA,LCERA(ii,1,2),PSSIGNAL(ii,2,3)
		K,96+(ii-1)*4+3,PPLATE2(ii,2,1),PSSIGNAL(ii,2,2),PSSIGNAL(ii,2,3)
		K,96+(ii-1)*4+4,OSSIGNAL(ii,1,1),PSSIGNAL(ii,2,2),PSSIGNAL(ii,2,3)
*ENDDO
V,96+1,96+2,96+3,96+4,96+5,96+6,96+7,96+8
D_PLTX=NINT((PSSIGNAL(1,2,1)-THERM(1,1,1))/M_RESINX)
D_PLTY=NINT((PSSIGNAL(1,1,2)-LCERA(1,1,2))/M_RESINY)
!D_PLTZ=NINT((PSSIGNAL(2,1,3)-PSSIGNAL(1,1,3))/M_RESINZ)
lsel,s,,,144+5,
lesiz,all,,,D_PLTZ	!z分割
lsel,all
lsel,s,,,144+2
lesiz,all,,,D_PLTY	!たぶん40分割　-20は1/20を指定しているはず　エッジ部分のサイズ
lsel,S,,,144+1
lesiz,all,,,D_PLTX	!たぶん20分割　-20は1/20を指定しているはず　エッジ部分のサイズ
lsel,all
vmesh,13		!ボリュームメッシュ

*DO,ii,1,2,1
		K,104+(ii-1)*4+1,OSSIGNAL(ii,4,1),OSSIGNAL(ii,4,2),OSSIGNAL(ii,4,3)
		K,104+(ii-1)*4+2,OSSIGNAL(ii,3,1),OSSIGNAL(ii,3,2),OSSIGNAL(ii,3,3)
		K,104+(ii-1)*4+3,OGSIGNAL(ii,2,1),OGSIGNAL(ii,2,2),OGSIGNAL(ii,2,3)
		K,104+(ii-1)*4+4,OGSIGNAL(ii,1,1),OGSIGNAL(ii,1,2),OGSIGNAL(ii,1,3)
*ENDDO
V,104+1,104+2,104+3,104+4,104+5,104+6,104+7,104+8
D_PLTX=NINT((OSSIGNAL(1,2,1)-OSSIGNAL(1,1,1))/M_RESINX)
D_PLTY=NINT((OGSIGNAL(1,2,2)-OSSIGNAL(1,3,2))/M_RESINY)
!D_PLTZ=NINT((OSSIGNAL(2,1,3)-OSSIGNAL(1,1,3))/M_RESINZ)
lsel,s,,,156+5,
lesiz,all,,,D_PLTZ	!z分割
lsel,all
lsel,s,,,156+2
lesiz,all,,,D_PLTY	!たぶん40分割　-20は1/20を指定しているはず　エッジ部分のサイズ
lsel,S,,,156+1
lesiz,all,,,D_PLTX	!たぶん20分割　-20は1/20を指定しているはず　エッジ部分のサイズ
lsel,all
vmesh,14		!ボリュームメッシュ

*DO,ii,1,2,1
		K,112+(ii-1)*4+1,PSSIGNAL(ii,4,1),PSSIGNAL(ii,4,2),PSSIGNAL(ii,4,3)
		K,112+(ii-1)*4+2,PSSIGNAL(ii,3,1),PSSIGNAL(ii,3,2),PSSIGNAL(ii,3,3)
		K,112+(ii-1)*4+3,PGSIGNAL(ii,2,1),PGSIGNAL(ii,2,2),PGSIGNAL(ii,2,3)
		K,112+(ii-1)*4+4,PGSIGNAL(ii,1,1),PGSIGNAL(ii,1,2),PGSIGNAL(ii,1,3)
*ENDDO
V,112+1,112+2,112+3,112+4,112+5,112+6,112+7,112+8
D_PLTX=NINT((PSSIGNAL(1,2,1)-PSSIGNAL(1,1,1))/M_RESINX)
D_PLTY=NINT((PGSIGNAL(1,2,2)-PSSIGNAL(1,3,2))/M_RESINY)
!D_PLTZ=NINT((PSSIGNAL(2,1,3)-PSSIGNAL(1,1,3))/M_RESINZ)
lsel,s,,,168+5,
lesiz,all,,,D_PLTZ	!z分割
lsel,all
lsel,s,,,168+2
lesiz,all,,,D_PLTY	!たぶん40分割　-20は1/20を指定しているはず　エッジ部分のサイズ
lsel,S,,,168+1
lesiz,all,,,D_PLTX	!たぶん20分割　-20は1/20を指定しているはず　エッジ部分のサイズ
lsel,all
vmesh,15		!ボリュームメッシュ


*DO,ii,1,2,1
		K,120+(ii-1)*4+1,OGSIGNAL(ii,4,1),OGSIGNAL(ii,4,2),OGSIGNAL(ii,4,3)
		K,120+(ii-1)*4+2,OPLATE3(ii,4,1),OGSIGNAL(ii,3,2),OGSIGNAL(ii,3,3)
		K,120+(ii-1)*4+3,OPLATE2(ii,2,1),OPLATE2(ii,2,2),OPLATE2(ii,2,3)
		K,120+(ii-1)*4+4,OPLATE1(ii,1,1),OPLATE1(ii,1,2),OPLATE1(ii,1,3)
*ENDDO
V,120+1,120+2,120+3,120+4,120+5,120+6,120+7,120+8
D_PLTX=NINT((OPLATE3(1,4,1)-OGSIGNAL(1,4,1))/M_RESINX)
D_PLTY=NINT((OPLATE2(1,1,2)-OGSIGNAL(1,3,2))/M_RESINY)
!D_PLTZ=NINT((OPLATE1(2,1,3)-OPLATE1(1,1,3))/M_RESINZ)
lsel,s,,,180+5,
lesiz,all,,,D_PLTZ	!z分割
lsel,all
lsel,s,,,180+2
lesiz,all,,,D_PLTY	!たぶん40分割　-20は1/20を指定しているはず　エッジ部分のサイズ
lsel,S,,,180+1
lesiz,all,,,D_PLTX	!たぶん20分割　-20は1/20を指定しているはず　エッジ部分のサイズ
lsel,all
vmesh,16		!ボリュームメッシュ


*DO,ii,1,2,1
		K,128+(ii-1)*4+1,PGSIGNAL(ii,4,1),PGSIGNAL(ii,4,2),PGSIGNAL(ii,4,3)
		K,128+(ii-1)*4+2,PPLATE2(ii,1,1),PGSIGNAL(ii,3,2),PGSIGNAL(ii,3,3)
		K,128+(ii-1)*4+3,PPLATE2(ii,4,1),PPLATE2(ii,4,2),PPLATE2(ii,4,3)
		K,128+(ii-1)*4+4,PPLATE1(ii,1,1),PPLATE1(ii,1,2),PPLATE1(ii,1,3)
*ENDDO
V,128+1,128+2,128+3,128+4,128+5,128+6,128+7,128+8
D_PLTX=NINT((PPLATE2(1,1,1)-PGSIGNAL(1,4,1))/M_RESINX)
D_PLTY=NINT((PPLATE2(1,3,2)-PGSIGNAL(1,3,2))/M_RESINY)
!D_PLTZ=NINT((PPLATE1(2,1,3)-PPLATE1(1,1,3))/M_RESINZ)
lsel,s,,,192+5,
lesiz,all,,,D_PLTZ	!z分割
lsel,all
lsel,s,,,192+2
lesiz,all,,,D_PLTY	!たぶん40分割　-20は1/20を指定しているはず　エッジ部分のサイズ
lsel,S,,,192+1
lesiz,all,,,D_PLTX	!たぶん20分割　-20は1/20を指定しているはず　エッジ部分のサイズ
lsel,all
vmesh,17		!ボリュームメッシュ


!O-N島間の横の樹脂
*DO,ii,1,2,1
		K,136+(ii-1)*4+1,OPLATE3(ii,4,1),OPLATE3(ii,4,2),OPLATE3(ii,4,3)
		K,136+(ii-1)*4+2,OPLATE3(ii,3,1),OPLATE3(ii,3,2),OPLATE3(ii,3,3)
		K,136+(ii-1)*4+3,NPLATE1(ii,2,1),NPLATE1(ii,2,2),NPLATE1(ii,2,3)
		K,136+(ii-1)*4+4,NPLATE1(ii,1,1),NPLATE1(ii,1,2),NPLATE1(ii,1,3)
*ENDDO
V,136+1,136+2,136+3,136+4,136+5,136+6,136+7,136+8
D_PLTX=NINT((OPLATE3(1,3,1)-OPLATE3(1,4,1))/M_RESINX)
D_PLTY=NINT((NPLATE1(1,2,2)-OPLATE3(1,3,2))/M_RESINY)
!D_PLTZ=NINT((NPLATE1(2,1,3)-NPLATE1(1,1,3))/M_RESINZ)
lsel,s,,,204+5,
lesiz,all,,,D_PLTZ	!z分割
lsel,all
lsel,s,,,204+2
lesiz,all,,,D_PLTY	!たぶん40分割　-20は1/20を指定しているはず　エッジ部分のサイズ
lsel,S,,,204+1
lesiz,all,,,D_PLTX	!たぶん20分割　-20は1/20を指定しているはず　エッジ部分のサイズ
lsel,all
vmesh,18		!ボリュームメッシュ

!縦方向の樹脂----------------------------------
!TRM島の左右
*DO,ii,1,2,1
		K,144+(ii-1)*4+1,OSSIGNAL(ii,2,1),OSSIGNAL(ii,2,2),OSSIGNAL(ii,2,3)
		K,144+(ii-1)*4+2,THERM(ii,1,1),THERM(ii,1,2),THERM(ii,1,3)
		K,144+(ii-1)*4+3,THERM(ii,4,1),THERM(ii,4,2),THERM(ii,4,3)
		K,144+(ii-1)*4+4,OGSIGNAL(ii,3,1),OGSIGNAL(ii,3,2),OGSIGNAL(ii,3,3)
*ENDDO
V,144+1,144+2,144+3,144+4,144+5,144+6,144+7,144+8
D_PLTX=NINT((THERM(1,1,1)-OSSIGNAL(1,2,1))/M_RESINX)
D_PLTY=NINT((THERM(1,4,2)-THERM(1,1,2))/M_RESINY)
!D_PLTZ=NINT((THERM(2,4,3-THERM(1,4,3))/M_RESINZ)
lsel,s,,,216+5,
lesiz,all,,,D_PLTZ	!z分割
lsel,all
lsel,s,,,216+2
lesiz,all,,,D_PLTY	!たぶん40分割　-20は1/20を指定しているはず　エッジ部分のサイズ
lsel,S,,,216+1
lesiz,all,,,D_PLTX	!たぶん20分割　-20は1/20を指定しているはず　エッジ部分のサイズ
lsel,all
vmesh,19		!ボリュームメッシュ

*DO,ii,1,2,1
		K,152+(ii-1)*4+1,THERM(ii,2,1),THERM(ii,2,2),THERM(ii,2,3)
		K,152+(ii-1)*4+2,OPLATE3(ii,1,1),OPLATE3(ii,1,2),OPLATE3(ii,1,3)
		K,152+(ii-1)*4+3,OPLATE3(ii,4,1),THERM(ii,3,2),OPLATE3(ii,4,3)
		K,152+(ii-1)*4+4,THERM(ii,3,1),THERM(ii,3,2),THERM(ii,3,3)
*ENDDO
V,152+1,152+2,152+3,152+4,152+5,152+6,152+7,152+8
D_PLTX=NINT((OPLATE3(1,1,1)-THERM(1,2,1))/M_RESINX)
D_PLTY=NINT((THERM(1,3,2)-THERM(1,2,2))/M_RESINY)
!D_PLTZ=NINT((THERM(2,4,3)-THERM(1,4,3))/M_RESINZ)
lsel,s,,,228+5,
lesiz,all,,,D_PLTZ	!z分割
lsel,all
lsel,s,,,228+2
lesiz,all,,,D_PLTY	!たぶん40分割　-20は1/20を指定しているはず　エッジ部分のサイズ
lsel,S,,,228+1
lesiz,all,,,D_PLTX	!たぶん20分割　-20は1/20を指定しているはず　エッジ部分のサイズ
lsel,all
vmesh,20		!ボリュームメッシュ


!O-N島の間の縦の樹脂
*DO,ii,1,2,1
		K,160+(ii-1)*4+1,OPLATE2(ii,4,1),OPLATE2(ii,4,2),OPLATE2(ii,4,3)
		K,160+(ii-1)*4+2,NPLATE1(ii,1,1),OPLATE2(ii,4,2),OPLATE2(ii,4,3)
		K,160+(ii-1)*4+3,NPLATE1(ii,4,1),NPLATE1(ii,4,2),NPLATE1(ii,4,3)
		K,160+(ii-1)*4+4,OPLATE1(ii,3,1),OPLATE1(ii,3,2),OPLATE1(ii,3,3)
*ENDDO
V,160+1,160+2,160+3,160+4,160+5,160+6,160+7,160+8
D_PLTX=NINT((NPLATE1(1,1,1)-OPLATE2(1,4,1))/M_RESINX)
D_PLTY=NINT((NPLATE1(ii,4,2)-OPLATE2(ii,4,2))/M_RESINY)
!D_PLTZ=NINT((OPLATE2(2,4,3)-OPLATE2(1,4,3))/M_RESINZ)
lsel,s,,,240+5,
lesiz,all,,,D_PLTZ	!z分割
lsel,all
lsel,s,,,240+2
lesiz,all,,,D_PLTY	!たぶん40分割　-20は1/20を指定しているはず　エッジ部分のサイズ
lsel,S,,,240+1
lesiz,all,,,D_PLTX	!たぶん20分割　-20は1/20を指定しているはず　エッジ部分のサイズ
lsel,all
vmesh,21		!ボリュームメッシュ

!O-P島の間の縦の長い樹脂
*DO,ii,1,2,1
		K,168+(ii-1)*4+1,OPLATE3(ii,2,1),OPLATE3(ii,2,2),OPLATE3(ii,2,3)
		K,168+(ii-1)*4+2,PSSIGNAL(ii,1,1),OPLATE3(ii,2,2),OPLATE3(ii,2,3)
		K,168+(ii-1)*4+3,PPLATE1(ii,4,1),PPLATE1(ii,4,2),PPLATE1(ii,4,3)
		K,168+(ii-1)*4+4,NPLATE1(ii,3,1),NPLATE1(ii,3,2),NPLATE1(ii,3,3)
*ENDDO
V,168+1,168+2,168+3,168+4,168+5,168+6,168+7,168+8
D_PLTX=NINT((PSSIGNAL(ii,1,1)-OPLATE3(ii,2,1))/M_RESINX)
D_PLTY=NINT((PPLATE1(ii,4,2)-OPLATE3(ii,2,2))/M_RESINY)
!D_PLTZ=NINT((NPLATE1(2,4,3)-NPLATE1(1,4,3))/M_RESINZ)
lsel,s,,,252+5,
lesiz,all,,,D_PLTZ	!z分割
lsel,all
lsel,s,,,252+2
lesiz,all,,,D_PLTY	!たぶん40分割　-20は1/20を指定しているはず　エッジ部分のサイズ
lsel,S,,,252+1
lesiz,all,,,D_PLTX	!たぶん20分割　-20は1/20を指定しているはず　エッジ部分のサイズ
lsel,all
vmesh,22		!ボリュームメッシュ

!DESAT横のの縦樹脂
*DO,ii,1,2,1
		K,176+(ii-1)*4+1,PSSIGNAL(ii,2,1),PSSIGNAL(ii,2,2),PSSIGNAL(ii,2,3)
		K,176+(ii-1)*4+2,PPLATE2(ii,1,1),PPLATE2(ii,1,2),PPLATE2(ii,1,3)
		K,176+(ii-1)*4+3,PPLATE2(ii,4,1),PGSIGNAL(ii,3,2),PPLATE2(ii,4,3)
		K,176+(ii-1)*4+4,PSSIGNAL(ii,2,1),PGSIGNAL(ii,3,2),PPLATE2(ii,4,3)
*ENDDO
V,176+1,176+2,176+3,176+4,176+5,176+6,176+7,176+8
D_PLTX=NINT((PPLATE2(ii,1,1)-PSSIGNAL(ii,2,1))/M_RESINX)
D_PLTY=NINT((PGSIGNAL(ii,3,2)-PPLATE2(ii,1,2))/M_RESINY)
!D_PLTZ=NINT((PPLATE2(2,4,3)-PPLATE2(1,4,3))/M_RESINZ)
lsel,s,,,264+5,
lesiz,all,,,D_PLTZ	!z分割
lsel,all
lsel,s,,,264+2
lesiz,all,,,D_PLTY	!たぶん40分割　-20は1/20を指定しているはず　エッジ部分のサイズ
lsel,S,,,264+1
lesiz,all,,,D_PLTX	!たぶん20分割　-20は1/20を指定しているはず　エッジ部分のサイズ
lsel,all
vmesh,23		!ボリュームメッシュ

!残り3方向の縁側樹脂------------------------------------------
*DO,ii,1,2,1
		K,184+(ii-1)*4+1,LCERA(ii,2,1)-ENGAWA,LCERA(ii,2,2)+ENGAWA,PPLATE2(ii,4,3)
		K,184+(ii-1)*4+2,LCERA(ii,2,1),LCERA(ii,2,2),PPLATE2(ii,4,3)
		K,184+(ii-1)*4+3,LCERA(ii,3,1),LCERA(ii,3,2),PPLATE2(ii,4,3)
		K,184+(ii-1)*4+4,LCERA(ii,3,1)-ENGAWA,LCERA(ii,3,2)-ENGAWA,PPLATE2(ii,4,3)
*ENDDO
V,184+1,184+2,184+3,184+4,184+5,184+6,184+7,184+8
D_PLTX=NINT(ENGAWA/M_RESINX)
D_PLTY=NINT((LCERA(ii,3,2)-LCERA(ii,2,2)-ENGAWA*2)/M_RESINY)
!D_PLTZ=NINT((PPLATE2(2,4,3)-PPLATE2(1,4,3))/M_RESINZ)
lsel,s,,,276+5,
lesiz,all,,,D_PLTZ	!z分割
lsel,all
lsel,s,,,276+2
lesiz,all,,,D_PLTY	!たぶん40分割　-20は1/20を指定しているはず　エッジ部分のサイズ
lsel,S,,,276+1
lesiz,all,,,D_PLTX	!たぶん20分割　-20は1/20を指定しているはず　エッジ部分のサイズ
lsel,all
vmesh,24		!ボリュームメッシュ

*DO,ii,1,2,1
		K,192+(ii-1)*4+1,LCERA(ii,4,1)+ENGAWA,LCERA(ii,4,2)-ENGAWA,PPLATE2(ii,4,3)
		K,192+(ii-1)*4+2,LCERA(ii,3,1)-ENGAWA,LCERA(ii,3,2)-ENGAWA,PPLATE2(ii,4,3)
		K,192+(ii-1)*4+3,LCERA(ii,3,1),LCERA(ii,3,2),PPLATE2(ii,4,3)
		K,192+(ii-1)*4+4,LCERA(ii,4,1),LCERA(ii,4,2),PPLATE2(ii,4,3)
*ENDDO
V,192+1,192+2,192+3,192+4,192+5,192+6,192+7,192+8
D_PLTX=NINT((LCERA(ii,3,1)-ENGAWA-LCERA(ii,4,1)-ENGAWA)/M_RESINX)
D_PLTY=NINT(ENGAWA/M_RESINY)
!D_PLTZ=NINT((PPLATE2(2,4,3)-PPLATE2(1,4,3))/M_RESINZ)
lsel,s,,,288+5,
lesiz,all,,,D_PLTZ	!z分割
lsel,all
lsel,s,,,288+2
lesiz,all,,,D_PLTY	!たぶん40分割　-20は1/20を指定しているはず　エッジ部分のサイズ
lsel,S,,,288+1
lesiz,all,,,D_PLTX	!たぶん20分割　-20は1/20を指定しているはず　エッジ部分のサイズ
lsel,all
vmesh,25		!ボリュームメッシュ

*DO,ii,1,2,1
		K,200+(ii-1)*4+1,LCERA(ii,1,1),LCERA(ii,1,2),PPLATE2(ii,4,3)
		K,200+(ii-1)*4+2,LCERA(ii,1,1)+ENGAWA,LCERA(ii,1,2)+ENGAWA,PPLATE2(ii,4,3)
		K,200+(ii-1)*4+3,LCERA(ii,4,1)+ENGAWA,LCERA(ii,4,2)-ENGAWA,PPLATE2(ii,4,3)
		K,200+(ii-1)*4+4,LCERA(ii,4,1),LCERA(ii,4,2),PPLATE2(ii,4,3)
*ENDDO
V,200+1,200+2,200+3,200+4,200+5,200+6,200+7,200+8
D_PLTX=NINT(ENGAWA/M_RESINX)
D_PLTY=NINT((LCERA(ii,4,2)-LCERA(ii,1,2)-ENGAWA*2)/M_RESINY)
!D_PLTZ=NINT((PPLATE2(2,4,3)-PPLATE2(1,4,3))/M_RESINZ)
lsel,s,,,300+5,
lesiz,all,,,D_PLTZ	!z分割
lsel,all
lsel,s,,,300+2
lesiz,all,,,D_PLTY	!たぶん40分割　-20は1/20を指定しているはず　エッジ部分のサイズ
lsel,S,,,300+1
lesiz,all,,,D_PLTX	!たぶん20分割　-20は1/20を指定しているはず　エッジ部分のサイズ
lsel,all
vmesh,26		!ボリュームメッシュ


!ここから接触------------------------------------------------------------------------
!--------------ここから接触------------------------------------
!--------要素ナンバー3と4～8の定義　最初だけでよい
!4:はんだと銅版　5:評価しない接続　樹脂どうしとか、、6:はんだと樹脂 7:Siと樹脂 8:銅と樹脂　　9:銅と樹脂(細目) 10：セラと樹脂　11:セラと銅
et,3,targe170	!要素ナンバー3をTARGE170に

et,4,conta174	!要素ナンバー4をCONTA174に はんだと銅板 これだけ別の接合キーをつかっている。面圧は評価しない
!keyopt,4,1,0	!こうぞうの場合は0を指定
keyopt,4,1,2	!こうぞうの場合は0を指定
!keyopt,4,4,2	!4,2→4,1に変更
keyopt,4,2,2	!ここで4はCONTA174のこと　これのKEYOPT(2)を2に指定している 多点拘束 MPC
!keyopt,4,10,2
!次の行は固着の指定
!keyopt,4,2,0	!ここで4はCONTA174のこと　これのKEYOPT(2)を0に指定している	拡大ラグランジェ
keyopt,4,12,5

et,5,conta174	!要素ナンバー5をCONTA174に これは、接合面を評価しない接触要素に割り振る
keyopt,5,1,2	!こうぞうの場合は0を指定
!keyopt,5,4,2	!
!keyopt,5,1,0	!こうぞうの場合は0を指定
!keyopt,5,2,0	!ここで4はCONTA174のこと　これのKEYOPT(2)を0に指定している	拡大ラグランジェ
keyopt,5,2,2
!keyopt,5,10,2	!
keyopt,5,12,5	!この行は固着の指定

et,6,conta174	!要素ナンバー6をCONTA174に はんだと樹脂の接合面
keyopt,6,1,2	!こうぞうの場合は0を指定
!keyopt,6,4,2	!
!keyopt,6,1,0	!こうぞうの場合は0を指定
!keyopt,6,2,0	!ここで4はCONTA174のこと　これのKEYOPT(2)を0に指定している
keyopt,6,2,2
!keyopt,6,10,2	!
keyopt,6,12,5	!この行は固着の指定

et,7,conta174	!要素ナンバー7をCONTA174に Siと樹脂の接合面
keyopt,7,1,2	!こうぞうの場合は0を指定
!keyopt,7,4,2	!
!keyopt,7,1,0	!こうぞうの場合は0を指定
!keyopt,7,2,0	!ここで4はCONTA174のこと　これのKEYOPT(2)を0に指定している
keyopt,7,2,2
!keyopt,7,10,2	!
keyopt,7,12,5	!この行は固着の指定


et,8,conta174	!要素ナンバー8をCONTA174に 銅板と樹脂の接合面
keyopt,8,1,2	!こうぞうの場合は0を指定
!keyopt,8,4,2	!
!keyopt,8,1,0	!こうぞうの場合は0を指定
!keyopt,8,2,0	!ここで4はCONTA174のこと　これのKEYOPT(2)を0に指定している
keyopt,8,2,2
!keyopt,8,10,2	!
keyopt,8,12,5	!この行は固着の指定

et,9,conta174	!要素ナンバー8をCONTA174に 銅板と樹脂の接合面
keyopt,9,1,2	!こうぞうの場合は0を指定
!keyopt,9,4,2	!
!keyopt,9,1,0	!こうぞうの場合は0を指定
!keyopt,9,2,0	!ここで4はCONTA174のこと　これのKEYOPT(2)を0に指定している
keyopt,9,2,2
!keyopt,9,10,2	!
keyopt,9,12,5	!この行は固着の指定

!----DBC----------
et,10,conta174	!要素ナンバー9をCONTA174に セラと樹脂の接合面
keyopt,10,1,2	!こうぞうの場合は0を指定
!keyopt,10,4,2	!
!keyopt,10,1,0	!こうぞうの場合は0を指定
!keyopt,10,2,0	!ここで4はCONTA174のこと　これのKEYOPT(2)を0に指定している
keyopt,10,2,2
!keyopt,10,10,2	!
keyopt,10,12,5	!この行は固着の指定
!----DBC 終了----------

et,11,conta174	!要素ナンバー8をCONTA174に 銅板と樹脂の接合面
keyopt,11,1,2	!こうぞうの場合は0を指定
!keyopt,11,4,2	!
!keyopt,11,1,0	!こうぞうの場合は0を指定
!keyopt,11,2,0	!ここで4はCONTA174のこと　これのKEYOPT(2)を0に指定している
keyopt,11,2,2
!keyopt,11,10,2	!
keyopt,11,12,5	!この行は固着の指定

!-------要素ナンバーの定義　ここまで

!-----この12はtype5の不具合切り分け用です　不要になったら削除のこと

et,12,conta174	!要素ナンバー8をCONTA174に 銅板と樹脂の接合面
keyopt,12,1,2	!こうぞうの場合は0を指定
!keyopt,12,4,2	!
!keyopt,12,1,0	!こうぞうの場合は0を指定
!keyopt,12,2,0	!ここで4はCONTA174のこと　これのKEYOPT(2)を0に指定している
keyopt,12,2,2
!keyopt,12,10,2	!
keyopt,12,12,5	!この行は固着の指定
!-----この12はtype5の不具合切り分け用です　不要になったら削除のこと


*SET,CNUM,0

*DO,ii,1,11,1
!最初は、下DBC
CNUM=CNUM+1
allsel
!Create Contact Pair
asel,s,,,6*ii+1	!最初のはんだ下面を選択
cm,a_cont,area	!a_contという名をつける
asel,s,,,6	!Cu表面を選択
cm,a_targ,area	!a_targという名をつける  TARGがくっつける相手の（通常大きいほうの）面
allsel
r,CNUM
rmodif,CNUM,14,1e6		!14は接触コンダクタンスのこと CONTA174の リアルコンスタントのことらしい
real,CNUM
type,3		!要素ナンバー3のこと 3ということはtarge170
cmsel,s,a_targ	!Cuの表面選択
nsla,s,1	!選択されたエリアに関する節点の選択
esurf		!既存の要素の自由表面に重ねて要素を生成とのこと
type,11	!セラと銅
cmsel,s,a_cont	!はんだ下面の選択
nsla,s,1	!選択されたエリアに関する節点の選択
esurf
allsel
*ENDDO

*DO,ii,12,25,1
!最初は、下DBC
CNUM=CNUM+1
allsel
!Create Contact Pair
asel,s,,,6*ii+1	!最初のはんだ下面を選択
cm,a_cont,area	!a_contという名をつける
asel,s,,,6	!Cu表面を選択
cm,a_targ,area	!a_targという名をつける  TARGがくっつける相手の（通常大きいほうの）面
allsel
r,CNUM
rmodif,CNUM,14,1e6		!14は接触コンダクタンスのこと CONTA174の リアルコンスタントのことらしい
real,CNUM
type,3		!要素ナンバー3のこと 3ということはtarge170
cmsel,s,a_targ	!Cuの表面選択
nsla,s,1	!選択されたエリアに関する節点の選択
esurf		!既存の要素の自由表面に重ねて要素を生成とのこと
type,10	!セラと樹脂
cmsel,s,a_cont	!はんだ下面の選択
nsla,s,1	!選択されたエリアに関する節点の選択
esurf
allsel
*ENDDO

!CNUM=25 ここまで
!下DBC 上面パタン　下面の接触完了-----------------------------------------

*DO,ii,9,15,6
!最初は、下DBC
CNUM=CNUM+1
allsel
!Create Contact Pair
asel,s,,,ii	!最初のはんだ下面を選択
cm,a_cont,area	!a_contという名をつける
asel,s,,,ii+8	!Cu表面を選択
cm,a_targ,area	!a_targという名をつける  TARGがくっつける相手の（通常大きいほうの）面
allsel
r,CNUM
rmodif,CNUM,14,1e6		!14は接触コンダクタンスのこと CONTA174の リアルコンスタントのことらしい
real,CNUM
type,3		!要素ナンバー3のこと 3ということはtarge170
cmsel,s,a_targ	!Cuの表面選択
nsla,s,1	!選択されたエリアに関する節点の選択
esurf		!既存の要素の自由表面に重ねて要素を生成とのこと
type,5	!評価しない面
cmsel,s,a_cont	!はんだ下面の選択
nsla,s,1	!選択されたエリアに関する節点の選択
esurf
allsel
*ENDDO

CNUM=CNUM+1
allsel
!Create Contact Pair
asel,s,,,26	!最初のはんだ下面を選択
cm,a_cont,area	!a_contという名をつける
asel,s,,,34	!Cu表面を選択
cm,a_targ,area	!a_targという名をつける  TARGがくっつける相手の（通常大きいほうの）面
allsel
r,CNUM
rmodif,CNUM,14,1e6		!14は接触コンダクタンスのこと CONTA174の リアルコンスタントのことらしい
real,CNUM
type,3		!要素ナンバー3のこと 3ということはtarge170
cmsel,s,a_targ	!Cuの表面選択
nsla,s,1	!選択されたエリアに関する節点の選択
esurf		!既存の要素の自由表面に重ねて要素を生成とのこと
type,5	!評価しない面
cmsel,s,a_cont	!はんだ下面の選択
nsla,s,1	!選択されたエリアに関する節点の選択
esurf
allsel


!銅と樹脂側面
*DO,ii,1,2,1
!最初は、下DBC
CNUM=CNUM+1
allsel
!Create Contact Pair
asel,s,,,(ii-1)*6+8	!最初のはんだ下面を選択
cm,a_cont,area	!a_contという名をつける
asel,s,,,94	!Cu表面を選択
cm,a_targ,area	!a_targという名をつける  TARGがくっつける相手の（通常大きいほうの）面
allsel
r,CNUM
rmodif,CNUM,14,1e6		!14は接触コンダクタンスのこと CONTA174の リアルコンスタントのことらしい
real,CNUM
type,3		!要素ナンバー3のこと 3ということはtarge170
cmsel,s,a_targ	!Cuの表面選択
nsla,s,1	!選択されたエリアに関する節点の選択
esurf		!既存の要素の自由表面に重ねて要素を生成とのこと
type,8	!粗い樹脂と銅
cmsel,s,a_cont	!はんだ下面の選択
nsla,s,1	!選択されたエリアに関する節点の選択
esurf
allsel
*ENDDO

*DO,ii,1,2,1
!最初は、下DBC
CNUM=CNUM+1
allsel
!Create Contact Pair
asel,s,,,23	!最初のはんだ下面を選択
cm,a_cont,area	!a_contという名をつける
asel,s,,,93+(ii-1)*24	!Cu表面を選択
cm,a_targ,area	!a_targという名をつける  TARGがくっつける相手の（通常大きいほうの）面
allsel
r,CNUM
rmodif,CNUM,14,1e6		!14は接触コンダクタンスのこと CONTA174の リアルコンスタントのことらしい
real,CNUM
type,3		!要素ナンバー3のこと 3ということはtarge170
cmsel,s,a_targ	!Cuの表面選択
nsla,s,1	!選択されたエリアに関する節点の選択
esurf		!既存の要素の自由表面に重ねて要素を生成とのこと
type,8	!粗い樹脂と銅
cmsel,s,a_cont	!はんだ下面の選択
nsla,s,1	!選択されたエリアに関する節点の選択
esurf
allsel
*ENDDO

CNUM=CNUM+1
allsel
!Create Contact Pair
asel,s,,,20	!最初のはんだ下面を選択
cm,a_cont,area	!a_contという名をつける
asel,s,,,76	!Cu表面を選択
cm,a_targ,area	!a_targという名をつける  TARGがくっつける相手の（通常大きいほうの）面
allsel
r,CNUM
rmodif,CNUM,14,1e6		!14は接触コンダクタンスのこと CONTA174の リアルコンスタントのことらしい
real,CNUM
type,3		!要素ナンバー3のこと 3ということはtarge170
cmsel,s,a_targ	!Cuの表面選択
nsla,s,1	!選択されたエリアに関する節点の選択
esurf		!既存の要素の自由表面に重ねて要素を生成とのこと
type,8	!粗い樹脂と銅
cmsel,s,a_cont	!はんだ下面の選択
nsla,s,1	!選択されたエリアに関する節点の選択
esurf
allsel

CNUM=CNUM+1
allsel
!Create Contact Pair
asel,s,,,21	!最初のはんだ下面を選択
cm,a_cont,area	!a_contという名をつける
asel,s,,,131	!Cu表面を選択
cm,a_targ,area	!a_targという名をつける  TARGがくっつける相手の（通常大きいほうの）面
allsel
r,CNUM
rmodif,CNUM,14,1e6		!14は接触コンダクタンスのこと CONTA174の リアルコンスタントのことらしい
real,CNUM
type,3		!要素ナンバー3のこと 3ということはtarge170
cmsel,s,a_targ	!Cuの表面選択
nsla,s,1	!選択されたエリアに関する節点の選択
esurf		!既存の要素の自由表面に重ねて要素を生成とのこと
type,8	!粗い樹脂と銅
cmsel,s,a_cont	!はんだ下面の選択
nsla,s,1	!選択されたエリアに関する節点の選択
esurf
allsel

*DO,ii,1,2,1
CNUM=CNUM+1
allsel
!Create Contact Pair
asel,s,,,22-(ii-1)*6	!最初のはんだ下面を選択
cm,a_cont,area	!a_contという名をつける
asel,s,,,104	!Cu表面を選択
cm,a_targ,area	!a_targという名をつける  TARGがくっつける相手の（通常大きいほうの）面
allsel
r,CNUM
rmodif,CNUM,14,1e6		!14は接触コンダクタンスのこと CONTA174の リアルコンスタントのことらしい
real,CNUM
type,3		!要素ナンバー3のこと 3ということはtarge170
cmsel,s,a_targ	!Cuの表面選択
nsla,s,1	!選択されたエリアに関する節点の選択
esurf		!既存の要素の自由表面に重ねて要素を生成とのこと
type,8	!粗い樹脂と銅
cmsel,s,a_cont	!はんだ下面の選択
nsla,s,1	!選択されたエリアに関する節点の選択
esurf
allsel

CNUM=CNUM+1
allsel
!Create Contact Pair
asel,s,,,22-(ii-1)*6	!最初のはんだ下面を選択
cm,a_cont,area	!a_contという名をつける
asel,s,,,122	!Cu表面を選択
cm,a_targ,area	!a_targという名をつける  TARGがくっつける相手の（通常大きいほうの）面
allsel
r,CNUM
rmodif,CNUM,14,1e6		!14は接触コンダクタンスのこと CONTA174の リアルコンスタントのことらしい
real,CNUM
type,3		!要素ナンバー3のこと 3ということはtarge170
cmsel,s,a_targ	!Cuの表面選択
nsla,s,1	!選択されたエリアに関する節点の選択
esurf		!既存の要素の自由表面に重ねて要素を生成とのこと
type,8	!粗い樹脂と銅
cmsel,s,a_cont	!はんだ下面の選択
nsla,s,1	!選択されたエリアに関する節点の選択
esurf
allsel
*enddo

CNUM=CNUM+1
allsel
!Create Contact Pair
asel,s,,,9	!最初のはんだ下面を選択
cm,a_cont,area	!a_contという名をつける
asel,s,,,125	!Cu表面を選択
cm,a_targ,area	!a_targという名をつける  TARGがくっつける相手の（通常大きいほうの）面
allsel
r,CNUM
rmodif,CNUM,14,1e6		!14は接触コンダクタンスのこと CONTA174の リアルコンスタントのことらしい
real,CNUM
type,3		!要素ナンバー3のこと 3ということはtarge170
cmsel,s,a_targ	!Cuの表面選択
nsla,s,1	!選択されたエリアに関する節点の選択
esurf		!既存の要素の自由表面に重ねて要素を生成とのこと
type,8	!粗い樹脂と銅
cmsel,s,a_cont	!はんだ下面の選択
nsla,s,1	!選択されたエリアに関する節点の選択
esurf
allsel

CNUM=CNUM+1
allsel
!Create Contact Pair
asel,s,,,10	!最初のはんだ下面を選択
cm,a_cont,area	!a_contという名をつける
asel,s,,,146	!Cu表面を選択
cm,a_targ,area	!a_targという名をつける  TARGがくっつける相手の（通常大きいほうの）面
allsel
r,CNUM
rmodif,CNUM,14,1e6		!14は接触コンダクタンスのこと CONTA174の リアルコンスタントのことらしい
real,CNUM
type,3		!要素ナンバー3のこと 3ということはtarge170
cmsel,s,a_targ	!Cuの表面選択
nsla,s,1	!選択されたエリアに関する節点の選択
esurf		!既存の要素の自由表面に重ねて要素を生成とのこと
type,8	!粗い樹脂と銅
cmsel,s,a_cont	!はんだ下面の選択
nsla,s,1	!選択されたエリアに関する節点の選択
esurf
allsel

CNUM=CNUM+1
allsel
!Create Contact Pair
asel,s,,,11	!最初のはんだ下面を選択
cm,a_cont,area	!a_contという名をつける
asel,s,,,153	!Cu表面を選択
cm,a_targ,area	!a_targという名をつける  TARGがくっつける相手の（通常大きいほうの）面
allsel
r,CNUM
rmodif,CNUM,14,1e6		!14は接触コンダクタンスのこと CONTA174の リアルコンスタントのことらしい
real,CNUM
type,3		!要素ナンバー3のこと 3ということはtarge170
cmsel,s,a_targ	!Cuの表面選択
nsla,s,1	!選択されたエリアに関する節点の選択
esurf		!既存の要素の自由表面に重ねて要素を生成とのこと
type,8	!粗い樹脂と銅
cmsel,s,a_cont	!はんだ下面の選択
nsla,s,1	!選択されたエリアに関する節点の選択
esurf
allsel

!CUM=41

!P島側面樹脂
CNUM=CNUM+1
allsel
!Create Contact Pair
asel,s,,,26	!最初のはんだ下面を選択
cm,a_cont,area	!a_contという名をつける
asel,s,,,100	!Cu表面を選択
cm,a_targ,area	!a_targという名をつける  TARGがくっつける相手の（通常大きいほうの）面
allsel
r,CNUM
rmodif,CNUM,14,1e6		!14は接触コンダクタンスのこと CONTA174の リアルコンスタントのことらしい
real,CNUM
type,3		!要素ナンバー3のこと 3ということはtarge170
cmsel,s,a_targ	!Cuの表面選択
nsla,s,1	!選択されたエリアに関する節点の選択
esurf		!既存の要素の自由表面に重ねて要素を生成とのこと
type,8	!粗い樹脂と銅
cmsel,s,a_cont	!はんだ下面の選択
nsla,s,1	!選択されたエリアに関する節点の選択
esurf
allsel

*do,ii,1,2,1
CNUM=CNUM+1
allsel
!Create Contact Pair
asel,s,,,35	!最初のはんだ下面を選択
cm,a_cont,area	!a_contという名をつける
asel,s,,,99+36*(ii-1)	!Cu表面を選択
cm,a_targ,area	!a_targという名をつける  TARGがくっつける相手の（通常大きいほうの）面
allsel
r,CNUM
rmodif,CNUM,14,1e6		!14は接触コンダクタンスのこと CONTA174の リアルコンスタントのことらしい
real,CNUM
type,3		!要素ナンバー3のこと 3ということはtarge170
cmsel,s,a_targ	!Cuの表面選択
nsla,s,1	!選択されたエリアに関する節点の選択
esurf		!既存の要素の自由表面に重ねて要素を生成とのこと
type,8	!粗い樹脂と銅
cmsel,s,a_cont	!はんだ下面の選択
nsla,s,1	!選択されたエリアに関する節点の選択
esurf
allsel
*enddo

CNUM=CNUM+1
allsel
!Create Contact Pair
asel,s,,,32	!最初のはんだ下面を選択
cm,a_cont,area	!a_contという名をつける
asel,s,,,76	!Cu表面を選択
cm,a_targ,area	!a_targという名をつける  TARGがくっつける相手の（通常大きいほうの）面
allsel
r,CNUM
rmodif,CNUM,14,1e6		!14は接触コンダクタンスのこと CONTA174の リアルコンスタントのことらしい
real,CNUM
type,3		!要素ナンバー3のこと 3ということはtarge170
cmsel,s,a_targ	!Cuの表面選択
nsla,s,1	!選択されたエリアに関する節点の選択
esurf		!既存の要素の自由表面に重ねて要素を生成とのこと
type,8	!粗い樹脂と銅
cmsel,s,a_cont	!はんだ下面の選択
nsla,s,1	!選択されたエリアに関する節点の選択
esurf
allsel

*do,ii,1,2,1
CNUM=CNUM+1
allsel
!Create Contact Pair
asel,s,,,33-(ii-1)*6	!最初のはんだ下面を選択
cm,a_cont,area	!a_contという名をつける
asel,s,,,143	!Cu表面を選択
cm,a_targ,area	!a_targという名をつける  TARGがくっつける相手の（通常大きいほうの）面
allsel
r,CNUM
rmodif,CNUM,14,1e6		!14は接触コンダクタンスのこと CONTA174の リアルコンスタントのことらしい
real,CNUM
type,3		!要素ナンバー3のこと 3ということはtarge170
cmsel,s,a_targ	!Cuの表面選択
nsla,s,1	!選択されたエリアに関する節点の選択
esurf		!既存の要素の自由表面に重ねて要素を生成とのこと
type,8	!粗い樹脂と銅
cmsel,s,a_cont	!はんだ下面の選択
nsla,s,1	!選択されたエリアに関する節点の選択
esurf
allsel
*enddo

CNUM=CNUM+1
allsel
!Create Contact Pair
asel,s,,,28	!最初のはんだ下面を選択
cm,a_cont,area	!a_contという名をつける
asel,s,,,146	!Cu表面を選択
cm,a_targ,area	!a_targという名をつける  TARGがくっつける相手の（通常大きいほうの）面
allsel
r,CNUM
rmodif,CNUM,14,1e6		!14は接触コンダクタンスのこと CONTA174の リアルコンスタントのことらしい
real,CNUM
type,3		!要素ナンバー3のこと 3ということはtarge170
cmsel,s,a_targ	!Cuの表面選択
nsla,s,1	!選択されたエリアに関する節点の選択
esurf		!既存の要素の自由表面に重ねて要素を生成とのこと
type,8	!粗い樹脂と銅
cmsel,s,a_cont	!はんだ下面の選択
nsla,s,1	!選択されたエリアに関する節点の選択
esurf
allsel

CNUM=CNUM+1
allsel
!Create Contact Pair
asel,s,,,29	!最初のはんだ下面を選択
cm,a_cont,area	!a_contという名をつける
asel,s,,,129	!Cu表面を選択
cm,a_targ,area	!a_targという名をつける  TARGがくっつける相手の（通常大きいほうの）面
allsel
r,CNUM
rmodif,CNUM,14,1e6		!14は接触コンダクタンスのこと CONTA174の リアルコンスタントのことらしい
real,CNUM
type,3		!要素ナンバー3のこと 3ということはtarge170
cmsel,s,a_targ	!Cuの表面選択
nsla,s,1	!選択されたエリアに関する節点の選択
esurf		!既存の要素の自由表面に重ねて要素を生成とのこと
type,8	!粗い樹脂と銅
cmsel,s,a_cont	!はんだ下面の選択
nsla,s,1	!選択されたエリアに関する節点の選択
esurf
allsel

!CNUM=49

!N島側面
CNUM=CNUM+1
allsel
!Create Contact Pair
asel,s,,,38	!最初のはんだ下面を選択
cm,a_cont,area	!a_contという名をつける
asel,s,,,106	!Cu表面を選択
cm,a_targ,area	!a_targという名をつける  TARGがくっつける相手の（通常大きいほうの）面
allsel
r,CNUM
rmodif,CNUM,14,1e6		!14は接触コンダクタンスのこと CONTA174の リアルコンスタントのことらしい
real,CNUM
type,3		!要素ナンバー3のこと 3ということはtarge170
cmsel,s,a_targ	!Cuの表面選択
nsla,s,1	!選択されたエリアに関する節点の選択
esurf		!既存の要素の自由表面に重ねて要素を生成とのこと
type,8	!粗い樹脂と銅
cmsel,s,a_cont	!はんだ下面の選択
nsla,s,1	!選択されたエリアに関する節点の選択
esurf
allsel

CNUM=CNUM+1
allsel
!Create Contact Pair
asel,s,,,39	!最初のはんだ下面を選択
cm,a_cont,area	!a_contという名をつける
asel,s,,,131	!Cu表面を選択
cm,a_targ,area	!a_targという名をつける  TARGがくっつける相手の（通常大きいほうの）面
allsel
r,CNUM
rmodif,CNUM,14,1e6		!14は接触コンダクタンスのこと CONTA174の リアルコンスタントのことらしい
real,CNUM
type,3		!要素ナンバー3のこと 3ということはtarge170
cmsel,s,a_targ	!Cuの表面選択
nsla,s,1	!選択されたエリアに関する節点の選択
esurf		!既存の要素の自由表面に重ねて要素を生成とのこと
type,8	!粗い樹脂と銅
cmsel,s,a_cont	!はんだ下面の選択
nsla,s,1	!選択されたエリアに関する節点の選択
esurf
allsel

CNUM=CNUM+1
allsel
!Create Contact Pair
asel,s,,,40	!最初のはんだ下面を選択
cm,a_cont,area	!a_contという名をつける
asel,s,,,146	!Cu表面を選択
cm,a_targ,area	!a_targという名をつける  TARGがくっつける相手の（通常大きいほうの）面
allsel
r,CNUM
rmodif,CNUM,14,1e6		!14は接触コンダクタンスのこと CONTA174の リアルコンスタントのことらしい
real,CNUM
type,3		!要素ナンバー3のこと 3ということはtarge170
cmsel,s,a_targ	!Cuの表面選択
nsla,s,1	!選択されたエリアに関する節点の選択
esurf		!既存の要素の自由表面に重ねて要素を生成とのこと
type,8	!粗い樹脂と銅
cmsel,s,a_cont	!はんだ下面の選択
nsla,s,1	!選択されたエリアに関する節点の選択
esurf
allsel

CNUM=CNUM+1
allsel
!Create Contact Pair
asel,s,,,41	!最初のはんだ下面を選択
cm,a_cont,area	!a_contという名をつける
asel,s,,,123	!Cu表面を選択
cm,a_targ,area	!a_targという名をつける  TARGがくっつける相手の（通常大きいほうの）面
allsel
r,CNUM
rmodif,CNUM,14,1e6		!14は接触コンダクタンスのこと CONTA174の リアルコンスタントのことらしい
real,CNUM
type,3		!要素ナンバー3のこと 3ということはtarge170
cmsel,s,a_targ	!Cuの表面選択
nsla,s,1	!選択されたエリアに関する節点の選択
esurf		!既存の要素の自由表面に重ねて要素を生成とのこと
type,8	!粗い樹脂と銅
cmsel,s,a_cont	!はんだ下面の選択
nsla,s,1	!選択されたエリアに関する節点の選択
esurf
allsel

!THERM島側面
CNUM=CNUM+1
allsel
!Create Contact Pair
asel,s,,,44	!最初のはんだ下面を選択
cm,a_cont,area	!a_contという名をつける
asel,s,,,76	!Cu表面を選択
cm,a_targ,area	!a_targという名をつける  TARGがくっつける相手の（通常大きいほうの）面
allsel
r,CNUM
rmodif,CNUM,14,1e6		!14は接触コンダクタンスのこと CONTA174の リアルコンスタントのことらしい
real,CNUM
type,3		!要素ナンバー3のこと 3ということはtarge170
cmsel,s,a_targ	!Cuの表面選択
nsla,s,1	!選択されたエリアに関する節点の選択
esurf		!既存の要素の自由表面に重ねて要素を生成とのこと
type,8	!粗い樹脂と銅
cmsel,s,a_cont	!はんだ下面の選択
nsla,s,1	!選択されたエリアに関する節点の選択
esurf
allsel

CNUM=CNUM+1
allsel
!Create Contact Pair
asel,s,,,45	!最初のはんだ下面を選択
cm,a_cont,area	!a_contという名をつける
asel,s,,,119	!Cu表面を選択
cm,a_targ,area	!a_targという名をつける  TARGがくっつける相手の（通常大きいほうの）面
allsel
r,CNUM
rmodif,CNUM,14,1e6		!14は接触コンダクタンスのこと CONTA174の リアルコンスタントのことらしい
real,CNUM
type,3		!要素ナンバー3のこと 3ということはtarge170
cmsel,s,a_targ	!Cuの表面選択
nsla,s,1	!選択されたエリアに関する節点の選択
esurf		!既存の要素の自由表面に重ねて要素を生成とのこと
type,8	!粗い樹脂と銅
cmsel,s,a_cont	!はんだ下面の選択
nsla,s,1	!選択されたエリアに関する節点の選択
esurf
allsel

CNUM=CNUM+1
allsel
!Create Contact Pair
asel,s,,,46	!最初のはんだ下面を選択
cm,a_cont,area	!a_contという名をつける
asel,s,,,92	!Cu表面を選択
cm,a_targ,area	!a_targという名をつける  TARGがくっつける相手の（通常大きいほうの）面
allsel
r,CNUM
rmodif,CNUM,14,1e6		!14は接触コンダクタンスのこと CONTA174の リアルコンスタントのことらしい
real,CNUM
type,3		!要素ナンバー3のこと 3ということはtarge170
cmsel,s,a_targ	!Cuの表面選択
nsla,s,1	!選択されたエリアに関する節点の選択
esurf		!既存の要素の自由表面に重ねて要素を生成とのこと
type,8	!粗い樹脂と銅
cmsel,s,a_cont	!はんだ下面の選択
nsla,s,1	!選択されたエリアに関する節点の選択
esurf
allsel

CNUM=CNUM+1
allsel
!Create Contact Pair
asel,s,,,47	!最初のはんだ下面を選択
cm,a_cont,area	!a_contという名をつける
asel,s,,,111	!Cu表面を選択
cm,a_targ,area	!a_targという名をつける  TARGがくっつける相手の（通常大きいほうの）面
allsel
r,CNUM
rmodif,CNUM,14,1e6		!14は接触コンダクタンスのこと CONTA174の リアルコンスタントのことらしい
real,CNUM
type,3		!要素ナンバー3のこと 3ということはtarge170
cmsel,s,a_targ	!Cuの表面選択
nsla,s,1	!選択されたエリアに関する節点の選択
esurf		!既存の要素の自由表面に重ねて要素を生成とのこと
type,8	!粗い樹脂と銅
cmsel,s,a_cont	!はんだ下面の選択
nsla,s,1	!選択されたエリアに関する節点の選択
esurf
allsel

!CNUM=57

!O Source島側面
CNUM=CNUM+1
allsel
!Create Contact Pair
asel,s,,,50	!最初のはんだ下面を選択
cm,a_cont,area	!a_contという名をつける
asel,s,,,76	!Cu表面を選択
cm,a_targ,area	!a_targという名をつける  TARGがくっつける相手の（通常大きいほうの）面
allsel
r,CNUM
rmodif,CNUM,14,1e6		!14は接触コンダクタンスのこと CONTA174の リアルコンスタントのことらしい
real,CNUM
type,3		!要素ナンバー3のこと 3ということはtarge170
cmsel,s,a_targ	!Cuの表面選択
nsla,s,1	!選択されたエリアに関する節点の選択
esurf		!既存の要素の自由表面に重ねて要素を生成とのこと
type,8	!粗い樹脂と銅
cmsel,s,a_cont	!はんだ下面の選択
nsla,s,1	!選択されたエリアに関する節点の選択
esurf
allsel

CNUM=CNUM+1
allsel
!Create Contact Pair
asel,s,,,51	!最初のはんだ下面を選択
cm,a_cont,area	!a_contという名をつける
asel,s,,,113	!Cu表面を選択
cm,a_targ,area	!a_targという名をつける  TARGがくっつける相手の（通常大きいほうの）面
allsel
r,CNUM
rmodif,CNUM,14,1e6		!14は接触コンダクタンスのこと CONTA174の リアルコンスタントのことらしい
real,CNUM
type,3		!要素ナンバー3のこと 3ということはtarge170
cmsel,s,a_targ	!Cuの表面選択
nsla,s,1	!選択されたエリアに関する節点の選択
esurf		!既存の要素の自由表面に重ねて要素を生成とのこと
type,8	!粗い樹脂と銅
cmsel,s,a_cont	!はんだ下面の選択
nsla,s,1	!選択されたエリアに関する節点の選択
esurf
allsel

CNUM=CNUM+1
allsel
!Create Contact Pair
asel,s,,,52	!最初のはんだ下面を選択
cm,a_cont,area	!a_contという名をつける
asel,s,,,80	!Cu表面を選択
cm,a_targ,area	!a_targという名をつける  TARGがくっつける相手の（通常大きいほうの）面
allsel
r,CNUM
rmodif,CNUM,14,1e6		!14は接触コンダクタンスのこと CONTA174の リアルコンスタントのことらしい
real,CNUM
type,3		!要素ナンバー3のこと 3ということはtarge170
cmsel,s,a_targ	!Cuの表面選択
nsla,s,1	!選択されたエリアに関する節点の選択
esurf		!既存の要素の自由表面に重ねて要素を生成とのこと
type,8	!粗い樹脂と銅
cmsel,s,a_cont	!はんだ下面の選択
nsla,s,1	!選択されたエリアに関する節点の選択
esurf
allsel

CNUM=CNUM+1
allsel
!Create Contact Pair
asel,s,,,53	!最初のはんだ下面を選択
cm,a_cont,area	!a_contという名をつける
asel,s,,,153	!Cu表面を選択
cm,a_targ,area	!a_targという名をつける  TARGがくっつける相手の（通常大きいほうの）面
allsel
r,CNUM
rmodif,CNUM,14,1e6		!14は接触コンダクタンスのこと CONTA174の リアルコンスタントのことらしい
real,CNUM
type,3		!要素ナンバー3のこと 3ということはtarge170
cmsel,s,a_targ	!Cuの表面選択
nsla,s,1	!選択されたエリアに関する節点の選択
esurf		!既存の要素の自由表面に重ねて要素を生成とのこと
type,8	!粗い樹脂と銅
cmsel,s,a_cont	!はんだ下面の選択
nsla,s,1	!選択されたエリアに関する節点の選択
esurf
allsel

!O Gate島側面
CNUM=CNUM+1
allsel
!Create Contact Pair
asel,s,,,56	!最初のはんだ下面を選択
cm,a_cont,area	!a_contという名をつける
asel,s,,,82	!Cu表面を選択
cm,a_targ,area	!a_targという名をつける  TARGがくっつける相手の（通常大きいほうの）面
allsel
r,CNUM
rmodif,CNUM,14,1e6		!14は接触コンダクタンスのこと CONTA174の リアルコンスタントのことらしい
real,CNUM
type,3		!要素ナンバー3のこと 3ということはtarge170
cmsel,s,a_targ	!Cuの表面選択
nsla,s,1	!選択されたエリアに関する節点の選択
esurf		!既存の要素の自由表面に重ねて要素を生成とのこと
type,8	!粗い樹脂と銅
cmsel,s,a_cont	!はんだ下面の選択
nsla,s,1	!選択されたエリアに関する節点の選択
esurf
allsel

CNUM=CNUM+1
allsel
!Create Contact Pair
asel,s,,,57	!最初のはんだ下面を選択
cm,a_cont,area	!a_contという名をつける
asel,s,,,113	!Cu表面を選択
cm,a_targ,area	!a_targという名をつける  TARGがくっつける相手の（通常大きいほうの）面
allsel
r,CNUM
rmodif,CNUM,14,1e6		!14は接触コンダクタンスのこと CONTA174の リアルコンスタントのことらしい
real,CNUM
type,3		!要素ナンバー3のこと 3ということはtarge170
cmsel,s,a_targ	!Cuの表面選択
nsla,s,1	!選択されたエリアに関する節点の選択
esurf		!既存の要素の自由表面に重ねて要素を生成とのこと
type,8	!粗い樹脂と銅
cmsel,s,a_cont	!はんだ下面の選択
nsla,s,1	!選択されたエリアに関する節点の選択
esurf
allsel

CNUM=CNUM+1
allsel
!Create Contact Pair
asel,s,,,58	!最初のはんだ下面を選択
cm,a_cont,area	!a_contという名をつける
asel,s,,,92	!Cu表面を選択
cm,a_targ,area	!a_targという名をつける  TARGがくっつける相手の（通常大きいほうの）面
allsel
r,CNUM
rmodif,CNUM,14,1e6		!14は接触コンダクタンスのこと CONTA174の リアルコンスタントのことらしい
real,CNUM
type,3		!要素ナンバー3のこと 3ということはtarge170
cmsel,s,a_targ	!Cuの表面選択
nsla,s,1	!選択されたエリアに関する節点の選択
esurf		!既存の要素の自由表面に重ねて要素を生成とのこと
type,8	!粗い樹脂と銅
cmsel,s,a_cont	!はんだ下面の選択
nsla,s,1	!選択されたエリアに関する節点の選択
esurf
allsel

CNUM=CNUM+1
allsel
!Create Contact Pair
asel,s,,,59	!最初のはんだ下面を選択
cm,a_cont,area	!a_contという名をつける
asel,s,,,153	!Cu表面を選択
cm,a_targ,area	!a_targという名をつける  TARGがくっつける相手の（通常大きいほうの）面
allsel
r,CNUM
rmodif,CNUM,14,1e6		!14は接触コンダクタンスのこと CONTA174の リアルコンスタントのことらしい
real,CNUM
type,3		!要素ナンバー3のこと 3ということはtarge170
cmsel,s,a_targ	!Cuの表面選択
nsla,s,1	!選択されたエリアに関する節点の選択
esurf		!既存の要素の自由表面に重ねて要素を生成とのこと
type,8	!粗い樹脂と銅
cmsel,s,a_cont	!はんだ下面の選択
nsla,s,1	!選択されたエリアに関する節点の選択
esurf
allsel

!P Source島側面
CNUM=CNUM+1
allsel
!Create Contact Pair
asel,s,,,62	!最初のはんだ下面を選択
cm,a_cont,area	!a_contという名をつける
asel,s,,,76	!Cu表面を選択
cm,a_targ,area	!a_targという名をつける  TARGがくっつける相手の（通常大きいほうの）面
allsel
r,CNUM
rmodif,CNUM,14,1e6		!14は接触コンダクタンスのこと CONTA174の リアルコンスタントのことらしい
real,CNUM
type,3		!要素ナンバー3のこと 3ということはtarge170
cmsel,s,a_targ	!Cuの表面選択
nsla,s,1	!選択されたエリアに関する節点の選択
esurf		!既存の要素の自由表面に重ねて要素を生成とのこと
type,8	!粗い樹脂と銅
cmsel,s,a_cont	!はんだ下面の選択
nsla,s,1	!選択されたエリアに関する節点の選択
esurf
allsel

CNUM=CNUM+1
allsel
!Create Contact Pair
asel,s,,,63	!最初のはんだ下面を選択
cm,a_cont,area	!a_contという名をつける
asel,s,,,137	!Cu表面を選択
cm,a_targ,area	!a_targという名をつける  TARGがくっつける相手の（通常大きいほうの）面
allsel
r,CNUM
rmodif,CNUM,14,1e6		!14は接触コンダクタンスのこと CONTA174の リアルコンスタントのことらしい
real,CNUM
type,3		!要素ナンバー3のこと 3ということはtarge170
cmsel,s,a_targ	!Cuの表面選択
nsla,s,1	!選択されたエリアに関する節点の選択
esurf		!既存の要素の自由表面に重ねて要素を生成とのこと
type,8	!粗い樹脂と銅
cmsel,s,a_cont	!はんだ下面の選択
nsla,s,1	!選択されたエリアに関する節点の選択
esurf
allsel

CNUM=CNUM+1
allsel
!Create Contact Pair
asel,s,,,64	!最初のはんだ下面を選択
cm,a_cont,area	!a_contという名をつける
asel,s,,,86	!Cu表面を選択
cm,a_targ,area	!a_targという名をつける  TARGがくっつける相手の（通常大きいほうの）面
allsel
r,CNUM
rmodif,CNUM,14,1e6		!14は接触コンダクタンスのこと CONTA174の リアルコンスタントのことらしい
real,CNUM
type,3		!要素ナンバー3のこと 3ということはtarge170
cmsel,s,a_targ	!Cuの表面選択
nsla,s,1	!選択されたエリアに関する節点の選択
esurf		!既存の要素の自由表面に重ねて要素を生成とのこと
type,8	!粗い樹脂と銅
cmsel,s,a_cont	!はんだ下面の選択
nsla,s,1	!選択されたエリアに関する節点の選択
esurf
allsel

CNUM=CNUM+1
allsel
!Create Contact Pair
asel,s,,,65	!最初のはんだ下面を選択
cm,a_cont,area	!a_contという名をつける
asel,s,,,129	!Cu表面を選択
cm,a_targ,area	!a_targという名をつける  TARGがくっつける相手の（通常大きいほうの）面
allsel
r,CNUM
rmodif,CNUM,14,1e6		!14は接触コンダクタンスのこと CONTA174の リアルコンスタントのことらしい
real,CNUM
type,3		!要素ナンバー3のこと 3ということはtarge170
cmsel,s,a_targ	!Cuの表面選択
nsla,s,1	!選択されたエリアに関する節点の選択
esurf		!既存の要素の自由表面に重ねて要素を生成とのこと
type,8	!粗い樹脂と銅
cmsel,s,a_cont	!はんだ下面の選択
nsla,s,1	!選択されたエリアに関する節点の選択
esurf
allsel

!P Gate島側面
CNUM=CNUM+1
allsel
!Create Contact Pair
asel,s,,,68	!最初のはんだ下面を選択
cm,a_cont,area	!a_contという名をつける
asel,s,,,88	!Cu表面を選択
cm,a_targ,area	!a_targという名をつける  TARGがくっつける相手の（通常大きいほうの）面
allsel
r,CNUM
rmodif,CNUM,14,1e6		!14は接触コンダクタンスのこと CONTA174の リアルコンスタントのことらしい
real,CNUM
type,3		!要素ナンバー3のこと 3ということはtarge170
cmsel,s,a_targ	!Cuの表面選択
nsla,s,1	!選択されたエリアに関する節点の選択
esurf		!既存の要素の自由表面に重ねて要素を生成とのこと
type,8	!粗い樹脂と銅
cmsel,s,a_cont	!はんだ下面の選択
nsla,s,1	!選択されたエリアに関する節点の選択
esurf
allsel

CNUM=CNUM+1
allsel
!Create Contact Pair
asel,s,,,69	!最初のはんだ下面を選択
cm,a_cont,area	!a_contという名をつける
asel,s,,,137	!Cu表面を選択
cm,a_targ,area	!a_targという名をつける  TARGがくっつける相手の（通常大きいほうの）面
allsel
r,CNUM
rmodif,CNUM,14,1e6		!14は接触コンダクタンスのこと CONTA174の リアルコンスタントのことらしい
real,CNUM
type,3		!要素ナンバー3のこと 3ということはtarge170
cmsel,s,a_targ	!Cuの表面選択
nsla,s,1	!選択されたエリアに関する節点の選択
esurf		!既存の要素の自由表面に重ねて要素を生成とのこと
type,8	!粗い樹脂と銅
cmsel,s,a_cont	!はんだ下面の選択
nsla,s,1	!選択されたエリアに関する節点の選択
esurf
allsel

CNUM=CNUM+1
allsel
!Create Contact Pair
asel,s,,,70	!最初のはんだ下面を選択
cm,a_cont,area	!a_contという名をつける
asel,s,,,98	!Cu表面を選択
cm,a_targ,area	!a_targという名をつける  TARGがくっつける相手の（通常大きいほうの）面
allsel
r,CNUM
rmodif,CNUM,14,1e6		!14は接触コンダクタンスのこと CONTA174の リアルコンスタントのことらしい
real,CNUM
type,3		!要素ナンバー3のこと 3ということはtarge170
cmsel,s,a_targ	!Cuの表面選択
nsla,s,1	!選択されたエリアに関する節点の選択
esurf		!既存の要素の自由表面に重ねて要素を生成とのこと
type,8	!粗い樹脂と銅
cmsel,s,a_cont	!はんだ下面の選択
nsla,s,1	!選択されたエリアに関する節点の選択
esurf
allsel

CNUM=CNUM+1
allsel
!Create Contact Pair
asel,s,,,71	!最初のはんだ下面を選択
cm,a_cont,area	!a_contという名をつける
asel,s,,,129	!Cu表面を選択
cm,a_targ,area	!a_targという名をつける  TARGがくっつける相手の（通常大きいほうの）面
allsel
r,CNUM
rmodif,CNUM,14,1e6		!14は接触コンダクタンスのこと CONTA174の リアルコンスタントのことらしい
real,CNUM
type,3		!要素ナンバー3のこと 3ということはtarge170
cmsel,s,a_targ	!Cuの表面選択
nsla,s,1	!選択されたエリアに関する節点の選択
esurf		!既存の要素の自由表面に重ねて要素を生成とのこと
type,8	!粗い樹脂と銅
cmsel,s,a_cont	!はんだ下面の選択
nsla,s,1	!選択されたエリアに関する節点の選択
esurf
allsel

!CNUM=73

!評価しない樹脂樹脂側面の接合
*DO,ii,1,2,1
CNUM=CNUM+1
allsel
!Create Contact Pair
asel,s,,,75+(ii-1)*2	!最初のはんだ下面を選択
cm,a_cont,area	!a_contという名をつける
asel,s,,,140+(ii-1)*12	!Cu表面を選択
cm,a_targ,area	!a_targという名をつける  TARGがくっつける相手の（通常大きいほうの）面
allsel
r,CNUM
rmodif,CNUM,14,1e6		!14は接触コンダクタンスのこと CONTA174の リアルコンスタントのことらしい
real,CNUM
type,3		!要素ナンバー3のこと 3ということはtarge170
cmsel,s,a_targ	!Cuの表面選択
nsla,s,1	!選択されたエリアに関する節点の選択
esurf		!既存の要素の自由表面に重ねて要素を生成とのこと
type,5	!評価しない接合
cmsel,s,a_cont	!はんだ下面の選択
nsla,s,1	!選択されたエリアに関する節点の選択
esurf
allsel
*ENDDO

*do,ii,1,2,1
CNUM=CNUM+1
allsel
!Create Contact Pair
asel,s,,,76	!最初のはんだ下面を選択
cm,a_cont,area	!a_contという名をつける
asel,s,,,134-(ii-1)*6	!Cu表面を選択
cm,a_targ,area	!a_targという名をつける  TARGがくっつける相手の（通常大きいほうの）面
allsel
r,CNUM
rmodif,CNUM,14,1e6		!14は接触コンダクタンスのこと CONTA174の リアルコンスタントのことらしい
real,CNUM
type,3		!要素ナンバー3のこと 3ということはtarge170
cmsel,s,a_targ	!Cuの表面選択
nsla,s,1	!選択されたエリアに関する節点の選択
esurf		!既存の要素の自由表面に重ねて要素を生成とのこと
type,5	!評価しない接合
cmsel,s,a_cont	!はんだ下面の選択
nsla,s,1	!選択されたエリアに関する節点の選択
esurf
allsel
*enddo

*do,ii,1,2,1
CNUM=CNUM+1
allsel
!Create Contact Pair
asel,s,,,76	!最初のはんだ下面を選択
cm,a_cont,area	!a_contという名をつける
asel,s,,,116-(ii-1)*6	!Cu表面を選択
cm,a_targ,area	!a_targという名をつける  TARGがくっつける相手の（通常大きいほうの）面
allsel
r,CNUM
rmodif,CNUM,14,1e6		!14は接触コンダクタンスのこと CONTA174の リアルコンスタントのことらしい
real,CNUM
type,3		!要素ナンバー3のこと 3ということはtarge170
cmsel,s,a_targ	!Cuの表面選択
nsla,s,1	!選択されたエリアに関する節点の選択
esurf		!既存の要素の自由表面に重ねて要素を生成とのこと
type,5	!評価しない接合
cmsel,s,a_cont	!はんだ下面の選択
nsla,s,1	!選択されたエリアに関する節点の選択
esurf
allsel
*enddo

*do,ii,1,2,1
CNUM=CNUM+1
allsel
!Create Contact Pair
asel,s,,,81+(ii-1)*2	!最初のはんだ下面を選択
cm,a_cont,area	!a_contという名をつける
asel,s,,,113+(ii-1)*40	!Cu表面を選択
cm,a_targ,area	!a_targという名をつける  TARGがくっつける相手の（通常大きいほうの）面
allsel
r,CNUM
rmodif,CNUM,14,1e6		!14は接触コンダクタンスのこと CONTA174の リアルコンスタントのことらしい
real,CNUM
type,3		!要素ナンバー3のこと 3ということはtarge170
cmsel,s,a_targ	!Cuの表面選択
nsla,s,1	!選択されたエリアに関する節点の選択
esurf		!既存の要素の自由表面に重ねて要素を生成とのこと
type,5	!評価しない接合
cmsel,s,a_cont	!はんだ下面の選択
nsla,s,1	!選択されたエリアに関する節点の選択
esurf
allsel
*enddo

*do,ii,1,2,1
CNUM=CNUM+1
allsel
!Create Contact Pair
asel,s,,,92	!最初のはんだ下面を選択
cm,a_cont,area	!a_contという名をつける
asel,s,,,112+(ii-1)*6	!Cu表面を選択
cm,a_targ,area	!a_targという名をつける  TARGがくっつける相手の（通常大きいほうの）面
allsel
r,CNUM
rmodif,CNUM,14,1e6		!14は接触コンダクタンスのこと CONTA174の リアルコンスタントのことらしい
real,CNUM
type,3		!要素ナンバー3のこと 3ということはtarge170
cmsel,s,a_targ	!Cuの表面選択
nsla,s,1	!選択されたエリアに関する節点の選択
esurf		!既存の要素の自由表面に重ねて要素を生成とのこと
type,5	!評価しない接合
cmsel,s,a_cont	!はんだ下面の選択
nsla,s,1	!選択されたエリアに関する節点の選択
esurf
allsel
*enddo

!CNUM=83
!P側の島周辺樹脂樹脂側面
*do,ii,1,2,1
CNUM=CNUM+1
allsel
!Create Contact Pair
asel,s,,,87+(ii-1)*2	!最初のはんだ下面を選択
cm,a_cont,area	!a_contという名をつける
asel,s,,,137-(ii-1)*8	!Cu表面を選択
cm,a_targ,area	!a_targという名をつける  TARGがくっつける相手の（通常大きいほうの）面
allsel
r,CNUM
rmodif,CNUM,14,1e6		!14は接触コンダクタンスのこと CONTA174の リアルコンスタントのことらしい
real,CNUM
type,3		!要素ナンバー3のこと 3ということはtarge170
cmsel,s,a_targ	!Cuの表面選択
nsla,s,1	!選択されたエリアに関する節点の選択
esurf		!既存の要素の自由表面に重ねて要素を生成とのこと
type,5	!評価しない接合
cmsel,s,a_cont	!はんだ下面の選択
nsla,s,1	!選択されたエリアに関する節点の選択
esurf
allsel
*enddo

*do,ii,1,2,1
CNUM=CNUM+1
allsel
!Create Contact Pair
asel,s,,,98+(ii-1)*3	!最初のはんだ下面を選択
cm,a_cont,area	!a_contという名をつける
asel,s,,,136-(ii-1)*7	!Cu表面を選択
cm,a_targ,area	!a_targという名をつける  TARGがくっつける相手の（通常大きいほうの）面
allsel
r,CNUM
rmodif,CNUM,14,1e6		!14は接触コンダクタンスのこと CONTA174の リアルコンスタントのことらしい
real,CNUM
type,3		!要素ナンバー3のこと 3ということはtarge170
cmsel,s,a_targ	!Cuの表面選択
nsla,s,1	!選択されたエリアに関する節点の選択
esurf		!既存の要素の自由表面に重ねて要素を生成とのこと
type,5	!評価しない接合
cmsel,s,a_cont	!はんだ下面の選択
nsla,s,1	!選択されたエリアに関する節点の選択
esurf
allsel
*enddo

*do,ii,1,2,1
CNUM=CNUM+1
allsel
!Create Contact Pair
asel,s,,,105+(ii-1)*2	!最初のはんだ下面を選択
cm,a_cont,area	!a_contという名をつける
asel,s,,,131-(ii-1)*8	!Cu表面を選択
cm,a_targ,area	!a_targという名をつける  TARGがくっつける相手の（通常大きいほうの）面
allsel
r,CNUM
rmodif,CNUM,14,1e6		!14は接触コンダクタンスのこと CONTA174の リアルコンスタントのことらしい
real,CNUM
type,3		!要素ナンバー3のこと 3ということはtarge170
cmsel,s,a_targ	!Cuの表面選択
nsla,s,1	!選択されたエリアに関する節点の選択
esurf		!既存の要素の自由表面に重ねて要素を生成とのこと
type,5	!評価しない接合
cmsel,s,a_cont	!はんだ下面の選択
nsla,s,1	!選択されたエリアに関する節点の選択
esurf
allsel
*enddo

*do,ii,1,2,1
CNUM=CNUM+1
allsel
!Create Contact Pair
asel,s,,,124+(ii-1)*6	!最初のはんだ下面を選択
cm,a_cont,area	!a_contという名をつける
asel,s,,,146	!Cu表面を選択
cm,a_targ,area	!a_targという名をつける  TARGがくっつける相手の（通常大きいほうの）面
allsel
r,CNUM
rmodif,CNUM,14,1e6		!14は接触コンダクタンスのこと CONTA174の リアルコンスタントのことらしい
real,CNUM
type,3		!要素ナンバー3のこと 3ということはtarge170
cmsel,s,a_targ	!Cuの表面選択
nsla,s,1	!選択されたエリアに関する節点の選択
esurf		!既存の要素の自由表面に重ねて要素を生成とのこと
type,5	!評価しない接合
cmsel,s,a_cont	!はんだ下面の選択
nsla,s,1	!選択されたエリアに関する節点の選択
esurf
allsel
*enddo

*do,ii,1,2,1
CNUM=CNUM+1
allsel
!Create Contact Pair
asel,s,,,147+(ii-1)*2	!最初のはんだ下面を選択
cm,a_cont,area	!a_contという名をつける
asel,s,,,142+(ii-1)*12	!Cu表面を選択
cm,a_targ,area	!a_targという名をつける  TARGがくっつける相手の（通常大きいほうの）面
allsel
r,CNUM
rmodif,CNUM,14,1e6		!14は接触コンダクタンスのこと CONTA174の リアルコンスタントのことらしい
real,CNUM
type,3		!要素ナンバー3のこと 3ということはtarge170
cmsel,s,a_targ	!Cuの表面選択
nsla,s,1	!選択されたエリアに関する節点の選択
esurf		!既存の要素の自由表面に重ねて要素を生成とのこと
type,5	!評価しない接合
cmsel,s,a_cont	!はんだ下面の選択
nsla,s,1	!選択されたエリアに関する節点の選択
esurf
allsel
*enddo

!CNUM=93 下側DBCの上面完了


!下側DBCの下を作成------------------------------------------

D_PLTZ=NINT(PLATEZ2/M_PLTZ)
*IF,D_PLTZ,LT,3,THEN
	D_PLTZ=3
*ENDIF
MAT,3
ASEL,S,AREA,,1
EXTOPT,ESIZE,D_PLTZ   ,,,,,,!要素分割数
EXTOPT,ACLEAR,1,,,,,,,,!ボリューム生成後　パタンエリアメッシュをクリアにする
EXTOPT,ATTR,1,0,0,,,,,,!最初の1:各AREAのMAT踏襲　0:現在のREAL 0:現在の要素座標系踏襲
vext,all,,,0,0,-1*PLATEZ2	!
aclear,all		!面をクリアする必要があるらしい
ALLSEL

D_PLTZ=NINT(DBC_CERA_T2/M_PLTZ)
*IF,D_PLTZ,LT,3,THEN
	D_PLTZ=3
*ENDIF
MAT,4
ASEL,S,AREA,,157
EXTOPT,ESIZE,D_PLTZ   ,,,,,,!要素分割数
EXTOPT,ACLEAR,1,,,,,,,,!ボリューム生成後　パタンエリアメッシュをクリアにする
EXTOPT,ATTR,1,0,0,,,,,,!最初の1:各AREAのMAT踏襲　0:現在のREAL 0:現在の要素座標系踏襲
vext,all,,,0,0,-1*DBC_CERA_T2	!
aclear,all		!面をクリアする必要があるらしい
ALLSEL

!K216,A166,L328,V28
!セラ下の面は162のはず ここに最下段のCuを貼る
MAT,3
TYPE,1	!ET,1のことヘキサメッシュ
MSHAP,0,3d	!0:四角形状　3d：3次元
MSHK,1		!MSHKEYの省略形 1はマップ°メッシュ
*DO,ii,1,2,1
	*DO,jj,1,4,1
		K,216+(ii-1)*4+jj,LOWCU(ii,jj,1),LOWCU(ii,jj,2),LOWCU(ii,jj,3)
	*ENDDO
*ENDDO
V,216+1,216+2,216+3,216+4,216+5,216+6,216+7,216+8
D_PLTX=NINT(PLATEX/M_PLTX)
D_PLTY=NINT(PLATEY/M_PLTY)
D_PLTZ=NINT(PLATEZ3/M_PLTZ)
*IF,D_PLTZ,LT,3,THEN
	D_PLTZ=3
*ENDIF
lsel,s,,,328+5,
lesiz,all,,,D_PLTZ	!z分割
lsel,all
lsel,s,,,328+2
lesiz,all,,,D_PLTY	!たぶん40分割　-20は1/20を指定しているはず　エッジ部分のサイズ
lsel,S,,,328+1
lesiz,all,,,D_PLTX	!たぶん20分割　-20は1/20を指定しているはず　エッジ部分のサイズ
lsel,all
vmesh,29		!ボリュームメッシュ

MAT,7
TYPE,1	!ET,1のことヘキサメッシュ
MSHAP,0,3d	!0:四角形状　3d：3次元
MSHK,1		!MSHKEYの省略形 1はマップ°メッシュ
*DO,ii,1,2,1
	*DO,jj,1,4,1
		K,224+(ii-1)*4+jj,LCERA(ii,jj,1),LCERA(ii,jj,2),LOWCU(ii,jj,3)
	*ENDDO
*ENDDO
V,224+1,224+2,216+2,216+1,224+5,224+6,216+6,216+5
V,216+2,224+2,224+3,216+3,216+6,224+6,224+7,216+7
V,216+4,216+3,224+3,224+4,216+8,216+7,224+7,224+8
V,224+1,216+1,216+4,224+4,224+5,216+5,216+8,224+8

D_PLTY=NINT(ENGAWA/M_RESINY)
lsel,s,,,343
lesiz,all,,,D_PLTY	!たぶん40分割　-20は1/20を指定しているはず　エッジ部分のサイズ
VMESH,30
VMESH,31
VMESH,32
VMESH,33

!最後の下段の接触
CNUM=CNUM+1
allsel
!Create Contact Pair
asel,s,,,162	!最初のはんだ下面を選択
cm,a_cont,area	!a_contという名をつける
asel,s,,,172	!Cu表面を選択
cm,a_targ,area	!a_targという名をつける  TARGがくっつける相手の（通常大きいほうの）面
allsel
r,CNUM
rmodif,CNUM,14,1e6		!14は接触コンダクタンスのこと CONTA174の リアルコンスタントのことらしい
real,CNUM
type,3		!要素ナンバー3のこと 3ということはtarge170
cmsel,s,a_targ	!Cuの表面選択
nsla,s,1	!選択されたエリアに関する節点の選択
esurf		!既存の要素の自由表面に重ねて要素を生成とのこと
type,11	!セラと銅の接触
cmsel,s,a_cont	!はんだ下面の選択
nsla,s,1	!選択されたエリアに関する節点の選択
esurf
allsel

*DO,ii,1,3,1
CNUM=CNUM+1
allsel
!Create Contact Pair
asel,s,,,162	!最初のはんだ下面を選択
cm,a_cont,area	!a_contという名をつける
asel,s,,,177+(ii-1)*4	!Cu表面を選択
cm,a_targ,area	!a_targという名をつける  TARGがくっつける相手の（通常大きいほうの）面
allsel
r,CNUM
rmodif,CNUM,14,1e6		!14は接触コンダクタンスのこと CONTA174の リアルコンスタントのことらしい
real,CNUM
type,3		!要素ナンバー3のこと 3ということはtarge170
cmsel,s,a_targ	!Cuの表面選択
nsla,s,1	!選択されたエリアに関する節点の選択
esurf		!既存の要素の自由表面に重ねて要素を生成とのこと
type,10	!セラと樹脂の接触
cmsel,s,a_cont	!はんだ下面の選択
nsla,s,1	!選択されたエリアに関する節点の選択
esurf
allsel
*ENDDO

CNUM=CNUM+1
allsel
!Create Contact Pair
asel,s,,,162	!最初のはんだ下面を選択
cm,a_cont,area	!a_contという名をつける
asel,s,,,188	!Cu表面を選択
cm,a_targ,area	!a_targという名をつける  TARGがくっつける相手の（通常大きいほうの）面
allsel
r,CNUM
rmodif,CNUM,14,1e6		!14は接触コンダクタンスのこと CONTA174の リアルコンスタントのことらしい
real,CNUM
type,3		!要素ナンバー3のこと 3ということはtarge170
cmsel,s,a_targ	!Cuの表面選択
nsla,s,1	!選択されたエリアに関する節点の選択
esurf		!既存の要素の自由表面に重ねて要素を生成とのこと
type,10	!セラと樹脂の接触
cmsel,s,a_cont	!はんだ下面の選択
nsla,s,1	!選択されたエリアに関する節点の選択
esurf
allsel


!下側のDBC完成！ CNUM=100
!K232,L360,A188,V33
!------------上側DBC------------------------------------------------
MAT,4	!SiN
TYPE,1	!ET,1のことヘキサメッシュ
MSHAP,0,3d	!0:四角形状　3d：3次元
MSHK,1		!MSHKEYの省略形 1はマップ°メッシュ
*DO,ii,1,2,1
	*DO,jj,1,4,1
		k,232+(ii-1)*4+jj,UCERA(ii,jj,1),UCERA(ii,jj,2),UCERA(ii,jj,3)
	*ENDDO
*ENDDO
V,232+1,232+2,232+3,232+4,232+5,232+6,232+7,232+8
!D_PLTX=NINT((PLATEX+ENGAWA*2)/M_CERAX)
!D_PLTY=NINT((UPPLATEY+ENGAWA*2)/M_CERAY)
!D_PLTZ=NINT(DBC_CERA_UPZ/M_CERAZ)
!*IF,D_PLTZ,LT,3,THEN
!	D_PLTZ=3
!*ENDIF
D_CERAY=NINT((UCERA(1,3,2)-UCERA(1,2,2))/M_PLTY)
lsel,s,,,360+5,
lesiz,all,,,D_CERAZ	!z分割
lsel,all
lsel,s,,,360+2
lesiz,all,,,D_CERAY	!たぶん40分割　-20は1/20を指定しているはず　エッジ部分のサイズ
lsel,S,,,360+1
lesiz,all,,,D_CERAX	!たぶん20分割　-20は1/20を指定しているはず　エッジ部分のサイズ
lsel,all
vmesh,34		!ボリュームメッシュ

MAT,3
TYPE,1	!ET,1のことヘキサメッシュ
MSHAP,0,3d	!0:四角形状　3d：3次元
MSHK,1		!MSHKEYの省略形 1はマップ°メッシュ
*DO,ii,1,2,1
	*DO,jj,1,4,1
		k,240+(ii-1)*4+jj,NPLATE2(ii,jj,1),NPLATE2(ii,jj,2),NPLATE2(ii,jj,3)
	*ENDDO
*ENDDO
V,240+1,240+2,240+3,240+4,240+5,240+6,240+7,240+8
D_PLTX=NINT(UPNPLATEX1/M_PLTX)
D_PLTY=NINT(UPPLATEY/M_PLTY)
D_PLTZ=NINT(PLATEUPZ/M_PLTZ)
*IF,D_PLTZ,LT,3,THEN
	D_PLTZ=3
*ENDIF
lsel,s,,,372+5,
lesiz,all,,,D_PLTZ	!z分割
lsel,all
lsel,s,,,372+2
lesiz,all,,,D_PLTY	!たぶん40分割　-20は1/20を指定しているはず　エッジ部分のサイズ
lsel,S,,,372+1
lesiz,all,,,D_PLTX	!たぶん20分割　-20は1/20を指定しているはず　エッジ部分のサイズ
lsel,all
vmesh,35		!ボリュームメッシュ

*DO,ii,1,2,1
	*DO,jj,1,4,1
		k,248+(ii-1)*4+jj,NPLATE3(ii,jj,1),NPLATE3(ii,jj,2),NPLATE3(ii,jj,3)
	*ENDDO
*ENDDO
V,248+1,248+2,248+3,248+4,248+5,248+6,248+7,248+8
D_PLTX=NINT((UPNPLATEX-UPNPLATEX1)/M_PLTX)
D_PLTY=NINT((NPLATE3(1,4,2)-NPLATE3(1,1,2))/M_PLTY)
!D_PLTZ=NINT(PLATEUPZ/M_PLTZ)
!*IF,D_PLTZ,LT,3,THEN
!	D_PLTZ=3
!*ENDIF
lsel,s,,,384+5,
lesiz,all,,,D_PLTZ
lsel,all
lsel,s,,,384+2
lesiz,all,,,D_PLTY
lsel,S,,,384+1
lesiz,all,,,D_PLTX
lsel,all
vmesh,36

*DO,ii,1,2,1
	*DO,jj,1,4,1
		k,256+(ii-1)*4+jj,OPLATE4(ii,jj,1),OPLATE4(ii,jj,2),OPLATE4(ii,jj,3)
	*ENDDO
*ENDDO
V,256+1,256+2,256+3,256+4,256+5,256+6,256+7,256+8
D_PLTX=NINT((OPLATE4(1,2,1)-OPLATE4(1,1,1))/M_PLTX)
D_PLTY=NINT((OPLATE4(1,4,2)-OPLATE4(1,1,2))/M_PLTY)
!D_PLTZ=NINT(PLATEUPZ/M_PLTZ)
!*IF,D_PLTZ,LT,3,THEN
!	D_PLTZ=3
!*ENDIF
lsel,s,,,396+5,
lesiz,all,,,D_PLTZ
lsel,all
lsel,s,,,396+2
lesiz,all,,,D_PLTY
lsel,S,,,396+1
lesiz,all,,,D_PLTX
lsel,all
vmesh,37

*DO,ii,1,2,1
	*DO,jj,1,4,1
		k,264+(ii-1)*4+jj,OPLATE5(ii,jj,1),OPLATE5(ii,jj,2),OPLATE5(ii,jj,3)
	*ENDDO
*ENDDO
V,264+1,264+2,264+3,264+4,264+5,264+6,264+7,264+8
D_PLTX=NINT((OPLATE5(1,2,1)-OPLATE5(1,1,1))/M_PLTX)
D_PLTY=NINT((OPLATE5(1,4,2)-OPLATE5(1,1,2))/M_PLTY)
!D_PLTZ=NINT(PLATEUPZ/M_PLTZ)
!*IF,D_PLTZ,LT,3,THEN
!	D_PLTZ=3
!*ENDIF
lsel,s,,,408+5,
lesiz,all,,,D_PLTZ
lsel,all
lsel,s,,,408+2
lesiz,all,,,D_PLTY
lsel,S,,,408+1
lesiz,all,,,D_PLTX
lsel,all
vmesh,38

!上DBC 下面樹脂の作成----------------
MAT,7
TYPE,1	!ET,1のことヘキサメッシュ
MSHAP,0,3d	!0:四角形状　3d：3次元
MSHK,1		!MSHKEYの省略形 1はマップ°メッシュ
*DO,ii,1,2,1
		k,272+(ii-1)*4+1,NPLATE2(ii,1,1)-ENGAWA,UCERA(ii,1,2),NPLATE2(ii,1,3)
		k,272+(ii-1)*4+2,OPLATE5(ii,2,1)+ENGAWA,UCERA(ii,2,2),NPLATE2(ii,1,3)
		k,272+(ii-1)*4+3,OPLATE5(ii,2,1),OPLATE5(ii,1,2),NPLATE2(ii,1,3)
		k,272+(ii-1)*4+4,NPLATE2(ii,1,1),OPLATE5(ii,1,2),NPLATE2(ii,1,3)
*ENDDO
V,272+1,272+2,272+3,272+4,272+5,272+6,272+7,272+8
D_PLTX=NINT(PLATEX/M_RESINX)
D_PLTY=NINT(ENGAWA/M_RESINY)
!D_PLTZ=NINT(PLATEUPZ/M_RESINZ)
!*IF,D_PLTZ,LT,3,THEN
!	D_PLTZ=3
!*ENDIF
lsel,s,,,420+5,
lesiz,all,,,D_PLTZ	!z分割
lsel,all
lsel,s,,,420+2
lesiz,all,,,D_PLTY	!たぶん40分割　-20は1/20を指定しているはず　エッジ部分のサイズ
lsel,S,,,420+1
lesiz,all,,,D_PLTX	!たぶん20分割　-20は1/20を指定しているはず　エッジ部分のサイズ
lsel,all
vmesh,39		!ボリュームメッシュ

*DO,ii,1,2,1
		k,280+(ii-1)*4+1,OPLATE5(ii,2,1),UCERA(ii,1,2)+ENGAWA,NPLATE2(ii,1,3)
		k,280+(ii-1)*4+2,UCERA(ii,2,1),UCERA(ii,2,2),NPLATE2(ii,1,3)
		k,280+(ii-1)*4+3,UCERA(ii,3,1),UCERA(ii,3,2),NPLATE2(ii,1,3)
		k,280+(ii-1)*4+4,OPLATE5(ii,3,1),UCERA(ii,3,2)-ENGAWA,NPLATE2(ii,1,3)
*ENDDO
V,280+1,280+2,280+3,280+4,280+5,280+6,280+7,280+8
D_PLTX=NINT(ENGAWA/M_RESINX)
D_PLTY=NINT((UPPLATEY)/M_RESINY)
!D_PLTZ=NINT(PLATEUPZ/M_RESINZ)
!*IF,D_PLTZ,LT,3,THEN
!	D_PLTZ=3
!*ENDIF
lsel,s,,,432+5,
lesiz,all,,,D_PLTZ	!z分割
lsel,all
lsel,s,,,432+2
lesiz,all,,,D_PLTY	!たぶん40分割　-20は1/20を指定しているはず　エッジ部分のサイズ
lsel,S,,,432+1
lesiz,all,,,D_PLTX	!たぶん20分割　-20は1/20を指定しているはず　エッジ部分のサイズ
lsel,all
vmesh,40		!ボリュームメッシュ

*DO,ii,1,2,1
		k,288+(ii-1)*4+1,NPLATE2(ii,4,1),NPLATE2(ii,4,2),NPLATE2(ii,1,3)
		k,288+(ii-1)*4+2,OPLATE5(ii,3,1),NPLATE2(ii,4,2),NPLATE2(ii,1,3)
		k,288+(ii-1)*4+3,OPLATE5(ii,3,1)+ENGAWA,UCERA(ii,3,2),NPLATE2(ii,1,3)
		k,288+(ii-1)*4+4,NPLATE2(ii,4,1)-ENGAWA,UCERA(ii,4,2),NPLATE2(ii,1,3)
*ENDDO
V,288+1,288+2,288+3,288+4,288+5,288+6,288+7,288+8
D_PLTX=NINT(PLATEX/M_RESINX)
D_PLTY=NINT(ENGAWA/M_RESINY)
!D_PLTZ=NINT(PLATEUPZ/M_RESINZ)
!*IF,D_PLTZ,LT,3,THEN
!	D_PLTZ=3
!*ENDIF
lsel,s,,,444+5,
lesiz,all,,,D_PLTZ	!z分割
lsel,all
lsel,s,,,444+2
lesiz,all,,,D_PLTY	!たぶん40分割　-20は1/20を指定しているはず　エッジ部分のサイズ
lsel,S,,,444+1
lesiz,all,,,D_PLTX	!たぶん20分割　-20は1/20を指定しているはず　エッジ部分のサイズ
lsel,all
vmesh,41		!ボリュームメッシュ


*DO,ii,1,2,1
		k,296+(ii-1)*4+1,UCERA(ii,1,1),UCERA(ii,1,2),NPLATE2(ii,1,3)
		k,296+(ii-1)*4+2,NPLATE2(ii,1,1),UCERA(ii,1,2)+ENGAWA,NPLATE2(ii,1,3)
		k,296+(ii-1)*4+3,NPLATE2(ii,4,1),UCERA(ii,4,2)-ENGAWA,NPLATE2(ii,1,3)
		k,296+(ii-1)*4+4,UCERA(ii,4,1),UCERA(ii,4,2),NPLATE2(ii,1,3)
*ENDDO
V,296+1,296+2,296+3,296+4,296+5,296+6,296+7,296+8
D_PLTX=NINT(ENGAWA/M_RESINX)
D_PLTY=NINT((UPPLATEY)/M_RESINY)
!D_PLTZ=NINT(PLATEUPZ/M_RESINZ)
!*IF,D_PLTZ,LT,3,THEN
!	D_PLTZ=3
!*ENDIF
lsel,s,,,456+5,
lesiz,all,,,D_PLTZ	!z分割
lsel,all
lsel,s,,,456+2
lesiz,all,,,D_PLTY	!たぶん40分割　-20は1/20を指定しているはず　エッジ部分のサイズ
lsel,S,,,456+1
lesiz,all,,,D_PLTX	!たぶん20分割　-20は1/20を指定しているはず　エッジ部分のサイズ
lsel,all
vmesh,42		!ボリュームメッシュ

*DO,ii,1,2,1
		k,304+(ii-1)*4+1,NPLATE2(ii,2,1),NPLATE2(ii,2,2),NPLATE2(ii,1,3)
		k,304+(ii-1)*4+2,OPLATE4(ii,1,1),OPLATE4(ii,1,2),NPLATE2(ii,1,3)
		k,304+(ii-1)*4+3,OPLATE4(ii,4,1),OPLATE4(ii,4,2),NPLATE2(ii,1,3)
		k,304+(ii-1)*4+4,NPLATE2(ii,2,1),OPLATE4(ii,4,2),NPLATE2(ii,1,3)
*ENDDO
V,304+1,304+2,304+3,304+4,304+5,304+6,304+7,304+8
D_PLTX=NINT(GROOVE/M_RESINX)
D_PLTY=NINT((OPLATE4(1,4,2)-OPLATE4(1,1,2))/M_RESINY)
!D_PLTZ=NINT(PLATEUPZ/M_RESINZ)
!*IF,D_PLTZ,LT,3,THEN
!	D_PLTZ=3
!*ENDIF
lsel,s,,,468+5,
lesiz,all,,,D_PLTZ	!z分割
lsel,all
lsel,s,,,468+2
lesiz,all,,,D_PLTY	!たぶん40分割　-20は1/20を指定しているはず　エッジ部分のサイズ
lsel,S,,,468+1
lesiz,all,,,D_PLTX	!たぶん20分割　-20は1/20を指定しているはず　エッジ部分のサイズ
lsel,all
vmesh,43		!ボリュームメッシュ

*DO,ii,1,2,1
		k,312+(ii-1)*4+1,NPLATE2(ii,2,1),OPLATE4(ii,4,2),NPLATE2(ii,1,3)
		k,312+(ii-1)*4+2,OPLATE4(ii,3,1),OPLATE4(ii,4,2),NPLATE2(ii,1,3)
		k,312+(ii-1)*4+3,OPLATE4(ii,3,1),NPLATE3(ii,1,2),NPLATE2(ii,1,3)
		k,312+(ii-1)*4+4,NPLATE3(ii,1,1),NPLATE3(ii,1,2),NPLATE2(ii,1,3)
*ENDDO
V,312+1,312+2,312+3,312+4,312+5,312+6,312+7,312+8
D_PLTX=NINT((OPLATE4(1,3,1)-NPLATE2(1,2,1))/M_RESINX)
D_PLTY=NINT(GROOVE/M_RESINY)
!D_PLTZ=NINT(PLATEUPZ/M_RESINZ)
!*IF,D_PLTZ,LT,3,THEN
!	D_PLTZ=3
!*ENDIF
lsel,s,,,480+5,
lesiz,all,,,D_PLTZ	!z分割
lsel,all
lsel,s,,,480+2
lesiz,all,,,D_PLTY	!たぶん40分割　-20は1/20を指定しているはず　エッジ部分のサイズ
lsel,S,,,480+1
lesiz,all,,,D_PLTX	!たぶん20分割　-20は1/20を指定しているはず　エッジ部分のサイズ
lsel,all
vmesh,44		!ボリュームメッシュ

*DO,ii,1,2,1
		k,320+(ii-1)*4+1,NPLATE3(ii,2,1),NPLATE3(ii,2,2),NPLATE2(ii,1,3)
		k,320+(ii-1)*4+2,OPLATE5(ii,1,1),NPLATE3(ii,2,2),NPLATE2(ii,1,3)
		k,320+(ii-1)*4+3,OPLATE5(ii,1,1),OPLATE5(ii,4,2),NPLATE2(ii,1,3)
		k,320+(ii-1)*4+4,NPLATE3(ii,2,1),NPLATE3(ii,3,2),NPLATE2(ii,1,3)
*ENDDO
V,320+1,320+2,320+3,320+4,320+5,320+6,320+7,320+8
D_PLTX=NINT(GROOVE/M_RESINX)
D_PLTY=NINT((NPLATE3(1,3,2)-NPLATE3(1,2,2))/M_RESINY)
!D_PLTZ=NINT(PLATEUPZ/M_RESINZ)
!*IF,D_PLTZ,LT,3,THEN
!	D_PLTZ=3
!*ENDIF
lsel,s,,,492+5,
lesiz,all,,,D_PLTZ	!z分割
lsel,all
lsel,s,,,492+2
lesiz,all,,,D_PLTY	!たぶん40分割　-20は1/20を指定しているはず　エッジ部分のサイズ
lsel,S,,,492+1
lesiz,all,,,D_PLTX	!たぶん20分割　-20は1/20を指定しているはず　エッジ部分のサイズ
lsel,all
vmesh,45		!ボリュームメッシュ

!ここまでCNUM=98

!上側DBC下面の接触
!まずは、セラとの接触----------------------------------------------------------
*DO,ii,1,4,1
CNUM=CNUM+1
allsel
!Create Contact Pair
asel,s,,,200+(ii-1)*6	!最初のはんだ下面を選択
cm,a_cont,area	!a_contという名をつける
asel,s,,,189	!Cu表面を選択
cm,a_targ,area	!a_targという名をつける  TARGがくっつける相手の（通常大きいほうの）面
allsel
r,CNUM
rmodif,CNUM,14,1e6		!14は接触コンダクタンスのこと CONTA174の リアルコンスタントのことらしい
real,CNUM
type,3		!要素ナンバー3のこと 3ということはtarge170
cmsel,s,a_targ	!Cuの表面選択
nsla,s,1	!選択されたエリアに関する節点の選択
esurf		!既存の要素の自由表面に重ねて要素を生成とのこと
type,11	!セラと銅の接触
cmsel,s,a_cont	!はんだ下面の選択
nsla,s,1	!選択されたエリアに関する節点の選択
esurf
allsel
*ENDDO

*DO,ii,5,11,1
CNUM=CNUM+1
allsel
!Create Contact Pair
asel,s,,,200+(ii-1)*6	!最初のはんだ下面を選択
cm,a_cont,area	!a_contという名をつける
asel,s,,,189	!Cu表面を選択
cm,a_targ,area	!a_targという名をつける  TARGがくっつける相手の（通常大きいほうの）面
allsel
r,CNUM
rmodif,CNUM,14,1e6		!14は接触コンダクタンスのこと CONTA174の リアルコンスタントのことらしい
real,CNUM
type,3		!要素ナンバー3のこと 3ということはtarge170
cmsel,s,a_targ	!Cuの表面選択
nsla,s,1	!選択されたエリアに関する節点の選択
esurf		!既存の要素の自由表面に重ねて要素を生成とのこと
type,10	!セラ樹脂の接触
cmsel,s,a_cont	!はんだ下面の選択
nsla,s,1	!選択されたエリアに関する節点の選択
esurf
allsel
*ENDDO

!ここまでCNUM=109
!銅どうしの接続
*DO,ii,1,2,1
CNUM=CNUM+1
allsel
!Create Contact Pair
asel,s,,,197+(ii-1)*12	!最初のはんだ下面を選択
cm,a_cont,area	!a_contという名をつける
asel,s,,,205+(ii-1)*12	!Cu表面を選択
cm,a_targ,area	!a_targという名をつける  TARGがくっつける相手の（通常大きいほうの）面
allsel
r,CNUM
rmodif,CNUM,14,1e6		!14は接触コンダクタンスのこと CONTA174の リアルコンスタントのことらしい
real,CNUM
type,3		!要素ナンバー3のこと 3ということはtarge170
cmsel,s,a_targ	!Cuの表面選択
nsla,s,1	!選択されたエリアに関する節点の選択
esurf		!既存の要素の自由表面に重ねて要素を生成とのこと
type,5	!評価しない接触
cmsel,s,a_cont	!はんだ下面の選択
nsla,s,1	!選択されたエリアに関する節点の選択
esurf
allsel
*ENDDO
!*GO,:OWARI
!樹脂と銅の接触　222-196 222-208 222-214 229-215 232-198 232-204 232-216 239-199 247-197 245-211 210-250 217-251 202-252 197-253   203-259 217-257
*DO,ii,1,2,1
CNUM=CNUM+1
allsel
!Create Contact Pair
asel,s,,,222	!最初のはんだ下面を選択
cm,a_cont,area	!a_contという名をつける
asel,s,,,196+(ii-1)*12	!Cu表面を選択
cm,a_targ,area	!a_targという名をつける  TARGがくっつける相手の（通常大きいほうの）面
allsel
r,CNUM
rmodif,CNUM,14,1e6		!14は接触コンダクタンスのこと CONTA174の リアルコンスタントのことらしい
real,CNUM
type,3		!要素ナンバー3のこと 3ということはtarge170
cmsel,s,a_targ	!Cuの表面選択
nsla,s,1	!選択されたエリアに関する節点の選択
esurf		!既存の要素の自由表面に重ねて要素を生成とのこと
type,8	!粗い樹脂と銅の接触
cmsel,s,a_cont	!はんだ下面の選択
nsla,s,1	!選択されたエリアに関する節点の選択
esurf
allsel
*ENDDO

*DO,ii,1,2,1
CNUM=CNUM+1
allsel
!Create Contact Pair
asel,s,,,222+(ii-1)*7	!最初のはんだ下面を選択
cm,a_cont,area	!a_contという名をつける
asel,s,,,214+(ii-1)	!Cu表面を選択
cm,a_targ,area	!a_targという名をつける  TARGがくっつける相手の（通常大きいほうの）面
allsel
r,CNUM
rmodif,CNUM,14,1e6		!14は接触コンダクタンスのこと CONTA174の リアルコンスタントのことらしい
real,CNUM
type,3		!要素ナンバー3のこと 3ということはtarge170
cmsel,s,a_targ	!Cuの表面選択
nsla,s,1	!選択されたエリアに関する節点の選択
esurf		!既存の要素の自由表面に重ねて要素を生成とのこと
type,8	!粗い樹脂と銅の接触
cmsel,s,a_cont	!はんだ下面の選択
nsla,s,1	!選択されたエリアに関する節点の選択
esurf
allsel
*ENDDO

*DO,ii,1,2,1
CNUM=CNUM+1
allsel
!Create Contact Pair
asel,s,,,232	!最初のはんだ下面を選択
cm,a_cont,area	!a_contという名をつける
asel,s,,,198+(ii-1)*6	!Cu表面を選択
cm,a_targ,area	!a_targという名をつける  TARGがくっつける相手の（通常大きいほうの）面
allsel
r,CNUM
rmodif,CNUM,14,1e6		!14は接触コンダクタンスのこと CONTA174の リアルコンスタントのことらしい
real,CNUM
type,3		!要素ナンバー3のこと 3ということはtarge170
cmsel,s,a_targ	!Cuの表面選択
nsla,s,1	!選択されたエリアに関する節点の選択
esurf		!既存の要素の自由表面に重ねて要素を生成とのこと
type,8	!粗い樹脂と銅の接触
cmsel,s,a_cont	!はんだ下面の選択
nsla,s,1	!選択されたエリアに関する節点の選択
esurf
allsel
*ENDDO

*DO,ii,1,2,1
CNUM=CNUM+1
allsel
!Create Contact Pair
asel,s,,,232+(ii-1)*7	!最初のはんだ下面を選択
cm,a_cont,area	!a_contという名をつける
asel,s,,,216-(ii-1)*17	!Cu表面を選択
cm,a_targ,area	!a_targという名をつける  TARGがくっつける相手の（通常大きいほうの）面
allsel
r,CNUM
rmodif,CNUM,14,1e6		!14は接触コンダクタンスのこと CONTA174の リアルコンスタントのことらしい
real,CNUM
type,3		!要素ナンバー3のこと 3ということはtarge170
cmsel,s,a_targ	!Cuの表面選択
nsla,s,1	!選択されたエリアに関する節点の選択
esurf		!既存の要素の自由表面に重ねて要素を生成とのこと
type,8	!粗い樹脂と銅の接触
cmsel,s,a_cont	!はんだ下面の選択
nsla,s,1	!選択されたエリアに関する節点の選択
esurf
allsel
*ENDDO

*DO,ii,1,2,1
CNUM=CNUM+1
allsel
!Create Contact Pair
asel,s,,,247-(ii-1)*2	!最初のはんだ下面を選択
cm,a_cont,area	!a_contという名をつける
asel,s,,,197+(ii-1)*14	!Cu表面を選択
cm,a_targ,area	!a_targという名をつける  TARGがくっつける相手の（通常大きいほうの）面
allsel
r,CNUM
rmodif,CNUM,14,1e6		!14は接触コンダクタンスのこと CONTA174の リアルコンスタントのことらしい
real,CNUM
type,3		!要素ナンバー3のこと 3ということはtarge170
cmsel,s,a_targ	!Cuの表面選択
nsla,s,1	!選択されたエリアに関する節点の選択
esurf		!既存の要素の自由表面に重ねて要素を生成とのこと
type,8	!粗い樹脂と銅の接触
cmsel,s,a_cont	!はんだ下面の選択
nsla,s,1	!選択されたエリアに関する節点の選択
esurf
allsel
*ENDDO

*DO,ii,1,2,1
CNUM=CNUM+1
allsel
!Create Contact Pair
asel,s,,,210+(ii-1)*7	!最初のはんだ下面を選択
cm,a_cont,area	!a_contという名をつける
asel,s,,,250+(ii-1)	!Cu表面を選択
cm,a_targ,area	!a_targという名をつける  TARGがくっつける相手の（通常大きいほうの）面
allsel
r,CNUM
rmodif,CNUM,14,1e6		!14は接触コンダクタンスのこと CONTA174の リアルコンスタントのことらしい
real,CNUM
type,3		!要素ナンバー3のこと 3ということはtarge170
cmsel,s,a_targ	!Cuの表面選択
nsla,s,1	!選択されたエリアに関する節点の選択
esurf		!既存の要素の自由表面に重ねて要素を生成とのこと
type,8	!粗い樹脂と銅の接触
cmsel,s,a_cont	!はんだ下面の選択
nsla,s,1	!選択されたエリアに関する節点の選択
esurf
allsel
*ENDDO

*DO,ii,1,2,1
CNUM=CNUM+1
allsel
!Create Contact Pair
asel,s,,,202-(ii-1)*5	!最初のはんだ下面を選択
cm,a_cont,area	!a_contという名をつける
asel,s,,,252+(ii-1)	!Cu表面を選択
cm,a_targ,area	!a_targという名をつける  TARGがくっつける相手の（通常大きいほうの）面
allsel
r,CNUM
rmodif,CNUM,14,1e6		!14は接触コンダクタンスのこと CONTA174の リアルコンスタントのことらしい
real,CNUM
type,3		!要素ナンバー3のこと 3ということはtarge170
cmsel,s,a_targ	!Cuの表面選択
nsla,s,1	!選択されたエリアに関する節点の選択
esurf		!既存の要素の自由表面に重ねて要素を生成とのこと
type,8	!粗い樹脂と銅の接触
cmsel,s,a_cont	!はんだ下面の選択
nsla,s,1	!選択されたエリアに関する節点の選択
esurf
allsel
*ENDDO

*DO,ii,1,2,1
CNUM=CNUM+1
allsel
!Create Contact Pair
asel,s,,,203+(ii-1)*14	!最初のはんだ下面を選択
cm,a_cont,area	!a_contという名をつける
asel,s,,,259-(ii-1)*2	!Cu表面を選択
cm,a_targ,area	!a_targという名をつける  TARGがくっつける相手の（通常大きいほうの）面
allsel
r,CNUM
rmodif,CNUM,14,1e6		!14は接触コンダクタンスのこと CONTA174の リアルコンスタントのことらしい
real,CNUM
type,3		!要素ナンバー3のこと 3ということはtarge170
cmsel,s,a_targ	!Cuの表面選択
nsla,s,1	!選択されたエリアに関する節点の選択
esurf		!既存の要素の自由表面に重ねて要素を生成とのこと
type,8	!粗い樹脂と銅の接触
cmsel,s,a_cont	!はんだ下面の選択
nsla,s,1	!選択されたエリアに関する節点の選択
esurf
allsel
*ENDDO

!CNUM=127
!樹脂同士の接合 223-238 222-244 221-226 228-233 232-258 235-240     246-250 252-256
*DO,ii,1,2,1
CNUM=CNUM+1
allsel
!Create Contact Pair
asel,s,,,223-(ii-1)	!最初のはんだ下面を選択
cm,a_cont,area	!a_contという名をつける
asel,s,,,238+(ii-1)*6	!Cu表面を選択
cm,a_targ,area	!a_targという名をつける  TARGがくっつける相手の（通常大きいほうの）面
allsel
r,CNUM
rmodif,CNUM,14,1e6		!14は接触コンダクタンスのこと CONTA174の リアルコンスタントのことらしい
real,CNUM
type,3		!要素ナンバー3のこと 3ということはtarge170
cmsel,s,a_targ	!Cuの表面選択
nsla,s,1	!選択されたエリアに関する節点の選択
esurf		!既存の要素の自由表面に重ねて要素を生成とのこと
type,5	!評価しない接触
cmsel,s,a_cont	!はんだ下面の選択
nsla,s,1	!選択されたエリアに関する節点の選択
esurf
allsel
*ENDDO

*DO,ii,1,2,1
CNUM=CNUM+1
allsel
!Create Contact Pair
asel,s,,,221+(ii-1)*7	!最初のはんだ下面を選択
cm,a_cont,area	!a_contという名をつける
asel,s,,,226+(ii-1)*7	!Cu表面を選択
cm,a_targ,area	!a_targという名をつける  TARGがくっつける相手の（通常大きいほうの）面
allsel
r,CNUM
rmodif,CNUM,14,1e6		!14は接触コンダクタンスのこと CONTA174の リアルコンスタントのことらしい
real,CNUM
type,3		!要素ナンバー3のこと 3ということはtarge170
cmsel,s,a_targ	!Cuの表面選択
nsla,s,1	!選択されたエリアに関する節点の選択
esurf		!既存の要素の自由表面に重ねて要素を生成とのこと
type,5	!評価しない接触
cmsel,s,a_cont	!はんだ下面の選択
nsla,s,1	!選択されたエリアに関する節点の選択
esurf
allsel
*ENDDO

*DO,ii,1,2,1
CNUM=CNUM+1
allsel
!Create Contact Pair
asel,s,,,232+(ii-1)*3	!最初のはんだ下面を選択
cm,a_cont,area	!a_contという名をつける
asel,s,,,258-(ii-1)*18	!Cu表面を選択
cm,a_targ,area	!a_targという名をつける  TARGがくっつける相手の（通常大きいほうの）面
allsel
r,CNUM
rmodif,CNUM,14,1e6		!14は接触コンダクタンスのこと CONTA174の リアルコンスタントのことらしい
real,CNUM
type,3		!要素ナンバー3のこと 3ということはtarge170
cmsel,s,a_targ	!Cuの表面選択
nsla,s,1	!選択されたエリアに関する節点の選択
esurf		!既存の要素の自由表面に重ねて要素を生成とのこと
type,5	!評価しない接触
cmsel,s,a_cont	!はんだ下面の選択
nsla,s,1	!選択されたエリアに関する節点の選択
esurf
allsel
*ENDDO

*DO,ii,1,2,1
CNUM=CNUM+1
allsel
!Create Contact Pair
asel,s,,,246+(ii-1)*6	!最初のはんだ下面を選択
cm,a_cont,area	!a_contという名をつける
asel,s,,,250+(ii-1)*6	!Cu表面を選択
cm,a_targ,area	!a_targという名をつける  TARGがくっつける相手の（通常大きいほうの）面
allsel
r,CNUM
rmodif,CNUM,14,1e6		!14は接触コンダクタンスのこと CONTA174の リアルコンスタントのことらしい
real,CNUM
type,3		!要素ナンバー3のこと 3ということはtarge170
cmsel,s,a_targ	!Cuの表面選択
nsla,s,1	!選択されたエリアに関する節点の選択
esurf		!既存の要素の自由表面に重ねて要素を生成とのこと
type,5	!評価しない接触
cmsel,s,a_cont	!はんだ下面の選択
nsla,s,1	!選択されたエリアに関する節点の選択
esurf
allsel
*ENDDO

!CNUM=135 ここまで
!ここまでで、上DBCの下面電極の接合まで完了

!上に電極を伸ばす-------------------------------------------------------------------------------------------------------------------------------
!K328,L504,A260,V45
D_PLTZ=NINT(PLATEUPZ2/M_PLTZ)
*IF,D_PLTZ,LT,3,THEN
	D_PLTZ=3
*ENDIF
MAT,3
ASEL,S,AREA,,194
EXTOPT,ESIZE,D_PLTZ   ,,,,,,!要素分割数
EXTOPT,ACLEAR,1,,,,,,,,!ボリューム生成後　パタンエリアメッシュをクリアにする
EXTOPT,ATTR,1,0,0,,,,,,!最初の1:各AREAのMAT踏襲　0:現在のREAL 0:現在の要素座標系踏襲
vext,all,,,0,0,PLATEUPZ2	!
aclear,all		!面をクリアする必要があるらしい
ALLSEL

D_PLTZ=NINT(DBC_CERA_UPT2/M_PLTZ)
*IF,D_PLTZ,LT,3,THEN
	D_PLTZ=3
*ENDIF
MAT,4
ASEL,S,AREA,,261
EXTOPT,ESIZE,D_PLTZ   ,,,,,,!要素分割数
EXTOPT,ACLEAR,1,,,,,,,,!ボリューム生成後　パタンエリアメッシュをクリアにする
EXTOPT,ATTR,1,0,0,,,,,,!最初の1:各AREAのMAT踏襲　0:現在のREAL 0:現在の要素座標系踏襲
vext,all,,,0,0,DBC_CERA_UPT2	!
aclear,all		!面をクリアする必要があるらしい
ALLSEL

!K,A,L,V
!セラ上の面は266のはず ここに最下段のCuを貼る
MAT,3
TYPE,1	!ET,1のことヘキサメッシュ
MSHAP,0,3d	!0:四角形状　3d：3次元
MSHK,1		!MSHKEYの省略形 1はマップ°メッシュ
*DO,ii,1,2,1
	*DO,jj,1,4,1
		K,336+(ii-1)*4+jj,UPCU(ii,jj,1),UPCU(ii,jj,2),UPCU(ii,jj,3)
	*ENDDO
*ENDDO
V,336+1,336+2,336+3,336+4,336+5,336+6,336+7,336+8
D_PLTX=NINT(PLATEX/M_PLTX)
D_PLTY=NINT(UPPLATEY/M_PLTY)
D_PLTZ=NINT(PLATEUPZ3/M_PLTZ)
*IF,D_PLTZ,LT,3,THEN
	D_PLTZ=3
*ENDIF
lsel,s,,,520+5,
lesiz,all,,,D_PLTZ	!z分割
lsel,all
lsel,s,,,520+2
lesiz,all,,,D_PLTY	!たぶん40分割　-20は1/20を指定しているはず　エッジ部分のサイズ
lsel,S,,,520+1
lesiz,all,,,D_PLTX	!たぶん20分割　-20は1/20を指定しているはず　エッジ部分のサイズ
lsel,all
vmesh,48		!ボリュームメッシュ

MAT,7
TYPE,1	!ET,1のことヘキサメッシュ
MSHAP,0,3d	!0:四角形状　3d：3次元
MSHK,1		!MSHKEYの省略形 1はマップ°メッシュ  216->336 224->344
*DO,ii,1,2,1
	*DO,jj,1,4,1
		K,344+(ii-1)*4+jj,UCERA(ii,jj,1),UCERA(ii,jj,2),UPCU(ii,jj,3)
	*ENDDO
*ENDDO
V,344+1,344+2,336+2,336+1,344+5,344+6,336+6,336+5
V,336+2,344+2,344+3,336+3,336+6,344+6,344+7,336+7
V,336+4,336+3,344+3,344+4,336+8,336+7,344+7,344+8
V,344+1,336+1,336+4,344+4,344+5,336+5,336+8,344+8

D_PLTY=NINT(ENGAWA/M_RESINY)
lsel,s,,,539
lesiz,all,,,D_PLTY	!たぶん40分割　-20は1/20を指定しているはず　エッジ部分のサイズ
VMESH,49
VMESH,50
VMESH,51
VMESH,52

!最後の上段の接触
CNUM=CNUM+1
allsel
!Create Contact Pair
asel,s,,,266	!最初のはんだ下面を選択
cm,a_cont,area	!a_contという名をつける
asel,s,,,271	!Cu表面を選択
cm,a_targ,area	!a_targという名をつける  TARGがくっつける相手の（通常大きいほうの）面
allsel
r,CNUM
rmodif,CNUM,14,1e6		!14は接触コンダクタンスのこと CONTA174の リアルコンスタントのことらしい
real,CNUM
type,3		!要素ナンバー3のこと 3ということはtarge170
cmsel,s,a_targ	!Cuの表面選択
nsla,s,1	!選択されたエリアに関する節点の選択
esurf		!既存の要素の自由表面に重ねて要素を生成とのこと
type,11	!セラと銅の接触
cmsel,s,a_cont	!はんだ下面の選択
nsla,s,1	!選択されたエリアに関する節点の選択
esurf
allsel

*DO,ii,1,2,1
CNUM=CNUM+1
allsel
!Create Contact Pair
asel,s,,,266	!最初のはんだ下面を選択
cm,a_cont,area	!a_contという名をつける
asel,s,,,277+(ii-1)*5	!Cu表面を選択
cm,a_targ,area	!a_targという名をつける  TARGがくっつける相手の（通常大きいほうの）面
allsel
r,CNUM
rmodif,CNUM,14,1e6		!14は接触コンダクタンスのこと CONTA174の リアルコンスタントのことらしい
real,CNUM
type,3		!要素ナンバー3のこと 3ということはtarge170
cmsel,s,a_targ	!Cuの表面選択
nsla,s,1	!選択されたエリアに関する節点の選択
esurf		!既存の要素の自由表面に重ねて要素を生成とのこと
type,10	!セラと樹脂の接触
cmsel,s,a_cont	!はんだ下面の選択
nsla,s,1	!選択されたエリアに関する節点の選択
esurf
allsel
*ENDDO

*DO,ii,1,2,1
CNUM=CNUM+1
allsel
!Create Contact Pair
asel,s,,,266	!最初のはんだ下面を選択
cm,a_cont,area	!a_contという名をつける
asel,s,,,286+(ii-1)*4	!Cu表面を選択
cm,a_targ,area	!a_targという名をつける  TARGがくっつける相手の（通常大きいほうの）面
allsel
r,CNUM
rmodif,CNUM,14,1e6		!14は接触コンダクタンスのこと CONTA174の リアルコンスタントのことらしい
real,CNUM
type,3		!要素ナンバー3のこと 3ということはtarge170
cmsel,s,a_targ	!Cuの表面選択
nsla,s,1	!選択されたエリアに関する節点の選択
esurf		!既存の要素の自由表面に重ねて要素を生成とのこと
type,10	!セラと樹脂の接触
cmsel,s,a_cont	!はんだ下面の選択
nsla,s,1	!選択されたエリアに関する節点の選択
esurf
allsel
*ENDDO

!---------------上DBCまで完了-------------------------------------------------
!K352,L552,A292,V52,CNUM140
!BUS作成
MAT,1
TYPE,1	!ET,1のことヘキサメッシュ
MSHAP,0,3d	!0:四角形状　3d：3次元
MSHK,1		!MSHKEYの省略形 1はマップ°メッシュ  216->336 224->344
*DO,ii,1,2,1
	*DO,jj,1,4,1
		K,352+(ii-1)*4+jj,SOL6(1,ii,jj,1),SOL6(1,ii,jj,2),SOL6(1,ii,jj,3)
	*ENDDO
*ENDDO
V,352+1,352+2,352+3,352+4,352+5,352+6,352+7,352+8
D_PLTX=NINT((SOL6(1,1,2,1)-SOL6(1,1,1,1))/M_SOLX)
D_PLTY=NINT((SOL6(1,1,3,2)-SOL6(1,1,2,2))/M_SOLY)
D_PLTZ=NINT(BSOLT/M_SOLZ)
*IF,D_PLTZ,LT,3,THEN
	D_PLTZ=3
*ENDIF
lsel,s,,,552+5,
lesiz,all,,,D_PLTZ	!z分割
lsel,all
lsel,s,,,552+2
lesiz,all,,,D_PLTY	!たぶん40分割　-20は1/20を指定しているはず　エッジ部分のサイズ
lsel,S,,,552+1
lesiz,all,,,D_PLTX	!たぶん20分割　-20は1/20を指定しているはず　エッジ部分のサイズ
lsel,all
vmesh,53		!ボリュームメッシュ

*DO,ii,1,2,1
	*DO,jj,1,4,1
		K,360+(ii-1)*4+jj,SOL6(2,ii,jj,1),SOL6(2,ii,jj,2),SOL6(2,ii,jj,3)
	*ENDDO
*ENDDO
V,360+1,360+2,360+3,360+4,360+5,360+6,360+7,360+8
D_PLTX=NINT((SOL6(2,1,2,1)-SOL6(2,1,1,1))/M_SOLX)
D_PLTY=NINT((SOL6(2,1,3,2)-SOL6(2,1,2,2))/M_SOLY)
D_PLTZ=NINT(BSOLT/M_SOLZ)
*IF,D_PLTZ,LT,3,THEN
	D_PLTZ=3
*ENDIF
lsel,s,,,564+5,
lesiz,all,,,D_PLTZ	!z分割
lsel,all
lsel,s,,,564+2
lesiz,all,,,D_PLTY	!たぶん40分割　-20は1/20を指定しているはず　エッジ部分のサイズ
lsel,S,,,564+1
lesiz,all,,,D_PLTX	!たぶん20分割　-20は1/20を指定しているはず　エッジ部分のサイズ
lsel,all
vmesh,54		!ボリュームメッシュ

*DO,ii,1,2,1
	*DO,jj,1,4,1
		K,368+(ii-1)*4+jj,SOL6(3,ii,jj,1),SOL6(3,ii,jj,2),SOL6(3,ii,jj,3)
	*ENDDO
*ENDDO
V,368+1,368+2,368+3,368+4,368+5,368+6,368+7,368+8
D_PLTX=NINT((SOL6(3,1,2,1)-SOL6(3,1,1,1))/M_SOLX)
D_PLTY=NINT((SOL6(3,1,3,2)-SOL6(3,1,2,2))/M_SOLY)
D_PLTZ=NINT(BSOLT/M_SOLZ)
*IF,D_PLTZ,LT,3,THEN
	D_PLTZ=3
*ENDIF
lsel,s,,,576+5,
lesiz,all,,,D_PLTZ	!z分割
lsel,all
lsel,s,,,576+2
lesiz,all,,,D_PLTY	!たぶん40分割　-20は1/20を指定しているはず　エッジ部分のサイズ
lsel,S,,,576+1
lesiz,all,,,D_PLTX	!たぶん20分割　-20は1/20を指定しているはず　エッジ部分のサイズ
lsel,all
vmesh,55		!ボリュームメッシュ

*DO,ii,1,2,1
	*DO,jj,1,4,1
		K,376+(ii-1)*4+jj,SOL6(4,ii,jj,1),SOL6(4,ii,jj,2),SOL6(4,ii,jj,3)
	*ENDDO
*ENDDO
V,376+1,376+2,376+3,376+4,376+5,376+6,376+7,376+8
D_PLTX=NINT((SOL6(4,1,2,1)-SOL6(4,1,1,1))/M_SOLX)
D_PLTY=NINT((SOL6(4,1,3,2)-SOL6(4,1,2,2))/M_SOLY)
D_PLTZ=NINT(BSOLT/M_SOLZ)
*IF,D_PLTZ,LT,3,THEN
	D_PLTZ=3
*ENDIF
lsel,s,,,588+5,
lesiz,all,,,D_PLTZ	!z分割
lsel,all
lsel,s,,,588+2
lesiz,all,,,D_PLTY	!たぶん40分割　-20は1/20を指定しているはず　エッジ部分のサイズ
lsel,S,,,588+1
lesiz,all,,,D_PLTX	!たぶん20分割　-20は1/20を指定しているはず　エッジ部分のサイズ
lsel,all
vmesh,56		!ボリュームメッシュ


MAT,3
TYPE,1	!ET,1のことヘキサメッシュ
MSHAP,0,3d	!0:四角形状　3d：3次元
MSHK,1		!MSHKEYの省略形 1はマップ°メッシュ
D_PLTZ=NINT(BUSTHICK/M_PLTZ)
ASEL,S,AREA,,298,316,6
EXTOPT,ESIZE,D_PLTZ   ,,,,,,!要素分割数
EXTOPT,ACLEAR,1,,,,,,,,!ボリューム生成後　パタンエリアメッシュをクリアにする
EXTOPT,ATTR,1,0,0,,,,,,!最初の1:各AREAのMAT踏襲　0:現在のREAL 0:現在の要素座標系踏襲
vext,all,,,0,0,BUSTHICK	!下電極のスイープﾗｲﾝ　0.05立ち上げ
aclear,all
ALLSEL

!ここからBUSを伸ばしていく----------------------
!K400,L632,A336,V60
KBASE=400
LBASE=632
ABASE=336
VBASE=60

*DO,ii,1,2,1
	*DO,jj,1,4,1
		K,KBASE+(ii-1)*4+jj,OBUS(2,ii,jj,1),OBUS(2,ii,jj,2),OBUS(2,ii,jj,3)
	*ENDDO
*ENDDO
V,KBASE+1,KBASE+2,KBASE+3,KBASE+4,KBASE+5,KBASE+6,KBASE+7,KBASE+8
D_PLTX=NINT((OBUS(2,1,2,1)-OBUS(2,1,1,1))/M_PLTX)
D_PLTY=NINT((OBUS(2,1,3,2)-OBUS(2,1,2,2))/M_PLTY)
D_PLTZ=NINT(BUSTHICK/M_PLTZ)
*IF,D_PLTZ,LT,3,THEN
	D_PLTZ=3
*ENDIF
lsel,s,,,LBASE+5,
lesiz,all,,,D_PLTZ	!z分割
lsel,all
lsel,s,,,LBASE+2
lesiz,all,,,D_PLTY	!たぶん40分割　-20は1/20を指定しているはず　エッジ部分のサイズ
lsel,S,,,LBASE+1
lesiz,all,,,D_PLTX	!たぶん20分割　-20は1/20を指定しているはず　エッジ部分のサイズ
lsel,all
vmesh,VBASE+1		!ボリュームメッシュ

*DO,ii,1,2,1
	*DO,jj,1,4,1
		K,KBASE+8+(ii-1)*4+jj,NBUS(2,ii,jj,1),NBUS(2,ii,jj,2),NBUS(2,ii,jj,3)
	*ENDDO
*ENDDO
V,KBASE+8+1,KBASE+8+2,KBASE+8+3,KBASE+8+4,KBASE+8+5,KBASE+8+6,KBASE+8+7,KBASE+8+8
D_PLTX=NINT((NBUS(2,1,2,1)-NBUS(2,1,1,1))/M_PLTX)
D_PLTY=NINT((NBUS(2,1,3,2)-NBUS(2,1,2,2))/M_PLTY)
!D_PLTZ=NINT(BUSTHICK/M_PLTZ)
lsel,s,,,LBASE+12+5,
lesiz,all,,,D_PLTZ	!z分割
lsel,all
lsel,s,,,LBASE+12+2
lesiz,all,,,D_PLTY	!たぶん40分割　-20は1/20を指定しているはず　エッジ部分のサイズ
lsel,S,,,LBASE+12+1
lesiz,all,,,D_PLTX	!たぶん20分割　-20は1/20を指定しているはず　エッジ部分のサイズ
lsel,all
vmesh,VBASE+2		!ボリュームメッシュ

*DO,ii,1,2,1
	*DO,jj,1,4,1
		K,KBASE+16+(ii-1)*4+jj,NBUS(3,ii,jj,1),NBUS(3,ii,jj,2),NBUS(3,ii,jj,3)
	*ENDDO
*ENDDO
V,KBASE+16+1,KBASE+16+2,KBASE+16+3,KBASE+16+4,KBASE+16+5,KBASE+16+6,KBASE+16+7,KBASE+16+8
D_PLTX=NINT((NBUS(3,1,2,1)-NBUS(3,1,1,1))/M_PLTX)
D_PLTY=NINT((NBUS(3,1,3,2)-NBUS(3,1,2,2))/M_PLTY)
!D_PLTZ=NINT(BUSTHICK/M_PLTZ)
lsel,s,,,LBASE+24+5,
lesiz,all,,,D_PLTZ	!z分割
lsel,all
lsel,s,,,LBASE+24+2
lesiz,all,,,D_PLTY	!たぶん40分割　-20は1/20を指定しているはず　エッジ部分のサイズ
lsel,S,,,LBASE+24+1
lesiz,all,,,D_PLTX	!たぶん20分割　-20は1/20を指定しているはず　エッジ部分のサイズ
lsel,all
vmesh,VBASE+3		!ボリュームメッシュ


*DO,ii,1,2,1
	*DO,jj,1,4,1
		K,KBASE+24+(ii-1)*4+jj,PBUS(2,ii,jj,1),PBUS(2,ii,jj,2),PBUS(2,ii,jj,3)
	*ENDDO
*ENDDO
V,KBASE+24+1,KBASE+24+2,KBASE+24+3,KBASE+24+4,KBASE+24+5,KBASE+24+6,KBASE+24+7,KBASE+24+8
D_PLTX=NINT((PBUS(2,1,2,1)-PBUS(2,1,1,1))/M_PLTX)
D_PLTY=NINT((PBUS(2,1,3,2)-PBUS(2,1,2,2))/M_PLTY)
!D_PLTZ=NINT(BUSTHICK/M_PLTZ)
lsel,s,,,LBASE+36+5,
lesiz,all,,,D_PLTZ	!z分割
lsel,all
lsel,s,,,LBASE+36+2
lesiz,all,,,D_PLTY	!たぶん40分割　-20は1/20を指定しているはず　エッジ部分のサイズ
lsel,S,,,LBASE+36+1
lesiz,all,,,D_PLTX	!たぶん20分割　-20は1/20を指定しているはず　エッジ部分のサイズ
lsel,all
vmesh,VBASE+4		!ボリュームメッシュ

*DO,ii,1,2,1
	*DO,jj,1,4,1
		K,KBASE+32+(ii-1)*4+jj,DBUS(2,ii,jj,1),DBUS(2,ii,jj,2),DBUS(2,ii,jj,3)
	*ENDDO
*ENDDO
V,KBASE+32+1,KBASE+32+2,KBASE+32+3,KBASE+32+4,KBASE+32+5,KBASE+32+6,KBASE+32+7,KBASE+32+8
D_PLTX=NINT((DBUS(2,1,2,1)-DBUS(2,1,1,1))/M_PLTX)
D_PLTY=NINT((DBUS(2,1,3,2)-DBUS(2,1,2,2))/M_PLTY)
!D_PLTZ=NINT(BUSTHICK/M_PLTZ)
lsel,s,,,LBASE+48+5,
lesiz,all,,,D_PLTZ	!z分割
lsel,all
lsel,s,,,LBASE+48+2
lesiz,all,,,D_PLTY	!たぶん40分割　-20は1/20を指定しているはず　エッジ部分のサイズ
lsel,S,,,LBASE+48+1
lesiz,all,,,D_PLTX	!たぶん20分割　-20は1/20を指定しているはず　エッジ部分のサイズ
lsel,all
vmesh,VBASE+5		!ボリュームメッシュ


KBASE=KBASE+40
LBASE=LBASE+60
ABASE=ABASE+30
VBASE=VBASE+5

!信号ピン関連-------------------------
D_PLTX=NINT((SIGNAL(1,1,2,1)-SIGNAL(2,1,1,1))/M_PLTX)
D_PLTY=NINT((SIGNAL(1,1,3,2)-SIGNAL(1,1,2,2))/M_PLTY)
!D_PLTZ=NINT(BUSTHICK/M_PLTZ)
*DO,kk,1,8,1
*DO,ii,1,2,1
	*DO,jj,1,4,1
		K,KBASE+(kk-1)*8+(ii-1)*4+jj,SIGNAL(kk,ii,jj,1),SIGNAL(kk,ii,jj,2),SIGNAL(kk,ii,jj,3)
	*ENDDO
*ENDDO
V,KBASE+(kk-1)*8+1,KBASE+(kk-1)*8+2,KBASE+(kk-1)*8+3,KBASE+(kk-1)*8+4,KBASE+(kk-1)*8+5,KBASE+(kk-1)*8+6,KBASE+(kk-1)*8+7,KBASE+(kk-1)*8+8
lsel,s,,,LBASE+(kk-1)*12+5,
lesiz,all,,,D_PLTZ	!z分割
lsel,all
lsel,s,,,LBASE+(kk-1)*12+2
lesiz,all,,,D_PLTY	!たぶん40分割　-20は1/20を指定しているはず　エッジ部分のサイズ
lsel,S,,,LBASE+(kk-1)*12+1
lesiz,all,,,D_PLTX	!たぶん20分割　-20は1/20を指定しているはず　エッジ部分のサイズ
lsel,all
vmesh,VBASE+kk		!ボリュームメッシュ
*ENDDO

D_PLTX=NINT((NEEDLE(1,1,2,1)-NEEDLE(2,1,1,1))/M_PLTX)
D_PLTY=NINT((NEEDLE(1,1,3,2)-NEEDLE(1,1,2,2))/M_PLTY)
*DO,kk,1,8,1
*DO,ii,1,2,1
	*DO,jj,1,4,1
		K,KBASE+64+(kk-1)*8+(ii-1)*4+jj,NEEDLE(kk,ii,jj,1),NEEDLE(kk,ii,jj,2),NEEDLE(kk,ii,jj,3)
	*ENDDO
*ENDDO
V,KBASE+64+(kk-1)*8+1,KBASE+64+(kk-1)*8+2,KBASE+64+(kk-1)*8+3,KBASE+64+(kk-1)*8+4,KBASE+64+(kk-1)*8+5,KBASE+64+(kk-1)*8+6,KBASE+64+(kk-1)*8+7,KBASE+64+(kk-1)*8+8
lsel,s,,,680+12*8+(kk-1)*12+5,
lesiz,all,,,D_PLTZ	!z分割
lsel,all
lsel,s,,,680+12*8+(kk-1)*12+2
lesiz,all,,,D_PLTY	!たぶん40分割　-20は1/20を指定しているはず　エッジ部分のサイズ
lsel,S,,,680+12*8+(kk-1)*12+1
lesiz,all,,,D_PLTX	!たぶん20分割　-20は1/20を指定しているはず　エッジ部分のサイズ
lsel,all
vmesh,VBASE+8+kk		!ボリュームメッシュ
*ENDDO

KBASE=KBASE+64*2
LBASE=LBASE+12*8*2
ABASE=ABASE+6*8*2
VBASE=VBASE+8*2

ABASE=ABASE-96-30

!---------------バスと、信号関連のの接触-------------------------------------
*DO,ii,1,2,1
CNUM=CNUM+1
allsel
!Create Contact Pair
asel,s,,,12+(ii-1)*30	!最初のはんだ下面を選択
cm,a_cont,area	!a_contという名をつける
asel,s,,,293+(ii-1)*6	!Cu表面を選択
cm,a_targ,area	!a_targという名をつける  TARGがくっつける相手の（通常大きいほうの）面
allsel
r,CNUM
rmodif,CNUM,14,1e6		!14は接触コンダクタンスのこと CONTA174の リアルコンスタントのことらしい
real,CNUM
type,3		!要素ナンバー3のこと 3ということはtarge170
cmsel,s,a_targ	!Cuの表面選択
nsla,s,1	!選択されたエリアに関する節点の選択
esurf		!既存の要素の自由表面に重ねて要素を生成とのこと
type,4	!銅とはんだの接触
cmsel,s,a_cont	!はんだ下面の選択
nsla,s,1	!選択されたエリアに関する節点の選択
esurf
allsel
*ENDDO

*DO,ii,1,2,1
CNUM=CNUM+1
allsel
!Create Contact Pair
asel,s,,,30-(ii-1)*6
cm,a_cont,area	!a_contという名をつける
asel,s,,,305+(ii-1)*6	!Cu表面を選択
cm,a_targ,area	!a_targという名をつける  TARGがくっつける相手の（通常大きいほうの）面
allsel
r,CNUM
rmodif,CNUM,14,1e6		!14は接触コンダクタンスのこと CONTA174の リアルコンスタントのことらしい
real,CNUM
type,3		!要素ナンバー3のこと 3ということはtarge170
cmsel,s,a_targ	!Cuの表面選択
nsla,s,1	!選択されたエリアに関する節点の選択
esurf		!既存の要素の自由表面に重ねて要素を生成とのこと
type,4	!銅とはんだの接触
cmsel,s,a_cont	!はんだ下面の選択
nsla,s,1	!選択されたエリアに関する節点の選択
esurf
allsel
*ENDDO

*DO,ii,1,2,1
CNUM=CNUM+1
allsel
!Create Contact Pair
asel,s,,,320+(ii-1)*5
cm,a_cont,area	!a_contという名をつける
asel,s,,,ABASE+2+(ii-1)*6	!Cu表面を選択
cm,a_targ,area	!a_targという名をつける  TARGがくっつける相手の（通常大きいほうの）面
allsel
r,CNUM
rmodif,CNUM,14,1e6		!14は接触コンダクタンスのこと CONTA174の リアルコンスタントのことらしい
real,CNUM
type,3		!要素ナンバー3のこと 3ということはtarge170
cmsel,s,a_targ	!Cuの表面選択
nsla,s,1	!選択されたエリアに関する節点の選択
esurf		!既存の要素の自由表面に重ねて要素を生成とのこと
type,5	!評価しない接触
cmsel,s,a_cont	!はんだ下面の選択
nsla,s,1	!選択されたエリアに関する節点の選択
esurf
allsel
*ENDDO

CNUM=CNUM+1
allsel
!Create Contact Pair
asel,s,,,ABASE+10
cm,a_cont,area	!a_contという名をつける
asel,s,,,ABASE+14	!Cu表面を選択
cm,a_targ,area	!a_targという名をつける  TARGがくっつける相手の（通常大きいほうの）面
allsel
r,CNUM
rmodif,CNUM,14,1e6		!14は接触コンダクタンスのこと CONTA174の リアルコンスタントのことらしい
real,CNUM
type,3		!要素ナンバー3のこと 3ということはtarge170
cmsel,s,a_targ	!Cuの表面選択
nsla,s,1	!選択されたエリアに関する節点の選択
esurf		!既存の要素の自由表面に重ねて要素を生成とのこと
type,5	!評価しない接触
cmsel,s,a_cont	!はんだ下面の選択
nsla,s,1	!選択されたエリアに関する節点の選択
esurf
allsel

CNUM=CNUM+1
allsel
!Create Contact Pair
asel,s,,,330
cm,a_cont,area	!a_contという名をつける
asel,s,,,ABASE+20	!Cu表面を選択
cm,a_targ,area	!a_targという名をつける  TARGがくっつける相手の（通常大きいほうの）面
allsel
r,CNUM
rmodif,CNUM,14,1e6		!14は接触コンダクタンスのこと CONTA174の リアルコンスタントのことらしい
real,CNUM
type,3		!要素ナンバー3のこと 3ということはtarge170
cmsel,s,a_targ	!Cuの表面選択
nsla,s,1	!選択されたエリアに関する節点の選択
esurf		!既存の要素の自由表面に重ねて要素を生成とのこと
type,5	!評価しない接触
cmsel,s,a_cont	!はんだ下面の選択
nsla,s,1	!選択されたエリアに関する節点の選択
esurf
allsel

CNUM=CNUM+1
allsel
!Create Contact Pair
asel,s,,,333
cm,a_cont,area	!a_contという名をつける
asel,s,,,ABASE+28	!Cu表面を選択
cm,a_targ,area	!a_targという名をつける  TARGがくっつける相手の（通常大きいほうの）面
allsel
r,CNUM
rmodif,CNUM,14,1e6		!14は接触コンダクタンスのこと CONTA174の リアルコンスタントのことらしい
real,CNUM
type,3		!要素ナンバー3のこと 3ということはtarge170
cmsel,s,a_targ	!Cuの表面選択
nsla,s,1	!選択されたエリアに関する節点の選択
esurf		!既存の要素の自由表面に重ねて要素を生成とのこと
type,5	!評価しない接触
cmsel,s,a_cont	!はんだ下面の選択
nsla,s,1	!選択されたエリアに関する節点の選択
esurf
allsel

!信号ピンの接触
*DO,ii,1,8,1
CNUM=CNUM+1
allsel
!Create Contact Pair
asel,s,,,ABASE+32+(ii-1)*6
cm,a_cont,area	!a_contという名をつける
asel,s,,,ABASE+82+(ii-1)*6	!Cu表面を選択
cm,a_targ,area	!a_targという名をつける  TARGがくっつける相手の（通常大きいほうの）面
allsel
r,CNUM
rmodif,CNUM,14,1e6		!14は接触コンダクタンスのこと CONTA174の リアルコンスタントのことらしい
real,CNUM
type,3		!要素ナンバー3のこと 3ということはtarge170
cmsel,s,a_targ	!Cuの表面選択
nsla,s,1	!選択されたエリアに関する節点の選択
esurf		!既存の要素の自由表面に重ねて要素を生成とのこと
type,5	!評価しない接触
cmsel,s,a_cont	!はんだ下面の選択
nsla,s,1	!選択されたエリアに関する節点の選択
esurf
allsel
*ENDDO

!CNUM157,K568,L884,A462,V81  ここまで
!信号ピンの接触まで完了

ABASE=ABASE+96+30	!バス、信号作成後の値に戻すだけの処理

!柱の作成------------------------------------------------------------
!OPOLE
MAT,1
TYPE,1	!ET,1のことヘキサメッシュ
MSHAP,0,3d	!0:四角形状　3d：3次元
MSHK,1		!MSHKEYの省略形 1はマップ°メッシュ
*DO,ii,1,2,1
	*DO,jj,1,4,1
		K,KBASE+(ii-1)*4+jj,SOL4(1,ii,jj,1),SOL4(1,ii,jj,2),SOL4(1,ii,jj,3)
	*ENDDO
*ENDDO
V,KBASE+1,KBASE+2,KBASE+3,KBASE+4,KBASE+5,KBASE+6,KBASE+7,KBASE+8
D_PLTX=NINT(OPOLEX/M_SOLX)
D_PLTY=NINT(OPOLEY/M_SOLY)
D_PLTZ=NINT(PSOLT/M_SOLZ)
*IF,D_PLTZ,LT,3,THEN
	D_PLTZ=3
*ENDIF
lsel,s,,,LBASE+5,
lesiz,all,,,D_PLTZ	!z分割
lsel,all
lsel,s,,,LBASE+2
lesiz,all,,,D_PLTY	!たぶん40分割　-20は1/20を指定しているはず　エッジ部分のサイズ
lsel,S,,,LBASE+1
lesiz,all,,,D_PLTX	!たぶん20分割　-20は1/20を指定しているはず　エッジ部分のサイズ
lsel,all
vmesh,VBASE+1		!ボリュームメッシュ

MAT,3
TYPE,1	!ET,1のことヘキサメッシュ
MSHAP,0,3d	!0:四角形状　3d：3次元
MSHK,1		!MSHKEYの省略形 1はマップ°メッシュ
D_PLTZ=NINT(OPOLEZ/M_PLTZ)
ASEL,S,AREA,,ABASE+6
EXTOPT,ESIZE,D_PLTZ   ,,,,,,!要素分割数
EXTOPT,ACLEAR,1,,,,,,,,!ボリューム生成後　パタンエリアメッシュをクリアにする
EXTOPT,ATTR,1,0,0,,,,,,!最初の1:各AREAのMAT踏襲　0:現在のREAL 0:現在の要素座標系踏襲
vext,all,,,0,0,OPOLEZ	!下電極のスイープﾗｲﾝ　0.05立ち上げ
aclear,all
ALLSEL

MAT,1
TYPE,1	!ET,1のことヘキサメッシュ
MSHAP,0,3d	!0:四角形状　3d：3次元
MSHK,1		!MSHKEYの省略形 1はマップ°メッシュ
D_PLTZ=NINT(PSOLT/M_SOLZ)
*IF,D_PLTZ,LT,3,THEN
	D_PLTZ=3
*ENDIF
ASEL,S,AREA,,ABASE+7
EXTOPT,ESIZE,D_PLTZ   ,,,,,,!要素分割数
EXTOPT,ACLEAR,1,,,,,,,,!ボリューム生成後　パタンエリアメッシュをクリアにする
EXTOPT,ATTR,1,0,0,,,,,,!最初の1:各AREAのMAT踏襲　0:現在のREAL 0:現在の要素座標系踏襲
vext,all,,,0,0,PSOLT	!下電極のスイープﾗｲﾝ　0.05立ち上げ
aclear,all
ALLSEL

!NPOLE---------------------------------
MAT,1
TYPE,1	!ET,1のことヘキサメッシュ
MSHAP,0,3d	!0:四角形状　3d：3次元
MSHK,1		!MSHKEYの省略形 1はマップ°メッシュ
*DO,ii,1,2,1
	*DO,jj,1,4,1
		K,KBASE+16+(ii-1)*4+jj,SOL5(1,ii,jj,1),SOL5(1,ii,jj,2),SOL5(1,ii,jj,3)
	*ENDDO
*ENDDO
V,KBASE+16+1,KBASE+16+2,KBASE+16+3,KBASE+16+4,KBASE+16+5,KBASE+16+6,KBASE+16+7,KBASE+16+8
D_PLTX=NINT(NPOLEX/M_SOLX)
D_PLTY=NINT(NPOLEY/M_SOLY)
D_PLTZ=NINT(PSOLT/M_SOLZ)
*IF,D_PLTZ,LT,3,THEN
	D_PLTZ=3
*ENDIF
lsel,s,,,LBASE+28+5,
lesiz,all,,,D_PLTZ	!z分割
lsel,all
lsel,s,,,LBASE+28+2
lesiz,all,,,D_PLTY	!たぶん40分割　-20は1/20を指定しているはず　エッジ部分のサイズ
lsel,S,,,LBASE+28+1
lesiz,all,,,D_PLTX	!たぶん20分割　-20は1/20を指定しているはず　エッジ部分のサイズ
lsel,all
vmesh,VBASE+4		!ボリュームメッシュ

MAT,3
TYPE,1	!ET,1のことヘキサメッシュ
MSHAP,0,3d	!0:四角形状　3d：3次元
MSHK,1		!MSHKEYの省略形 1はマップ°メッシュ
D_PLTZ=NINT(NPOLEZ/M_PLTZ)
*IF,D_PLTZ,LT,3,THEN
	D_PLTZ=3
*ENDIF
ASEL,S,AREA,,ABASE+22
EXTOPT,ESIZE,D_PLTZ   ,,,,,,!要素分割数
EXTOPT,ACLEAR,1,,,,,,,,!ボリューム生成後　パタンエリアメッシュをクリアにする
EXTOPT,ATTR,1,0,0,,,,,,!最初の1:各AREAのMAT踏襲　0:現在のREAL 0:現在の要素座標系踏襲
vext,all,,,0,0,NPOLEZ	!下電極のスイープﾗｲﾝ　0.05立ち上げ
aclear,all
ALLSEL

MAT,1
TYPE,1	!ET,1のことヘキサメッシュ
MSHAP,0,3d	!0:四角形状　3d：3次元
MSHK,1		!MSHKEYの省略形 1はマップ°メッシュ
D_PLTZ=NINT(PSOLT/M_SOLZ)
*IF,D_PLTZ,LT,3,THEN
	D_PLTZ=3
*ENDIF
ASEL,S,AREA,,ABASE+23
EXTOPT,ESIZE,D_PLTZ   ,,,,,,!要素分割数
EXTOPT,ACLEAR,1,,,,,,,,!ボリューム生成後　パタンエリアメッシュをクリアにする
EXTOPT,ATTR,1,0,0,,,,,,!最初の1:各AREAのMAT踏襲　0:現在のREAL 0:現在の要素座標系踏襲
vext,all,,,0,0,PSOLT	!下電極のスイープﾗｲﾝ　0.05立ち上げ
aclear,all
ALLSEL

!-----柱の上下接触-----------------------------

*DO,ii,1,2,1
CNUM=CNUM+1
allsel
!Create Contact Pair
asel,s,,,24+(ii-1)*18	!最初のはんだ下面を選択
cm,a_cont,area	!a_contという名をつける
asel,s,,,ABASE+1+(ii-1)*16	!Cu表面を選択
cm,a_targ,area	!a_targという名をつける  TARGがくっつける相手の（通常大きいほうの）面
allsel
r,CNUM
rmodif,CNUM,14,1e6		!14は接触コンダクタンスのこと CONTA174の リアルコンスタントのことらしい
real,CNUM
type,3		!要素ナンバー3のこと 3ということはtarge170
cmsel,s,a_targ	!Cuの表面選択
nsla,s,1	!選択されたエリアに関する節点の選択
esurf		!既存の要素の自由表面に重ねて要素を生成とのこと
type,4	!銅とはんだの接触
cmsel,s,a_cont	!はんだ下面の選択
nsla,s,1	!選択されたエリアに関する節点の選択
esurf
allsel
*ENDDO

*DO,ii,1,2,1
CNUM=CNUM+1
allsel
!Create Contact Pair
asel,s,,,207-(ii-1)*6	!最初のはんだ下面を選択
cm,a_cont,area	!a_contという名をつける
asel,s,,,ABASE+12+(ii-1)*16	!Cu表面を選択
cm,a_targ,area	!a_targという名をつける  TARGがくっつける相手の（通常大きいほうの）面
allsel
r,CNUM
rmodif,CNUM,14,1e6		!14は接触コンダクタンスのこと CONTA174の リアルコンスタントのことらしい
real,CNUM
type,3		!要素ナンバー3のこと 3ということはtarge170
cmsel,s,a_targ	!Cuの表面選択
nsla,s,1	!選択されたエリアに関する節点の選択
esurf		!既存の要素の自由表面に重ねて要素を生成とのこと
type,4	!銅とはんだの接触
cmsel,s,a_cont	!はんだ下面の選択
nsla,s,1	!選択されたエリアに関する節点の選択
esurf
allsel
*ENDDO

KBASE=KBASE+32
LBASE=LBASE+56
ABASE=ABASE+32
VBASE=VBASE+6

!CNUM161,K600,L940,A494,V87  ここまで
!柱まで接触含めて完成---------------------------------------------------
!ここからパラチップを並べる作業を開始


MAT,1
TYPE,1	!ET,1のことヘキサメッシュ
MSHAP,0,3d	!0:四角形状　3d：3次元
MSHK,1		!MSHKEYの省略形 1はマップ°メッシュ
D_PLTX=NINT(IGBTX/M_SOLX)
D_PLTY=NINT(IGBTY/M_SOLY)
D_PLTZ=NINT(DSOLT/M_SOLZ)
*IF,D_PLTZ,LT,3,THEN
	D_PLTZ=3
*ENDIF
*DO,ii,1,2,1
	*DO,jj,1,PARA,1
		nn=KBASE+(ii-1)*PARA*8+(jj-1)*8
		*DO,KK,1,2,1
			*DO,mm,1,4,1
				k,KBASE+(ii-1)*PARA*8+(jj-1)*8+(kk-1)*4+mm,SOL1(ii,jj,kk,mm,1),SOL1(ii,jj,kk,mm,2),SOL1(ii,jj,kk,mm,3)
			*ENDDO
		*ENDDO
	V,nn+1,nn+2,nn+3,nn+4,nn+5,nn+6,nn+7,nn+8
	lsel,s,,,LBASE+((ii-1)*PARA+(jj-1))*12+5,
	lesiz,all,,,D_PLTZ	!z分割
	lsel,all
	lsel,s,,,LBASE+((ii-1)*PARA+(jj-1))*12+2
	lesiz,all,,,D_PLTY	!たぶん40分割　-20は1/20を指定しているはず　エッジ部分のサイズ
	lsel,S,,,LBASE+((ii-1)*PARA+(jj-1))*12+1
	lesiz,all,,,D_PLTX	!たぶん20分割　-20は1/20を指定しているはず　エッジ部分のサイズ
	lsel,all
	vmesh,VBASE+(ii-1)*PARA+jj		!ボリュームメッシュ
	*ENDDO
*ENDDO

MAT,9
TYPE,1	!ET,1のことヘキサメッシュ
MSHAP,0,3d	!0:四角形状　3d：3次元
MSHK,1		!MSHKEYの省略形 1はマップ°メッシュ
D_PLTX=NINT(IGBTX/M_CHIPX)
D_PLTY=NINT(IGBTY/M_CHIPY)
D_PLTZ=NINT(IGBTZ/M_CHIPZ)
*IF,D_PLTZ,LT,3,THEN
	D_PLTZ=3
*ENDIF
D_PLTZ=1	!チップ側面のせん断力が異常なので、チップ側面は1分割とした 20240305
*DO,ii,1,2,1
	*DO,jj,1,PARA,1
		nn=KBASE+2*PARA*8+(ii-1)*PARA*8+(jj-1)*8
		*DO,KK,1,2,1
			*DO,mm,1,4,1
				k,nn+(kk-1)*4+mm,RCIGBT(ii,jj,kk,mm,1),RCIGBT(ii,jj,kk,mm,2),RCIGBT(ii,jj,kk,mm,3)
			*ENDDO
		*ENDDO
	V,nn+1,nn+2,nn+3,nn+4,nn+5,nn+6,nn+7,nn+8
	lsel,s,,,LBASE+2*PARA*12+((ii-1)*PARA+(jj-1))*12+5,
	lesiz,all,,,D_PLTZ	!z分割
	lsel,all
	lsel,s,,,LBASE+2*PARA*12+((ii-1)*PARA+(jj-1))*12+2
	lesiz,all,,,D_PLTY	!たぶん40分割　-20は1/20を指定しているはず　エッジ部分のサイズ
	lsel,S,,,LBASE+2*PARA*12+((ii-1)*PARA+(jj-1))*12+1
	lesiz,all,,,D_PLTX	!たぶん20分割　-20は1/20を指定しているはず　エッジ部分のサイズ
	lsel,all
	vmesh,VBASE+2*PARA+(ii-1)*PARA+jj		!ボリュームメッシュ
	*ENDDO
*ENDDO


!-------------------チップ上のはんだとスペーサとはんだ
MAT,1
TYPE,1	!ET,1のことヘキサメッシュ
MSHAP,0,3d	!0:四角形状　3d：3次元
MSHK,1		!MSHKEYの省略形 1はマップ°メッシュ
D_PLTX=NINT(SUBSPCX/M_SOLX)
D_PLTY=NINT(ISPCY/M_SOLY)
D_PLTZ=NINT(SPSOLT/M_SOLZ)
*IF,D_PLTZ,LT,3,THEN
	D_PLTZ=3
*ENDIF
*DO,ii,1,2,1
	*DO,jj,1,PARA,1
		nn=KBASE+8*2*2*PARA+(ii-1)*PARA*8+(jj-1)*8
		*DO,KK,1,2,1
			*DO,mm,1,4,1
				k,nn+(kk-1)*4+mm,SOL2(ii,jj,kk,mm,1),SOL2(ii,jj,kk,mm,2),SOL2(ii,jj,kk,mm,3)
			*ENDDO
		*ENDDO
	V,nn+1,nn+2,nn+3,nn+4,nn+5,nn+6,nn+7,nn+8
	lsel,s,,,LBASE+24*2*PARA+((ii-1)*PARA+(jj-1))*12+5,
	lesiz,all,,,D_PLTZ	!z分割
	lsel,all
	lsel,s,,,LBASE+24*2*PARA+((ii-1)*PARA+(jj-1))*12+2
	lesiz,all,,,D_PLTY	!たぶん40分割　-20は1/20を指定しているはず　エッジ部分のサイズ
	lsel,S,,,LBASE+24*2*PARA+((ii-1)*PARA+(jj-1))*12+1
	lesiz,all,,,D_PLTX	!たぶん20分割　-20は1/20を指定しているはず　エッジ部分のサイズ
	lsel,all
	vmesh,VBASE+2*2*PARA+(ii-1)*PARA+jj		!ボリュームメッシュ
	*ENDDO
*ENDDO

MAT,1
TYPE,1	!ET,1のことヘキサメッシュ
MSHAP,0,3d	!0:四角形状　3d：3次元
MSHK,1		!MSHKEYの省略形 1はマップ°メッシュ
D_PLTX=NINT(SUBSPCX/M_SOLX)
D_PLTY=NINT(SUBSPCY/M_SOLY)
D_PLTZ=NINT(SPSOLT/M_SOLZ)
*IF,D_PLTZ,LT,3,THEN
	D_PLTZ=3
*ENDIF
*DO,ii,1,2,1
	*DO,jj,1,PARA,1
		nn=KBASE+8*3*2*PARA+(ii-1)*PARA*8+(jj-1)*8
		*DO,KK,1,2,1
			*DO,mm,1,4,1
				k,nn+(kk-1)*4+mm,SOL2B(ii,jj,kk,mm,1),SOL2B(ii,jj,kk,mm,2),SOL2B(ii,jj,kk,mm,3)
			*ENDDO
		*ENDDO
	V,nn+1,nn+2,nn+3,nn+4,nn+5,nn+6,nn+7,nn+8
	lsel,s,,,LBASE+36*2*PARA+((ii-1)*PARA+(jj-1))*12+5,
	lesiz,all,,,D_PLTZ	!z分割
	lsel,all
	lsel,s,,,LBASE+36*2*PARA+((ii-1)*PARA+(jj-1))*12+2
	lesiz,all,,,D_PLTY	!たぶん40分割　-20は1/20を指定しているはず　エッジ部分のサイズ
	lsel,S,,,LBASE+36*2*PARA+((ii-1)*PARA+(jj-1))*12+1
	lesiz,all,,,D_PLTX	!たぶん20分割　-20は1/20を指定しているはず　エッジ部分のサイズ
	lsel,all
	vmesh,VBASE+3*2*PARA+(ii-1)*PARA+jj		!ボリュームメッシュ
	*ENDDO
*ENDDO

MAT,1
TYPE,1	!ET,1のことヘキサメッシュ
MSHAP,0,3d	!0:四角形状　3d：3次元
MSHK,1		!MSHKEYの省略形 1はマップ°メッシュ
D_PLTX=NINT((ISPCX-SUBSPCX)/M_SOLX)
D_PLTY=NINT(ISPCY/M_SOLY)
D_PLTZ=NINT(SPSOLT/M_SOLZ)
*IF,D_PLTZ,LT,3,THEN
	D_PLTZ=3
*ENDIF
*DO,ii,1,2,1
	*DO,jj,1,PARA,1
		nn=KBASE+8*4*2*PARA+(ii-1)*PARA*8+(jj-1)*8
		*DO,KK,1,2,1
			*DO,mm,1,4,1
				k,nn+(kk-1)*4+mm,SOL2C(ii,jj,kk,mm,1),SOL2C(ii,jj,kk,mm,2),SOL2C(ii,jj,kk,mm,3)
			*ENDDO
		*ENDDO
	V,nn+1,nn+2,nn+3,nn+4,nn+5,nn+6,nn+7,nn+8
	lsel,s,,,LBASE+48*2*PARA+((ii-1)*PARA+(jj-1))*12+5,
	lesiz,all,,,D_PLTZ	!z分割
	lsel,all
	lsel,s,,,LBASE+48*2*PARA+((ii-1)*PARA+(jj-1))*12+2
	lesiz,all,,,D_PLTY	!たぶん40分割　-20は1/20を指定しているはず　エッジ部分のサイズ
	lsel,S,,,LBASE+48*2*PARA+((ii-1)*PARA+(jj-1))*12+1
	lesiz,all,,,D_PLTX	!たぶん20分割　-20は1/20を指定しているはず　エッジ部分のサイズ
	lsel,all
	vmesh,VBASE+4*2*PARA+(ii-1)*PARA+jj		!ボリュームメッシュ
	*ENDDO
*ENDDO


!スペーサー
MAT,3
TYPE,1	!ET,1のことヘキサメッシュ
MSHAP,0,3d	!0:四角形状　3d：3次元
MSHK,1		!MSHKEYの省略形 1はマップ°メッシュ
D_PLTX=NINT((ISPCX)/M_SOLX)
D_PLTY=NINT(ISPCY/M_SOLY)
D_PLTZ=NINT(SPCZ/M_PLTZ)
*IF,D_PLTZ,LT,3,THEN
	D_PLTZ=3
*ENDIF
*DO,ii,1,2,1
	*DO,jj,1,PARA,1
		nn=KBASE+8*5*2*PARA+(ii-1)*PARA*8+(jj-1)*8
		*DO,KK,1,2,1
			*DO,mm,1,4,1
				k,nn+(kk-1)*4+mm,SPC(ii,jj,kk,mm,1),SPC(ii,jj,kk,mm,2),SPC(ii,jj,kk,mm,3)
			*ENDDO
		*ENDDO
	V,nn+1,nn+2,nn+3,nn+4,nn+5,nn+6,nn+7,nn+8
	lsel,s,,,LBASE+60*2*PARA+((ii-1)*PARA+(jj-1))*12+5,
	lesiz,all,,,D_PLTZ	!z分割
	lsel,all
	lsel,s,,,LBASE+60*2*PARA+((ii-1)*PARA+(jj-1))*12+2
	lesiz,all,,,D_PLTY	!たぶん40分割　-20は1/20を指定しているはず　エッジ部分のサイズ
	lsel,S,,,LBASE+60*2*PARA+((ii-1)*PARA+(jj-1))*12+1
	lesiz,all,,,D_PLTX	!たぶん20分割　-20は1/20を指定しているはず　エッジ部分のサイズ
	lsel,all
	vmesh,VBASE+5*2*PARA+(ii-1)*PARA+jj		!ボリュームメッシュ
	*ENDDO
*ENDDO

MAT,3
TYPE,1	!ET,1のことヘキサメッシュ
MSHAP,0,3d	!0:四角形状　3d：3次元
MSHK,1		!MSHKEYの省略形 1はマップ°メッシュ
D_PLTX=NINT((SUBSPCX)/M_SOLX)
D_PLTY=NINT(SUBSPCY/M_SOLY)
D_PLTZ=NINT(SPCZ/M_PLTZ)
*IF,D_PLTZ,LT,3,THEN
	D_PLTZ=3
*ENDIF
*DO,ii,1,2,1
	*DO,jj,1,PARA,1
		nn=KBASE+8*6*2*PARA+(ii-1)*PARA*8+(jj-1)*8
		*DO,KK,1,2,1
			*DO,mm,1,4,1
				k,nn+(kk-1)*4+mm,SUBSPC(ii,jj,kk,mm,1),SUBSPC(ii,jj,kk,mm,2),SUBSPC(ii,jj,kk,mm,3)
			*ENDDO
		*ENDDO
	V,nn+1,nn+2,nn+3,nn+4,nn+5,nn+6,nn+7,nn+8
	lsel,s,,,LBASE+72*2*PARA+((ii-1)*PARA+(jj-1))*12+5,
	lesiz,all,,,D_PLTZ	!z分割
	lsel,all
	lsel,s,,,LBASE+72*2*PARA+((ii-1)*PARA+(jj-1))*12+2
	lesiz,all,,,D_PLTY	!たぶん40分割　-20は1/20を指定しているはず　エッジ部分のサイズ
	lsel,S,,,LBASE+72*2*PARA+((ii-1)*PARA+(jj-1))*12+1
	lesiz,all,,,D_PLTX	!たぶん20分割　-20は1/20を指定しているはず　エッジ部分のサイズ
	lsel,all
	vmesh,VBASE+6*2*PARA+(ii-1)*PARA+jj		!ボリュームメッシュ
	*ENDDO
*ENDDO

MAT,3
TYPE,1	!ET,1のことヘキサメッシュ
MSHAP,0,3d	!0:四角形状　3d：3次元
MSHK,1		!MSHKEYの省略形 1はマップ°メッシュ
D_PLTX=NINT(UPSPCX/M_SOLX)
D_PLTY=NINT(UPSPCY/M_SOLY)
D_PLTZ=NINT(MDSPCZ/M_PLTZ)
*IF,D_PLTZ,LT,3,THEN
	D_PLTZ=3
*ENDIF
*DO,ii,1,2,1
	*DO,jj,1,PARA,1
		nn=KBASE+8*7*2*PARA+(ii-1)*PARA*8+(jj-1)*8
		*DO,KK,1,2,1
			*DO,mm,1,4,1
				k,nn+(kk-1)*4+mm,MDSPC(ii,jj,kk,mm,1),MDSPC(ii,jj,kk,mm,2),MDSPC(ii,jj,kk,mm,3)
			*ENDDO
		*ENDDO
	V,nn+1,nn+2,nn+3,nn+4,nn+5,nn+6,nn+7,nn+8
	lsel,s,,,LBASE+84*2*PARA+((ii-1)*PARA+(jj-1))*12+5,
	lesiz,all,,,D_PLTZ	!z分割
	lsel,all
	lsel,s,,,LBASE+84*2*PARA+((ii-1)*PARA+(jj-1))*12+2
	lesiz,all,,,D_PLTY	!たぶん40分割　-20は1/20を指定しているはず　エッジ部分のサイズ
	lsel,S,,,LBASE+84*2*PARA+((ii-1)*PARA+(jj-1))*12+1
	lesiz,all,,,D_PLTX	!たぶん20分割　-20は1/20を指定しているはず　エッジ部分のサイズ
	lsel,all
	vmesh,VBASE+7*2*PARA+(ii-1)*PARA+jj		!ボリュームメッシュ
	*ENDDO
*ENDDO

MAT,3
TYPE,1	!ET,1のことヘキサメッシュ
MSHAP,0,3d	!0:四角形状　3d：3次元
MSHK,1		!MSHKEYの省略形 1はマップ°メッシュ
D_PLTX=NINT(UPSPCX/M_SOLX)
D_PLTY=NINT(UPSPCY/M_SOLY)
D_PLTZ=NINT(UPSPCZ/M_PLTZ)
*IF,D_PLTZ,LT,3,THEN
	D_PLTZ=3
*ENDIF
*DO,ii,1,2,1
	*DO,jj,1,PARA,1
		nn=KBASE+8*8*2*PARA+(ii-1)*PARA*8+(jj-1)*8
		*DO,KK,1,2,1
			*DO,mm,1,4,1
				k,nn+(kk-1)*4+mm,UPSPC(ii,jj,kk,mm,1),UPSPC(ii,jj,kk,mm,2),UPSPC(ii,jj,kk,mm,3)
			*ENDDO
		*ENDDO
	V,nn+1,nn+2,nn+3,nn+4,nn+5,nn+6,nn+7,nn+8
	lsel,s,,,LBASE+96*2*PARA+((ii-1)*PARA+(jj-1))*12+5,
	lesiz,all,,,D_PLTZ	!z分割
	lsel,all
	lsel,s,,,LBASE+96*2*PARA+((ii-1)*PARA+(jj-1))*12+2
	lesiz,all,,,D_PLTY	!たぶん40分割　-20は1/20を指定しているはず　エッジ部分のサイズ
	lsel,S,,,LBASE+96*2*PARA+((ii-1)*PARA+(jj-1))*12+1
	lesiz,all,,,D_PLTX	!たぶん20分割　-20は1/20を指定しているはず　エッジ部分のサイズ
	lsel,all
	vmesh,VBASE+8*2*PARA+(ii-1)*PARA+jj		!ボリュームメッシュ
	*ENDDO
*ENDDO

MAT,1	!SPC上のはんだ--------------
TYPE,1	!ET,1のことヘキサメッシュ
MSHAP,0,3d	!0:四角形状　3d：3次元
MSHK,1		!MSHKEYの省略形 1はマップ°メッシュ
D_PLTX=NINT(UPSPCX/M_SOLX)
D_PLTY=NINT(UPSPCY/M_SOLY)
D_PLTZ=NINT(UPSPCZ/M_PLTZ)
*IF,D_PLTZ,LT,3,THEN
	D_PLTZ=3
*ENDIF
*DO,ii,1,2,1
	*DO,jj,1,PARA,1
		nn=KBASE+8*9*2*PARA+(ii-1)*PARA*8+(jj-1)*8
		*DO,KK,1,2,1
			*DO,mm,1,4,1
				k,nn+(kk-1)*4+mm,SOL3(ii,jj,kk,mm,1),SOL3(ii,jj,kk,mm,2),SOL3(ii,jj,kk,mm,3)
			*ENDDO
		*ENDDO
	V,nn+1,nn+2,nn+3,nn+4,nn+5,nn+6,nn+7,nn+8
	lsel,s,,,LBASE+108*2*PARA+((ii-1)*PARA+(jj-1))*12+5,
	lesiz,all,,,D_PLTZ	!z分割
	lsel,all
	lsel,s,,,LBASE+108*2*PARA+((ii-1)*PARA+(jj-1))*12+2
	lesiz,all,,,D_PLTY	!たぶん40分割　-20は1/20を指定しているはず　エッジ部分のサイズ
	lsel,S,,,LBASE+108*2*PARA+((ii-1)*PARA+(jj-1))*12+1
	lesiz,all,,,D_PLTX	!たぶん20分割　-20は1/20を指定しているはず　エッジ部分のサイズ
	lsel,all
	vmesh,VBASE+9*2*PARA+(ii-1)*PARA+jj		!ボリュームメッシュ
	*ENDDO
*ENDDO


!ここまでの面おさらい　ABASE+(6*10)*PARA*2 これがSPCの前まで
!SPC上面は　ABASE+60*PARA+(ii-1)*6*PARA+jj*6  ii=1 TO 2 jj=1 TO PARA

!チップはんだの接触
*DO,ii,1,PARA,1
CNUM=CNUM+1
allsel
!Create Contact Pair
asel,s,,,ABASE+1+(ii-1)*6	!最初のはんだ下面を選択
cm,a_cont,area	!a_contという名をつける
asel,s,,,12	!Cu表面を選択
cm,a_targ,area	!a_targという名をつける  TARGがくっつける相手の（通常大きいほうの）面
allsel
r,CNUM
rmodif,CNUM,14,1e6		!14は接触コンダクタンスのこと CONTA174の リアルコンスタントのことらしい
real,CNUM
type,3		!要素ナンバー3のこと 3ということはtarge170
cmsel,s,a_targ	!Cuの表面選択
nsla,s,1	!選択されたエリアに関する節点の選択\/:
esurf		!既存の要素の自由表面に重ねて要素を生成とのこと
type,4	!銅とはんだの接触
cmsel,s,a_cont	!はんだ下面の選択
nsla,s,1	!選択されたエリアに関する節点の選択
esurf
allsel
*ENDDO

*DO,ii,1,PARA,1
CNUM=CNUM+1
allsel
!Create Contact Pair
asel,s,,,ABASE+PARA*6+1+(ii-1)*6	!最初のはんだ下面を選択
cm,a_cont,area	!a_contという名をつける
asel,s,,,30	!Cu表面を選択
cm,a_targ,area	!a_targという名をつける  TARGがくっつける相手の（通常大きいほうの）面
allsel
r,CNUM
rmodif,CNUM,14,1e6		!14は接触コンダクタンスのこと CONTA174の リアルコンスタントのことらしい
real,CNUM
type,3		!要素ナンバー3のこと 3ということはtarge170
cmsel,s,a_targ	!Cuの表面選択
nsla,s,1	!選択されたエリアに関する節点の選択\/:
esurf		!既存の要素の自由表面に重ねて要素を生成とのこと
type,4	!銅とはんだの接触
cmsel,s,a_cont	!はんだ下面の選択
nsla,s,1	!選択されたエリアに関する節点の選択
esurf
allsel
*ENDDO

!チップ下とはんだ
*DO,ii,1,PARA,1
CNUM=CNUM+1
allsel
!Create Contact Pair
asel,s,,,ABASE+2*6*PARA+1+(ii-1)*6	!最初のはんだ下面を選択
cm,a_cont,area	!a_contという名をつける
asel,s,,,ABASE+6+(ii-1)*6	!Cu表面を選択
cm,a_targ,area	!a_targという名をつける  TARGがくっつける相手の（通常大きいほうの）面
allsel
r,CNUM
rmodif,CNUM,14,1e6		!14は接触コンダクタンスのこと CONTA174の リアルコンスタントのことらしい
real,CNUM
type,3		!要素ナンバー3のこと 3ということはtarge170
cmsel,s,a_targ	!Cuの表面選択
nsla,s,1	!選択されたエリアに関する節点の選択\/:
esurf		!既存の要素の自由表面に重ねて要素を生成とのこと
type,5	!銅とはんだの接触
cmsel,s,a_cont	!はんだ下面の選択
nsla,s,1	!選択されたエリアに関する節点の選択
esurf
allsel
*ENDDO

*DO,ii,1,PARA,1
CNUM=CNUM+1
allsel
!Create Contact Pair
asel,s,,,ABASE+2*6*PARA+PARA*6+1+(ii-1)*6	!最初のはんだ下面を選択
cm,a_cont,area	!a_contという名をつける
asel,s,,,ABASE+PARA*6+6+(ii-1)*6	!Cu表面を選択
cm,a_targ,area	!a_targという名をつける  TARGがくっつける相手の（通常大きいほうの）面
allsel
r,CNUM
rmodif,CNUM,14,1e6		!14は接触コンダクタンスのこと CONTA174の リアルコンスタントのことらしい
real,CNUM
type,3		!要素ナンバー3のこと 3ということはtarge170
cmsel,s,a_targ	!Cuの表面選択
nsla,s,1	!選択されたエリアに関する節点の選択\/:
esurf		!既存の要素の自由表面に重ねて要素を生成とのこと
type,5	!銅とはんだの接触
cmsel,s,a_cont	!はんだ下面の選択
nsla,s,1	!選択されたエリアに関する節点の選択
esurf
allsel
*ENDDO

!上面のはんだとチップの接触
*DO,jj,1,2,1
*DO,ii,1,PARA,1
CNUM=CNUM+1
allsel
!Create Contact Pair
asel,s,,,ABASE+2*12*PARA+1+(ii-1)*6+(jj-1)*6*para	!最初のはんだ下面を選択
cm,a_cont,area	!a_contという名をつける
asel,s,,,ABASE+2*6*PARA+6+(ii-1)*6+(jj-1)*6*para	!Cu表面を選択
cm,a_targ,area	!a_targという名をつける  TARGがくっつける相手の（通常大きいほうの）面
allsel
r,CNUM
rmodif,CNUM,14,1e6		!14は接触コンダクタンスのこと CONTA174の リアルコンスタントのことらしい
real,CNUM
type,3		!要素ナンバー3のこと 3ということはtarge170
cmsel,s,a_targ	!Cuの表面選択
nsla,s,1	!選択されたエリアに関する節点の選択\/:
esurf		!既存の要素の自由表面に重ねて要素を生成とのこと
type,5	!銅とはんだの接触
cmsel,s,a_cont	!はんだ下面の選択
nsla,s,1	!選択されたエリアに関する節点の選択
esurf
allsel
*ENDDO
*ENDDO

*DO,jj,1,2,1
*DO,ii,1,PARA,1
CNUM=CNUM+1
allsel
!Create Contact Pair
asel,s,,,ABASE+2*18*PARA+1+(ii-1)*6+(jj-1)*6*para	!最初のはんだ下面を選択
cm,a_cont,area	!a_contという名をつける
asel,s,,,ABASE+2*6*PARA+6+(ii-1)*6+(jj-1)*6*para	!Cu表面を選択
cm,a_targ,area	!a_targという名をつける  TARGがくっつける相手の（通常大きいほうの）面
allsel
r,CNUM
rmodif,CNUM,14,1e6		!14は接触コンダクタンスのこと CONTA174の リアルコンスタントのことらしい
real,CNUM
type,3		!要素ナンバー3のこと 3ということはtarge170
cmsel,s,a_targ	!Cuの表面選択
nsla,s,1	!選択されたエリアに関する節点の選択\/:
esurf		!既存の要素の自由表面に重ねて要素を生成とのこと
type,5	!銅とはんだの接触
cmsel,s,a_cont	!はんだ下面の選択
nsla,s,1	!選択されたエリアに関する節点の選択
esurf
allsel
*ENDDO
*ENDDO

*DO,jj,1,2,1
*DO,ii,1,PARA,1
CNUM=CNUM+1
allsel
!Create Contact Pair
asel,s,,,ABASE+2*24*PARA+1+(ii-1)*6+(jj-1)*6*para	!最初のはんだ下面を選択
cm,a_cont,area	!a_contという名をつける
asel,s,,,ABASE+2*6*PARA+6+(ii-1)*6+(jj-1)*6*para	!Cu表面を選択
cm,a_targ,area	!a_targという名をつける  TARGがくっつける相手の（通常大きいほうの）面
allsel
r,CNUM
rmodif,CNUM,14,1e6		!14は接触コンダクタンスのこと CONTA174の リアルコンスタントのことらしい
real,CNUM
type,3		!要素ナンバー3のこと 3ということはtarge170
cmsel,s,a_targ	!Cuの表面選択
nsla,s,1	!選択されたエリアに関する節点の選択\/:
esurf		!既存の要素の自由表面に重ねて要素を生成とのこと
type,5	!銅とはんだの接触
cmsel,s,a_cont	!はんだ下面の選択
nsla,s,1	!選択されたエリアに関する節点の選択
esurf
allsel
*ENDDO
*ENDDO


!エミッタ半田の側面接触
*DO,jj,1,2,1
*DO,ii,1,PARA,1
CNUM=CNUM+1
allsel
!Create Contact Pair
asel,s,,,ABASE+2*12*PARA+2+(ii-1)*6+(jj-1)*6*para	!最初のはんだ下面を選択
cm,a_cont,area	!a_contという名をつける
asel,s,,,ABASE+2*18*PARA+4+(ii-1)*6+(jj-1)*6*para	!Cu表面を選択
cm,a_targ,area	!a_targという名をつける  TARGがくっつける相手の（通常大きいほうの）面
allsel
r,CNUM
rmodif,CNUM,14,1e6		!14は接触コンダクタンスのこと CONTA174の リアルコンスタントのことらしい
real,CNUM
type,3		!要素ナンバー3のこと 3ということはtarge170
cmsel,s,a_targ	!Cuの表面選択
nsla,s,1	!選択されたエリアに関する節点の選択\/:
esurf		!既存の要素の自由表面に重ねて要素を生成とのこと
type,5	!銅とはんだの接触
cmsel,s,a_cont	!はんだ下面の選択
nsla,s,1	!選択されたエリアに関する節点の選択
esurf
allsel
*ENDDO
*ENDDO

!エミッタ半田の側面接触
*DO,jj,1,2,1
*DO,ii,1,PARA,1
CNUM=CNUM+1
allsel
!Create Contact Pair
asel,s,,,ABASE+2*12*PARA+3+(ii-1)*6+(jj-1)*6*para	!最初のはんだ下面を選択
cm,a_cont,area	!a_contという名をつける
asel,s,,,ABASE+2*24*PARA+5+(ii-1)*6+(jj-1)*6*para	!Cu表面を選択
cm,a_targ,area	!a_targという名をつける  TARGがくっつける相手の（通常大きいほうの）面
allsel
r,CNUM
rmodif,CNUM,14,1e6		!14は接触コンダクタンスのこと CONTA174の リアルコンスタントのことらしい
real,CNUM
type,3		!要素ナンバー3のこと 3ということはtarge170
cmsel,s,a_targ	!Cuの表面選択
nsla,s,1	!選択されたエリアに関する節点の選択\/:
esurf		!既存の要素の自由表面に重ねて要素を生成とのこと
type,5	!銅とはんだの接触
cmsel,s,a_cont	!はんだ下面の選択
nsla,s,1	!選択されたエリアに関する節点の選択
esurf
allsel
*ENDDO
*ENDDO

!エミッタ半田上面とスペーサ下面
*DO,jj,1,2,1
*DO,ii,1,PARA,1
CNUM=CNUM+1
allsel
!Create Contact Pair
asel,s,,,ABASE+2*12*PARA+6+(ii-1)*6+(jj-1)*6*para	!最初のはんだ下面を選択
cm,a_cont,area	!a_contという名をつける
asel,s,,,ABASE+2*30*PARA+1+(ii-1)*6+(jj-1)*6*para	!Cu表面を選択
cm,a_targ,area	!a_targという名をつける  TARGがくっつける相手の（通常大きいほうの）面
allsel
r,CNUM
rmodif,CNUM,14,1e6		!14は接触コンダクタンスのこと CONTA174の リアルコンスタントのことらしい
real,CNUM
type,3		!要素ナンバー3のこと 3ということはtarge170
cmsel,s,a_targ	!Cuの表面選択
nsla,s,1	!選択されたエリアに関する節点の選択\/:
esurf		!既存の要素の自由表面に重ねて要素を生成とのこと
type,4	!銅とはんだの接触
cmsel,s,a_cont	!はんだ下面の選択
nsla,s,1	!選択されたエリアに関する節点の選択
esurf
allsel

CNUM=CNUM+1
allsel
!Create Contact Pair
asel,s,,,ABASE+2*24*PARA+6+(ii-1)*6+(jj-1)*6*para	!最初のはんだ下面を選択
cm,a_cont,area	!a_contという名をつける
asel,s,,,ABASE+2*30*PARA+1+(ii-1)*6+(jj-1)*6*para	!Cu表面を選択
cm,a_targ,area	!a_targという名をつける  TARGがくっつける相手の（通常大きいほうの）面
allsel
r,CNUM
rmodif,CNUM,14,1e6		!14は接触コンダクタンスのこと CONTA174の リアルコンスタントのことらしい
real,CNUM
type,3		!要素ナンバー3のこと 3ということはtarge170
cmsel,s,a_targ	!Cuの表面選択
nsla,s,1	!選択されたエリアに関する節点の選択\/:
esurf		!既存の要素の自由表面に重ねて要素を生成とのこと
type,4	!銅とはんだの接触
cmsel,s,a_cont	!はんだ下面の選択
nsla,s,1	!選択されたエリアに関する節点の選択
esurf
allsel
*ENDDO
*ENDDO

*DO,jj,1,2,1
*DO,ii,1,PARA,1
CNUM=CNUM+1
allsel
!Create Contact Pair
asel,s,,,ABASE+2*18*PARA+6+(ii-1)*6+(jj-1)*6*para	!最初のはんだ下面を選択
cm,a_cont,area	!a_contという名をつける
asel,s,,,ABASE+2*36*PARA+1+(ii-1)*6+(jj-1)*6*para	!Cu表面を選択
cm,a_targ,area	!a_targという名をつける  TARGがくっつける相手の（通常大きいほうの）面
allsel
r,CNUM
rmodif,CNUM,14,1e6		!14は接触コンダクタンスのこと CONTA174の リアルコンスタントのことらしい
real,CNUM
type,3		!要素ナンバー3のこと 3ということはtarge170
cmsel,s,a_targ	!Cuの表面選択
nsla,s,1	!選択されたエリアに関する節点の選択\/:
esurf		!既存の要素の自由表面に重ねて要素を生成とのこと
type,4	!銅とはんだの接触
cmsel,s,a_cont	!はんだ下面の選択
nsla,s,1	!選択されたエリアに関する節点の選択
esurf
allsel
*ENDDO
*ENDDO

!*GO,:OWARI


!下ブロック間
*DO,jj,1,2,1
*DO,ii,1,PARA,1
CNUM=CNUM+1
allsel
!Create Contact Pair
asel,s,,,ABASE+2*30*PARA+2+(ii-1)*6+(jj-1)*6*para	!最初のはんだ下面を選択
cm,a_cont,area	!a_contという名をつける
asel,s,,,ABASE+2*36*PARA+4+(ii-1)*6+(jj-1)*6*para	!Cu表面を選択
cm,a_targ,area	!a_targという名をつける  TARGがくっつける相手の（通常大きいほうの）面
allsel
r,CNUM
rmodif,CNUM,14,1e6		!14は接触コンダクタンスのこと CONTA174の リアルコンスタントのことらしい
real,CNUM
type,3		!要素ナンバー3のこと 3ということはtarge170
cmsel,s,a_targ	!Cuの表面選択
nsla,s,1	!選択されたエリアに関する節点の選択\/:
esurf		!既存の要素の自由表面に重ねて要素を生成とのこと
type,5	!銅とはんだの接触
cmsel,s,a_cont	!はんだ下面の選択
nsla,s,1	!選択されたエリアに関する節点の選択
esurf
allsel
*ENDDO
*ENDDO

!下spcと中間spcの接触
*DO,jj,1,2,1
*DO,ii,1,PARA,1
CNUM=CNUM+1
allsel
!Create Contact Pair
asel,s,,,ABASE+2*42*PARA+1+(ii-1)*6+(jj-1)*6*para	!最初のはんだ下面を選択
cm,a_cont,area	!a_contという名をつける
asel,s,,,ABASE+2*30*PARA+6+(ii-1)*6+(jj-1)*6*para	!Cu表面を選択
cm,a_targ,area	!a_targという名をつける  TARGがくっつける相手の（通常大きいほうの）面
allsel
r,CNUM
rmodif,CNUM,14,1e6		!14は接触コンダクタンスのこと CONTA174の リアルコンスタントのことらしい
real,CNUM
type,3		!要素ナンバー3のこと 3ということはtarge170
cmsel,s,a_targ	!Cuの表面選択
nsla,s,1	!選択されたエリアに関する節点の選択\/:
esurf		!既存の要素の自由表面に重ねて要素を生成とのこと
type,5	!銅とはんだの接触
cmsel,s,a_cont	!はんだ下面の選択
nsla,s,1	!選択されたエリアに関する節点の選択
esurf
allsel
*ENDDO
*ENDDO

*DO,jj,1,2,1
*DO,ii,1,PARA,1
CNUM=CNUM+1
allsel
!Create Contact Pair
asel,s,,,ABASE+2*42*PARA+1+(ii-1)*6+(jj-1)*6*para	!最初のはんだ下面を選択
cm,a_cont,area	!a_contという名をつける
asel,s,,,ABASE+2*36*PARA+6+(ii-1)*6+(jj-1)*6*para	!Cu表面を選択
cm,a_targ,area	!a_targという名をつける  TARGがくっつける相手の（通常大きいほうの）面
allsel
r,CNUM
rmodif,CNUM,14,1e6		!14は接触コンダクタンスのこと CONTA174の リアルコンスタントのことらしい
real,CNUM
type,3		!要素ナンバー3のこと 3ということはtarge170
cmsel,s,a_targ	!Cuの表面選択
nsla,s,1	!選択されたエリアに関する節点の選択\/:
esurf		!既存の要素の自由表面に重ねて要素を生成とのこと
type,5	!銅とはんだの接触
cmsel,s,a_cont	!はんだ下面の選択
nsla,s,1	!選択されたエリアに関する節点の選択
esurf
allsel
*ENDDO
*ENDDO

!中間spcと上spcの接触
*DO,jj,1,2,1
*DO,ii,1,PARA,1
CNUM=CNUM+1
allsel
!Create Contact Pair
asel,s,,,ABASE+2*48*PARA+1+(ii-1)*6+(jj-1)*6*para	!最初のはんだ下面を選択
cm,a_cont,area	!a_contという名をつける
asel,s,,,ABASE+2*42*PARA+6+(ii-1)*6+(jj-1)*6*para	!Cu表面を選択
cm,a_targ,area	!a_targという名をつける  TARGがくっつける相手の（通常大きいほうの）面
allsel
r,CNUM
rmodif,CNUM,14,1e6		!14は接触コンダクタンスのこと CONTA174の リアルコンスタントのことらしい
real,CNUM
type,3		!要素ナンバー3のこと 3ということはtarge170
cmsel,s,a_targ	!Cuの表面選択
nsla,s,1	!選択されたエリアに関する節点の選択\/:
esurf		!既存の要素の自由表面に重ねて要素を生成とのこと
type,5	!銅とはんだの接触
cmsel,s,a_cont	!はんだ下面の選択
nsla,s,1	!選択されたエリアに関する節点の選択
esurf
allsel
*ENDDO
*ENDDO

!*GO,:OWARI


!上spcとはんだの接触
!中間spcと上spcの接触
*DO,jj,1,2,1
*DO,ii,1,PARA,1
CNUM=CNUM+1
allsel
!Create Contact Pair
asel,s,,,ABASE+2*54*PARA+1+(ii-1)*6+(jj-1)*6*para	!最初のはんだ下面を選択
cm,a_cont,area	!a_contという名をつける
asel,s,,,ABASE+2*48*PARA+6+(ii-1)*6+(jj-1)*6*para	!Cu表面を選択
cm,a_targ,area	!a_targという名をつける  TARGがくっつける相手の（通常大きいほうの）面
allsel
r,CNUM
rmodif,CNUM,14,1e6		!14は接触コンダクタンスのこと CONTA174の リアルコンスタントのことらしい
real,CNUM
type,3		!要素ナンバー3のこと 3ということはtarge170
cmsel,s,a_targ	!Cuの表面選択
nsla,s,1	!選択されたエリアに関する節点の選択\/:
esurf		!既存の要素の自由表面に重ねて要素を生成とのこと
type,4	!銅とはんだの接触
cmsel,s,a_cont	!はんだ下面の選択
nsla,s,1	!選択されたエリアに関する節点の選択
esurf
allsel
*ENDDO
*ENDDO


!上DBCとSPCはんだの接触
*DO,jj,1,2,1
*DO,ii,1,PARA,1
CNUM=CNUM+1
allsel
!Create Contact Pair
asel,s,,,195+(jj-1)*18	!最初のはんだ下面を選択
cm,a_cont,area	!a_contという名をつける
asel,s,,,ABASE+2*54*PARA+6+(ii-1)*6+(jj-1)*6*para	!Cu表面を選択
cm,a_targ,area	!a_targという名をつける  TARGがくっつける相手の（通常大きいほうの）面
allsel
r,CNUM
rmodif,CNUM,14,1e6		!14は接触コンダクタンスのこと CONTA174の リアルコンスタントのことらしい
real,CNUM
type,3		!要素ナンバー3のこと 3ということはtarge170
cmsel,s,a_targ	!Cuの表面選択
nsla,s,1	!選択されたエリアに関する節点の選択\/:
esurf		!既存の要素の自由表面に重ねて要素を生成とのこと
type,4	!銅とはんだの接触
cmsel,s,a_cont	!はんだ下面の選択
nsla,s,1	!選択されたエリアに関する節点の選択
esurf
allsel
*ENDDO
*ENDDO

*IF,RESINKEY,EQ,1,THEN

!ここから、パラチップ周辺の樹脂作成----------------------------------------------------
X1=KBASE+(8*10)*PARA*2
X2=LBASE+PARA*2*(12*10)
X3=VBASE+PARA*2*10

*DO,ii,1,2,1			!OorP
	*DO,jj,1,PARA,1		!PARA
		*DO,nn,1,4,1	!4辺のどこか
			*DO,kk,1,2,1	!上or下
				*DO,mm,1,4,1
					ll=X1+(ii-1)*PARA*32+(jj-1)*8*4
					ll=ll+(nn-1)*8+(kk-1)*4+mm
					k,ll,RESINCOR((ii-1)*PARA+jj,nn,kk,mm,1),RESINCOR((ii-1)*PARA+jj,nn,kk,mm,2),RESINCOR((ii-1)*PARA+jj,nn,kk,mm,3)
				*ENDDO
			*ENDDO
		*ENDDO
	*ENDDO
*ENDDO
*DO,ii,1,2,1			!OorP
	*DO,jj,1,PARA,1		!PARA
			mm=(ii-1)*PARA*32+(jj-1)*32
		V,X1+mm+1,X1+mm+2,X1+mm+3,X1+mm+4,X1+mm+5,X1+mm+6,X1+mm+7,X1+mm+8
		V,X1+mm+3,X1+mm+2,X1+mm+11,X1+mm+12,X1+mm+7,X1+mm+6,X1+mm+15,X1+mm+16
		V,X1+mm+17,X1+mm+12,X1+mm+11,X1+mm+20,X1+mm+21,X1+mm+16,X1+mm+15,X1+mm+24
		V,X1+mm+1,X1+mm+4,X1+mm+17,X1+mm+20,X1+mm+5,X1+mm+8,X1+mm+21,X1+mm+24
	*ENDDO
*ENDDO
D_PLTX=NINT(IGBTX/M_SOLY)	!チップと接触する樹脂はあえて半田の精度でメッシュを切る
D_PLTY=NINT(FINERESINCOR/M_SOLY)	!チップと接触する樹脂はあえて半田の精度でメッシュを切る
D_PLTZ=NINT(DSOLT/M_SOLZ)	!チップと接触する樹脂はあえて半田の精度でメッシュを切る
!*IF,D_PLTY,LT,3,THEN
!	D_PLTY=3
!*ENDIF
*IF,D_PLTZ,LT,3,THEN
	D_PLTZ=3
*ENDIF
MAT,7
TYPE,1	!ET,1のことヘキサメッシュ
MSHAP,0,3d	!0:四角形状　3d：3次元
MSHK,1		!MSHKEYの省略形 1はマップ°メッシュ
*DO,ii,1,2,1			!OorP
	*DO,jj,1,PARA,1		!PARA
		lsel,s,,,X2+((ii-1)*PARA+(jj-1))*32+10
		lesiz,all,,,D_PLTX		!z分割
		lsel,all			!最後にこのALLがないと、次にLをSELできなくなってしまいエラーが発生します。これはMUST
		lsel,s,,,X2+((ii-1)*PARA+(jj-1))*32+2
		lesiz,all,,,D_PLTY		!z分割
		lsel,all			!最後にこのALLがないと、次にLをSELできなくなってしまいエラーが発生します。これはMUST
		lsel,s,,,X2+((ii-1)*PARA+(jj-1))*32+5
		lesiz,all,,,D_PLTZ		!z分割
		lsel,all			!最後にこのALLがないと、次にLをSELできなくなってしまいエラーが発生します。これはMUST
		VMESH,X3+((ii-1)*PARA+(jj-1))*4+1
		VMESH,X3+((ii-1)*PARA+(jj-1))*4+2
		VMESH,X3+((ii-1)*PARA+(jj-1))*4+3
		VMESH,X3+((ii-1)*PARA+(jj-1))*4+4
	*ENDDO
*ENDDO

!チップ横の樹脂
X4=ABASE+PARA*2*10*6
D_PLTZ=NINT(IGBTZ/M_SOLZ)	!チップと接触する樹脂はあえて半田の精度でメッシュを切る
*IF,D_PLTZ,LT,3,THEN
	D_PLTZ=3
*ENDIF
D_PLTZ=1	!チップ側面のせん断力が異常なので、チップ側面は1分割とした 20240305
*DO,ii,1,2,1			!OorP
	*DO,jj,1,PARA,1		!PARA
		ASEL,S,AREA,,X4+(ii-1)*PARA*20+(jj-1)*20+6
		ASEL,A,AREA,,X4+(ii-1)*PARA*20+(jj-1)*20+11
		ASEL,A,AREA,,X4+(ii-1)*PARA*20+(jj-1)*20+16
		ASEL,A,AREA,,X4+(ii-1)*PARA*20+(jj-1)*20+20
		EXTOPT,ESIZE,D_PLTZ   ,,,,,,!要素分割数
		EXTOPT,ACLEAR,1,,,,,,,,!ボリューム生成後　パタンエリアメッシュをクリアにする
		EXTOPT,ATTR,1,0,0,,,,,,!最初の1:各AREAのMAT踏襲　0:現在のREAL 0:現在の要素座標系踏襲
		vext,all,,,0,0,IGBTZ	!下電極のスイープﾗｲﾝ　0.05立ち上げ
		aclear,all
		ALLSEL
	*ENDDO
*ENDDO

!点の作成　チップはんだ周り当たり4x8の点を作成
!チップはんだ周り当たりの線は32本
!チップはんだ周り当たりの面は20面

!チップ横の樹脂は、チップ当たり8点
!チップ横の樹脂は、チップ当たり20ライン増える
!チップ横の樹脂は、チップ当たり16面

!チップ回りの樹脂の接触--------------------------------------
X1=ABASE+PARA*2*10*6	!樹脂の手前まで
*DO,ii,1,PARA,1
CNUM=CNUM+1
allsel
!Create Contact Pair
asel,s,,,X1+1+(ii-1)*20	!最初のはんだ下面を選択
cm,a_cont,area	!a_contという名をつける
asel,s,,,12	!Cu表面を選択
cm,a_targ,area	!a_targという名をつける  TARGがくっつける相手の（通常大きいほうの）面
allsel
r,CNUM
rmodif,CNUM,14,1e6		!14は接触コンダクタンスのこと CONTA174の リアルコンスタントのことらしい
real,CNUM
type,3		!要素ナンバー3のこと 3ということはtarge170
cmsel,s,a_targ	!Cuの表面選択
nsla,s,1	!選択されたエリアに関する節点の選択
esurf		!既存の要素の自由表面に重ねて要素を生成とのこと
type,9	!銅とはんだの接触
cmsel,s,a_cont	!はんだ下面の選択
nsla,s,1	!選択されたエリアに関する節点の選択
esurf
allsel

CNUM=CNUM+1
allsel
!Create Contact Pair
asel,s,,,X1+7+(ii-1)*20	!最初のはんだ下面を選択
cm,a_cont,area	!a_contという名をつける
asel,s,,,12	!Cu表面を選択
cm,a_targ,area	!a_targという名をつける  TARGがくっつける相手の（通常大きいほうの）面
allsel
r,CNUM
rmodif,CNUM,14,1e6		!14は接触コンダクタンスのこと CONTA174の リアルコンスタントのことらしい
real,CNUM
type,3		!要素ナンバー3のこと 3ということはtarge170
cmsel,s,a_targ	!Cuの表面選択
nsla,s,1	!選択されたエリアに関する節点の選択
esurf		!既存の要素の自由表面に重ねて要素を生成とのこと
type,9	!銅とはんだの接触
cmsel,s,a_cont	!はんだ下面の選択
nsla,s,1	!選択されたエリアに関する節点の選択
esurf
allsel

CNUM=CNUM+1
allsel
!Create Contact Pair
asel,s,,,X1+12+(ii-1)*20	!最初のはんだ下面を選択
cm,a_cont,area	!a_contという名をつける
asel,s,,,12	!Cu表面を選択
cm,a_targ,area	!a_targという名をつける  TARGがくっつける相手の（通常大きいほうの）面
allsel
r,CNUM
rmodif,CNUM,14,1e6		!14は接触コンダクタンスのこと CONTA174の リアルコンスタントのことらしい
real,CNUM
type,3		!要素ナンバー3のこと 3ということはtarge170
cmsel,s,a_targ	!Cuの表面選択
nsla,s,1	!選択されたエリアに関する節点の選択
esurf		!既存の要素の自由表面に重ねて要素を生成とのこと
type,9	!銅とはんだの接触
cmsel,s,a_cont	!はんだ下面の選択
nsla,s,1	!選択されたエリアに関する節点の選択
esurf
allsel

CNUM=CNUM+1
allsel
!Create Contact Pair
asel,s,,,X1+17+(ii-1)*20	!最初のはんだ下面を選択
cm,a_cont,area	!a_contという名をつける
asel,s,,,12	!Cu表面を選択
cm,a_targ,area	!a_targという名をつける  TARGがくっつける相手の（通常大きいほうの）面
allsel
r,CNUM
rmodif,CNUM,14,1e6		!14は接触コンダクタンスのこと CONTA174の リアルコンスタントのことらしい
real,CNUM
type,3		!要素ナンバー3のこと 3ということはtarge170
cmsel,s,a_targ	!Cuの表面選択
nsla,s,1	!選択されたエリアに関する節点の選択
esurf		!既存の要素の自由表面に重ねて要素を生成とのこと
type,9	!銅とはんだの接触
cmsel,s,a_cont	!はんだ下面の選択
nsla,s,1	!選択されたエリアに関する節点の選択
esurf
allsel
*ENDDO

*DO,ii,1,PARA,1
CNUM=CNUM+1
allsel
!Create Contact Pair
asel,s,,,X1+PARA*20+1+(ii-1)*20	!最初のはんだ下面を選択
cm,a_cont,area	!a_contという名をつける
asel,s,,,30	!Cu表面を選択
cm,a_targ,area	!a_targという名をつける  TARGがくっつける相手の（通常大きいほうの）面
allsel
r,CNUM
rmodif,CNUM,14,1e6		!14は接触コンダクタンスのこと CONTA174の リアルコンスタントのことらしい
real,CNUM
type,3		!要素ナンバー3のこと 3ということはtarge170
cmsel,s,a_targ	!Cuの表面選択
nsla,s,1	!選択されたエリアに関する節点の選択
esurf		!既存の要素の自由表面に重ねて要素を生成とのこと
type,9	!銅とはんだの接触
cmsel,s,a_cont	!はんだ下面の選択
nsla,s,1	!選択されたエリアに関する節点の選択
esurf
allsel

CNUM=CNUM+1
allsel
!Create Contact Pair
asel,s,,,X1+PARA*20+7+(ii-1)*20	!最初のはんだ下面を選択
cm,a_cont,area	!a_contという名をつける
asel,s,,,30	!Cu表面を選択
cm,a_targ,area	!a_targという名をつける  TARGがくっつける相手の（通常大きいほうの）面
allsel
r,CNUM
rmodif,CNUM,14,1e6		!14は接触コンダクタンスのこと CONTA174の リアルコンスタントのことらしい
real,CNUM
type,3		!要素ナンバー3のこと 3ということはtarge170
cmsel,s,a_targ	!Cuの表面選択
nsla,s,1	!選択されたエリアに関する節点の選択
esurf		!既存の要素の自由表面に重ねて要素を生成とのこと
type,9	!銅とはんだの接触
cmsel,s,a_cont	!はんだ下面の選択
nsla,s,1	!選択されたエリアに関する節点の選択
esurf
allsel

CNUM=CNUM+1
allsel
!Create Contact Pair
asel,s,,,X1+PARA*20+12+(ii-1)*20	!最初のはんだ下面を選択
cm,a_cont,area	!a_contという名をつける
asel,s,,,30	!Cu表面を選択
cm,a_targ,area	!a_targという名をつける  TARGがくっつける相手の（通常大きいほうの）面
allsel
r,CNUM
rmodif,CNUM,14,1e6		!14は接触コンダクタンスのこと CONTA174の リアルコンスタントのことらしい
real,CNUM
type,3		!要素ナンバー3のこと 3ということはtarge170
cmsel,s,a_targ	!Cuの表面選択
nsla,s,1	!選択されたエリアに関する節点の選択
esurf		!既存の要素の自由表面に重ねて要素を生成とのこと
type,9	!銅とはんだの接触
cmsel,s,a_cont	!はんだ下面の選択
nsla,s,1	!選択されたエリアに関する節点の選択
esurf
allsel

CNUM=CNUM+1
allsel
!Create Contact Pair
asel,s,,,X1+PARA*20+17+(ii-1)*20	!最初のはんだ下面を選択
cm,a_cont,area	!a_contという名をつける
asel,s,,,30	!Cu表面を選択
cm,a_targ,area	!a_targという名をつける  TARGがくっつける相手の（通常大きいほうの）面
allsel
r,CNUM
rmodif,CNUM,14,1e6		!14は接触コンダクタンスのこと CONTA174の リアルコンスタントのことらしい
real,CNUM
type,3		!要素ナンバー3のこと 3ということはtarge170
cmsel,s,a_targ	!Cuの表面選択
nsla,s,1	!選択されたエリアに関する節点の選択
esurf		!既存の要素の自由表面に重ねて要素を生成とのこと
type,9	!銅とはんだの接触
cmsel,s,a_cont	!はんだ下面の選択
nsla,s,1	!選択されたエリアに関する節点の選択
esurf
allsel
*ENDDO

!*GO,:OWARI
!はんだ側面  TYPE,6
*DO,jj,1,2,1
*DO,ii,1,PARA,1
CNUM=CNUM+1
allsel
!Create Contact Pair
asel,s,,,X1+4+(jj-1)*PARA*20+(ii-1)*20	!最初のはんだ下面を選択
cm,a_cont,area	!a_contという名をつける
asel,s,,,ABASE+(jj-1)*PARA*6+(ii-1)*6+2	!Cu表面を選択
cm,a_targ,area	!a_targという名をつける  TARGがくっつける相手の（通常大きいほうの）面
allsel
r,CNUM
rmodif,CNUM,14,1e6		!14は接触コンダクタンスのこと CONTA174の リアルコンスタントのことらしい
real,CNUM
type,3		!要素ナンバー3のこと 3ということはtarge170
cmsel,s,a_targ	!Cuの表面選択
nsla,s,1	!選択されたエリアに関する節点の選択
esurf		!既存の要素の自由表面に重ねて要素を生成とのこと
type,6	!銅とはんだの接触
cmsel,s,a_cont	!はんだ下面の選択
nsla,s,1	!選択されたエリアに関する節点の選択
esurf
allsel

CNUM=CNUM+1
allsel
!Create Contact Pair
asel,s,,,X1+10+(jj-1)*PARA*20+(ii-1)*20	!最初のはんだ下面を選択
cm,a_cont,area	!a_contという名をつける
asel,s,,,ABASE+(jj-1)*PARA*6+(ii-1)*6+3	!Cu表面を選択
cm,a_targ,area	!a_targという名をつける  TARGがくっつける相手の（通常大きいほうの）面
allsel
r,CNUM
rmodif,CNUM,14,1e6		!14は接触コンダクタンスのこと CONTA174の リアルコンスタントのことらしい
real,CNUM
type,3		!要素ナンバー3のこと 3ということはtarge170
cmsel,s,a_targ	!Cuの表面選択
nsla,s,1	!選択されたエリアに関する節点の選択
esurf		!既存の要素の自由表面に重ねて要素を生成とのこと
type,6	!銅とはんだの接触
cmsel,s,a_cont	!はんだ下面の選択
nsla,s,1	!選択されたエリアに関する節点の選択
esurf
allsel

CNUM=CNUM+1
allsel
!Create Contact Pair
asel,s,,,X1+13+(jj-1)*PARA*20+(ii-1)*20	!最初のはんだ下面を選択
cm,a_cont,area	!a_contという名をつける
asel,s,,,ABASE+(jj-1)*PARA*6+(ii-1)*6+4	!Cu表面を選択
cm,a_targ,area	!a_targという名をつける  TARGがくっつける相手の（通常大きいほうの）面
allsel
r,CNUM
rmodif,CNUM,14,1e6		!14は接触コンダクタンスのこと CONTA174の リアルコンスタントのことらしい
real,CNUM
type,3		!要素ナンバー3のこと 3ということはtarge170
cmsel,s,a_targ	!Cuの表面選択
nsla,s,1	!選択されたエリアに関する節点の選択
esurf		!既存の要素の自由表面に重ねて要素を生成とのこと
type,6	!銅とはんだの接触
cmsel,s,a_cont	!はんだ下面の選択
nsla,s,1	!選択されたエリアに関する節点の選択
esurf
allsel

CNUM=CNUM+1
allsel
!Create Contact Pair
asel,s,,,X1+18+(jj-1)*PARA*20+(ii-1)*20	!最初のはんだ下面を選択
cm,a_cont,area	!a_contという名をつける
asel,s,,,ABASE+(jj-1)*PARA*6+(ii-1)*6+5	!Cu表面を選択
cm,a_targ,area	!a_targという名をつける  TARGがくっつける相手の（通常大きいほうの）面
allsel
r,CNUM
rmodif,CNUM,14,1e6		!14は接触コンダクタンスのこと CONTA174の リアルコンスタントのことらしい
real,CNUM
type,3		!要素ナンバー3のこと 3ということはtarge170
cmsel,s,a_targ	!Cuの表面選択
nsla,s,1	!選択されたエリアに関する節点の選択
esurf		!既存の要素の自由表面に重ねて要素を生成とのこと
type,6	!銅とはんだの接触
cmsel,s,a_cont	!はんだ下面の選択
nsla,s,1	!選択されたエリアに関する節点の選択
esurf
allsel
*ENDDO
*ENDDO

!チップ側面---------
X1=ABASE+PARA*2*10*6+20*2*PARA	!樹脂の手前まで
!チップ側面  TYPE,7
*DO,jj,1,2,1
*DO,ii,1,PARA,1
CNUM=CNUM+1
allsel
!Create Contact Pair
asel,s,,,X1+4+(jj-1)*PARA*16+(ii-1)*16	!最初のはんだ下面を選択
cm,a_cont,area	!a_contという名をつける
asel,s,,,ABASE+2*PARA*6+(jj-1)*PARA*6+(ii-1)*6+2	!Cu表面を選択
cm,a_targ,area	!a_targという名をつける  TARGがくっつける相手の（通常大きいほうの）面
allsel
r,CNUM
rmodif,CNUM,14,1e6		!14は接触コンダクタンスのこと CONTA174の リアルコンスタントのことらしい
real,CNUM
type,3		!要素ナンバー3のこと 3ということはtarge170
cmsel,s,a_targ	!Cuの表面選択
nsla,s,1	!選択されたエリアに関する節点の選択
esurf		!既存の要素の自由表面に重ねて要素を生成とのこと
type,7	!銅とはんだの接触
cmsel,s,a_cont	!はんだ下面の選択
nsla,s,1	!選択されたエリアに関する節点の選択
esurf
allsel

CNUM=CNUM+1
allsel
!Create Contact Pair
asel,s,,,X1+9+(jj-1)*PARA*16+(ii-1)*16	!最初のはんだ下面を選択
cm,a_cont,area	!a_contという名をつける
asel,s,,,ABASE+2*PARA*6+(jj-1)*PARA*6+(ii-1)*6+3	!Cu表面を選択
cm,a_targ,area	!a_targという名をつける  TARGがくっつける相手の（通常大きいほうの）面
allsel
r,CNUM
rmodif,CNUM,14,1e6		!14は接触コンダクタンスのこと CONTA174の リアルコンスタントのことらしい
real,CNUM
type,3		!要素ナンバー3のこと 3ということはtarge170
cmsel,s,a_targ	!Cuの表面選択
nsla,s,1	!選択されたエリアに関する節点の選択
esurf		!既存の要素の自由表面に重ねて要素を生成とのこと
type,7	!銅とはんだの接触
cmsel,s,a_cont	!はんだ下面の選択
nsla,s,1	!選択されたエリアに関する節点の選択
esurf
allsel

CNUM=CNUM+1
allsel
!Create Contact Pair
asel,s,,,X1+11+(jj-1)*PARA*16+(ii-1)*16	!最初のはんだ下面を選択
cm,a_cont,area	!a_contという名をつける
asel,s,,,ABASE+2*PARA*6+(jj-1)*PARA*6+(ii-1)*6+4	!Cu表面を選択
cm,a_targ,area	!a_targという名をつける  TARGがくっつける相手の（通常大きいほうの）面
allsel
r,CNUM
rmodif,CNUM,14,1e6		!14は接触コンダクタンスのこと CONTA174の リアルコンスタントのことらしい
real,CNUM
type,3		!要素ナンバー3のこと 3ということはtarge170
cmsel,s,a_targ	!Cuの表面選択
nsla,s,1	!選択されたエリアに関する節点の選択
esurf		!既存の要素の自由表面に重ねて要素を生成とのこと
type,7	!銅とはんだの接触
cmsel,s,a_cont	!はんだ下面の選択
nsla,s,1	!選択されたエリアに関する節点の選択
esurf
allsel

CNUM=CNUM+1
allsel
!Create Contact Pair
asel,s,,,X1+15+(jj-1)*PARA*16+(ii-1)*16	!最初のはんだ下面を選択
cm,a_cont,area	!a_contという名をつける
asel,s,,,ABASE+2*PARA*6+(jj-1)*PARA*6+(ii-1)*6+5	!Cu表面を選択
cm,a_targ,area	!a_targという名をつける  TARGがくっつける相手の（通常大きいほうの）面
allsel
r,CNUM
rmodif,CNUM,14,1e6		!14は接触コンダクタンスのこと CONTA174の リアルコンスタントのことらしい
real,CNUM
type,3		!要素ナンバー3のこと 3ということはtarge170
cmsel,s,a_targ	!Cuの表面選択
nsla,s,1	!選択されたエリアに関する節点の選択
esurf		!既存の要素の自由表面に重ねて要素を生成とのこと
type,7	!銅とはんだの接触
cmsel,s,a_cont	!はんだ下面の選択
nsla,s,1	!選択されたエリアに関する節点の選択
esurf
allsel
*ENDDO
*ENDDO


!点の作成　チップはんだ周り当たり4x8の点を作成
!チップはんだ周り当たりの線は32本
!チップはんだ周り当たりの面は20面

!チップ横の樹脂は、チップ当たり8点
!チップ横の樹脂は、チップ当たり20ライン増える
!チップ横の樹脂は、チップ当たり16面

!エミッタはんだまわりの樹脂----------------------------------
!FINERESINEMIが樹脂の幅
X1=KBASE+2*PARA*8*10
X1=X1+2*PARA*32+2*PARA*8
X2=LBASE+2*PARA*12*10
X2=X2+2*PARA*(32+20)
X3=ABASE+2*PARA*6*10
X3=X3+2*PARA*(20+16)
X4=VBASE+2*PARA*10+2*PARA*8
*DO,ii,1,2,1			!OorP
	*DO,jj,1,PARA,1		!PARA
		nn=1
			*DO,kk,1,2,1	!上or下
				*DO,mm,1,4,1
					ll=X1+(ii-1)*PARA*24+(jj-1)*24
					ll=ll+(nn-1)*4+(kk-1)*4+mm
					k,ll,RESINEMI((ii-1)*PARA+jj,nn,kk,mm,1),RESINEMI((ii-1)*PARA+jj,nn,kk,mm,2),RESINEMI((ii-1)*PARA+jj,nn,kk,mm,3)
				*ENDDO
			*ENDDO
		ll=X1+(ii-1)*PARA*24+(jj-1)*24+8
		k,ll+1,RESINEMI((ii-1)*PARA+jj,2,1,3,1),RESINEMI((ii-1)*PARA+jj,2,1,3,2),RESINEMI((ii-1)*PARA+jj,2,1,3,3)
		k,ll+2,RESINEMI((ii-1)*PARA+jj,2,1,4,1),RESINEMI((ii-1)*PARA+jj,2,1,4,2),RESINEMI((ii-1)*PARA+jj,2,1,4,3)
		k,ll+3,RESINEMI((ii-1)*PARA+jj,2,2,3,1),RESINEMI((ii-1)*PARA+jj,2,2,3,2),RESINEMI((ii-1)*PARA+jj,2,2,3,3)
		k,ll+4,RESINEMI((ii-1)*PARA+jj,2,2,4,1),RESINEMI((ii-1)*PARA+jj,2,2,4,2),RESINEMI((ii-1)*PARA+jj,2,2,4,3)
		k,ll+5,RESINEMI((ii-1)*PARA+jj,3,1,2,1),RESINEMI((ii-1)*PARA+jj,3,1,2,2),RESINEMI((ii-1)*PARA+jj,3,1,2,3)
		k,ll+6,RESINEMI((ii-1)*PARA+jj,3,1,3,1),RESINEMI((ii-1)*PARA+jj,3,1,3,2),RESINEMI((ii-1)*PARA+jj,3,1,3,3)
		k,ll+7,RESINEMI((ii-1)*PARA+jj,3,2,2,1),RESINEMI((ii-1)*PARA+jj,3,2,2,2),RESINEMI((ii-1)*PARA+jj,3,2,2,3)
		k,ll+8,RESINEMI((ii-1)*PARA+jj,3,2,3,1),RESINEMI((ii-1)*PARA+jj,3,2,3,2),RESINEMI((ii-1)*PARA+jj,3,2,3,3)
		k,ll+9,RESINEMI((ii-1)*PARA+jj,4,1,3,1),RESINEMI((ii-1)*PARA+jj,4,1,3,2),RESINEMI((ii-1)*PARA+jj,4,1,3,3)
		k,ll+10,RESINEMI((ii-1)*PARA+jj,4,1,4,1),RESINEMI((ii-1)*PARA+jj,4,1,4,2),RESINEMI((ii-1)*PARA+jj,4,1,4,3)
		k,ll+11,RESINEMI((ii-1)*PARA+jj,4,2,3,1),RESINEMI((ii-1)*PARA+jj,4,2,3,2),RESINEMI((ii-1)*PARA+jj,4,2,3,3)
		k,ll+12,RESINEMI((ii-1)*PARA+jj,4,2,4,1),RESINEMI((ii-1)*PARA+jj,4,2,4,2),RESINEMI((ii-1)*PARA+jj,4,2,4,3)
		k,ll+13,RESINEMI((ii-1)*PARA+jj,5,1,1,1),RESINEMI((ii-1)*PARA+jj,5,1,1,2),RESINEMI((ii-1)*PARA+jj,5,1,1,3)
		k,ll+14,RESINEMI((ii-1)*PARA+jj,5,1,4,1),RESINEMI((ii-1)*PARA+jj,5,1,4,2),RESINEMI((ii-1)*PARA+jj,5,1,4,3)
		k,ll+15,RESINEMI((ii-1)*PARA+jj,5,2,1,1),RESINEMI((ii-1)*PARA+jj,5,2,1,2),RESINEMI((ii-1)*PARA+jj,5,2,1,3)
		k,ll+16,RESINEMI((ii-1)*PARA+jj,5,2,4,1),RESINEMI((ii-1)*PARA+jj,5,2,4,2),RESINEMI((ii-1)*PARA+jj,5,2,4,3)
	*ENDDO
*ENDDO
*DO,ii,1,2,1			!OorP
	*DO,jj,1,PARA,1		!PARA
			mm=(ii-1)*PARA*24+(jj-1)*24
		V,X1+mm+1,X1+mm+2,X1+mm+3,X1+mm+4,X1+mm+5,X1+mm+6,X1+mm+7,X1+mm+8
		V,X1+mm+3,X1+mm+2,X1+mm+9,X1+mm+10,X1+mm+7,X1+mm+6,X1+mm+11,X1+mm+12
		V,X1+mm+9,X1+mm+13,X1+mm+14,X1+mm+10,X1+mm+11,X1+mm+15,X1+mm+16,X1+mm+12
		V,X1+mm+14,X1+mm+13,X1+mm+17,X1+mm+18,X1+mm+16,X1+mm+15,X1+mm+19,X1+mm+20
		V,X1+mm+21,X1+mm+18,X1+mm+17,X1+mm+22,X1+mm+23,X1+mm+20,X1+mm+19,X1+mm+24
		V,X1+mm+1,X1+mm+4,X1+mm+21,X1+mm+22,X1+mm+5,X1+mm+8,X1+mm+23,X1+mm+24
	*ENDDO
*ENDDO

!*GO,:OWARI
D_PLTX=NINT(SUBSPCX/M_SOLX)	!チップと接触する樹脂はあえて半田の精度でメッシュを切る
D_PLTY=NINT(FINERESINEMI/M_SOLY)	!チップと接触する樹脂はあえて半田の精度でメッシュを切る
D_PLTZ=NINT(DSOLT/M_SOLZ)	!チップと接触する樹脂はあえて半田の精度でメッシュを切る
!*IF,D_PLTY,LT,3,THEN
!	D_PLTY=3
!*ENDIF
*IF,D_PLTZ,LT,3,THEN
	D_PLTZ=3
*ENDIF
MAT,7
TYPE,1	!ET,1のことヘキサメッシュ
MSHAP,0,3d	!0:四角形状　3d：3次元
MSHK,1		!MSHKEYの省略形 1はマップ°メッシュ
*DO,ii,1,2,1			!OorP
	*DO,jj,1,PARA,1		!PARA
		lsel,s,,,X2+((ii-1)*PARA+(jj-1))*48+1
		lesiz,all,,,D_PLTX		!z分割
		lsel,all			!最後にこのALLがないと、次にLをSELできなくなってしまいエラーが発生します。これはMUST
		lsel,s,,,X2+((ii-1)*PARA+(jj-1))*48+2
		lesiz,all,,,D_PLTY		!z分割
		lsel,all			!最後にこのALLがないと、次にLをSELできなくなってしまいエラーが発生します。これはMUST
		lsel,s,,,X2+((ii-1)*PARA+(jj-1))*48+5
		lesiz,all,,,D_PLTZ		!z分割
		lsel,all			!最後にこのALLがないと、次にLをSELできなくなってしまいエラーが発生します。これはMUST
		VMESH,X4+((ii-1)*PARA+(jj-1))*6+1
		D_PLTY=NINT(SUBSPCY/M_SOLY)
		lsel,s,,,X2+((ii-1)*PARA+(jj-1))*48+13
		lesiz,all,,,D_PLTY		!z分割
		lsel,all			!最後にこのALLがないと、次にLをSELできなくなってしまいエラーが発生します。これはMUST
		VMESH,X4+((ii-1)*PARA+(jj-1))*6+2
		D_PLTX=NINT((ISPCX-SUBSPCX)/M_SOLX)
		lsel,s,,,X2+((ii-1)*PARA+(jj-1))*48+21
		lesiz,all,,,D_PLTX		!z分割
		lsel,all			!最後にこのALLがないと、次にLをSELできなくなってしまいエラーが発生します。これはMUST
		VMESH,X4+((ii-1)*PARA+(jj-1))*6+3
		VMESH,X4+((ii-1)*PARA+(jj-1))*6+4
		VMESH,X4+((ii-1)*PARA+(jj-1))*6+5
		VMESH,X4+((ii-1)*PARA+(jj-1))*6+6
	*ENDDO
*ENDDO

!EMIはんだよこ樹脂6個で24個の点
!EMIはんだよこ樹脂6個で48本の線
!EMIはんだよこ樹脂6個で30の面
!EMIはんだよこ樹脂6個で6個のVOL

!:OWARI

!EMIはんだよこ、DENT部分の樹脂
*DO,ii,1,2,1			!OorP
	*DO,jj,1,PARA,1		!PARA
		ll=X1+2*PARA*24+(ii-1)*PARA*2+(jj-1)*2
		k,ll+1,RESINEMIDENT((ii-1)*PARA+jj,1,2,1),RESINEMIDENT((ii-1)*PARA+jj,1,2,2),RESINEMIDENT((ii-1)*PARA+jj,1,2,3)
		k,ll+2,RESINEMIDENT((ii-1)*PARA+jj,2,2,1),RESINEMIDENT((ii-1)*PARA+jj,2,2,2),RESINEMIDENT((ii-1)*PARA+jj,2,2,3)
	*ENDDO
*ENDDO
*DO,ii,1,2,1			!OorP
	*DO,jj,1,PARA,1		!PARA
		mm=(ii-1)*PARA*24+(jj-1)*24
		ll=2*PARA*24+(ii-1)*PARA*2+(jj-1)*2
		V,X1+mm+2,X1+ll+1,X1+mm+13,X1+mm+9,X1+mm+6,X1+ll+2,X1+mm+15,X1+mm+11
	*ENDDO
*ENDDO
*DO,ii,1,2,1			!OorP
	*DO,jj,1,PARA,1		!PARA
		VMESH,X4+2*PARA*6+(ii-1)*PARA+(jj-1)+1
	*ENDDO
*ENDDO
!EMIはんだよこ+DENT樹脂7個で24+2=26個の点
!EMIはんだよこ+DENT樹脂7個で48+5=53本の線
!EMIはんだよこ+DENT樹脂7個で30+4=34の面
!EMIはんだよこ+DENT樹脂7個で6+1=7個のVOL
!EMIはんだの接触

*DO,jj,1,2,1
*DO,ii,1,PARA,1
CNUM=CNUM+1
allsel
!Create Contact Pair
X5=ABASE+2*PARA*6+6
X5=X5+(jj-1)*PARA*6+(ii-1)*6
asel,s,,,X5	!
cm,a_cont,area	!a_contという名をつける
asel,s,,,X3+1+30*PARA*(jj-1)+30*(ii-1)	!Cu表面を選択
cm,a_targ,area	!a_targという名をつける  TARGがくっつける相手の（通常大きいほうの）面
allsel
r,CNUM
rmodif,CNUM,14,1e6		!14は接触コンダクタンスのこと CONTA174の リアルコンスタントのことらしい
real,CNUM
type,3		!要素ナンバー3のこと 3ということはtarge170
cmsel,s,a_targ	!Cuの表面選択
nsla,s,1	!選択されたエリアに関する節点の選択
esurf		!既存の要素の自由表面に重ねて要素を生成とのこと
type,7	!銅とはんだの接触
cmsel,s,a_cont	!
nsla,s,1	!選択されたエリアに関する節点の選択
esurf
allsel

CNUM=CNUM+1
allsel
!Create Contact Pair
X5=ABASE+2*PARA*6+6
X5=X5+(jj-1)*PARA*6+(ii-1)*6
asel,s,,,X5	!
cm,a_cont,area	!a_contという名をつける
asel,s,,,X3+1+6+30*PARA*(jj-1)+30*(ii-1)	!Cu表面を選択
cm,a_targ,area	!a_targという名をつける  TARGがくっつける相手の（通常大きいほうの）面
allsel
r,CNUM
rmodif,CNUM,14,1e6		!14は接触コンダクタンスのこと CONTA174の リアルコンスタントのことらしい
real,CNUM
type,3		!要素ナンバー3のこと 3ということはtarge170
cmsel,s,a_targ	!Cuの表面選択
nsla,s,1	!選択されたエリアに関する節点の選択
esurf		!既存の要素の自由表面に重ねて要素を生成とのこと
type,7	!銅とはんだの接触
cmsel,s,a_cont	!
nsla,s,1	!選択されたエリアに関する節点の選択
esurf
allsel

CNUM=CNUM+1
allsel
!Create Contact Pair
X5=ABASE+2*PARA*6+6
X5=X5+(jj-1)*PARA*6+(ii-1)*6
asel,s,,,X5	!
cm,a_cont,area	!a_contという名をつける
asel,s,,,X3+1+11+30*PARA*(jj-1)+30*(ii-1)	!Cu表面を選択
cm,a_targ,area	!a_targという名をつける  TARGがくっつける相手の（通常大きいほうの）面
allsel
r,CNUM
rmodif,CNUM,14,1e6		!14は接触コンダクタンスのこと CONTA174の リアルコンスタントのことらしい
real,CNUM
type,3		!要素ナンバー3のこと 3ということはtarge170
cmsel,s,a_targ	!Cuの表面選択
nsla,s,1	!選択されたエリアに関する節点の選択
esurf		!既存の要素の自由表面に重ねて要素を生成とのこと
type,7	!銅とはんだの接触
cmsel,s,a_cont	!
nsla,s,1	!選択されたエリアに関する節点の選択
esurf
allsel

CNUM=CNUM+1
allsel
!Create Contact Pair
X5=ABASE+2*PARA*6+6
X5=X5+(jj-1)*PARA*6+(ii-1)*6
asel,s,,,X5	!
cm,a_cont,area	!a_contという名をつける
asel,s,,,X3+1+16+30*PARA*(jj-1)+30*(ii-1)	!Cu表面を選択
cm,a_targ,area	!a_targという名をつける  TARGがくっつける相手の（通常大きいほうの）面
allsel
r,CNUM
rmodif,CNUM,14,1e6		!14は接触コンダクタンスのこと CONTA174の リアルコンスタントのことらしい
real,CNUM
type,3		!要素ナンバー3のこと 3ということはtarge170
cmsel,s,a_targ	!Cuの表面選択
nsla,s,1	!選択されたエリアに関する節点の選択
esurf		!既存の要素の自由表面に重ねて要素を生成とのこと
type,7	!銅とはんだの接触
cmsel,s,a_cont	!
nsla,s,1	!選択されたエリアに関する節点の選択
esurf
allsel

CNUM=CNUM+1
allsel
!Create Contact Pair
X5=ABASE+2*PARA*6+6
X5=X5+(jj-1)*PARA*6+(ii-1)*6
asel,s,,,X5	!
cm,a_cont,area	!a_contという名をつける
asel,s,,,X3+1+21+30*PARA*(jj-1)+30*(ii-1)	!Cu表面を選択
cm,a_targ,area	!a_targという名をつける  TARGがくっつける相手の（通常大きいほうの）面
allsel
r,CNUM
rmodif,CNUM,14,1e6		!14は接触コンダクタンスのこと CONTA174の リアルコンスタントのことらしい
real,CNUM
type,3		!要素ナンバー3のこと 3ということはtarge170
cmsel,s,a_targ	!Cuの表面選択
nsla,s,1	!選択されたエリアに関する節点の選択
esurf		!既存の要素の自由表面に重ねて要素を生成とのこと
type,7	!銅とはんだの接触
cmsel,s,a_cont	!
nsla,s,1	!選択されたエリアに関する節点の選択
esurf
allsel

CNUM=CNUM+1
allsel
!Create Contact Pair
X5=ABASE+2*PARA*6+6
X5=X5+(jj-1)*PARA*6+(ii-1)*6
asel,s,,,X5	!
cm,a_cont,area	!a_contという名をつける
asel,s,,,X3+1+26+30*PARA*(jj-1)+30*(ii-1)	!Cu表面を選択
cm,a_targ,area	!a_targという名をつける  TARGがくっつける相手の（通常大きいほうの）面
allsel
r,CNUM
rmodif,CNUM,14,1e6		!14は接触コンダクタンスのこと CONTA174の リアルコンスタントのことらしい
real,CNUM
type,3		!要素ナンバー3のこと 3ということはtarge170
cmsel,s,a_targ	!Cuの表面選択
nsla,s,1	!選択されたエリアに関する節点の選択
esurf		!既存の要素の自由表面に重ねて要素を生成とのこと
type,7	!銅とはんだの接触
cmsel,s,a_cont	!
nsla,s,1	!選択されたエリアに関する節点の選択
esurf
allsel

CNUM=CNUM+1
allsel
!Create Contact Pair
X5=ABASE+2*PARA*6+6
X5=X5+(jj-1)*PARA*6+(ii-1)*6
asel,s,,,X5	!
cm,a_cont,area	!a_contという名をつける
asel,s,,,X3+30*PARA*2+(jj-1)*PARA*4+(ii-1)*4+1	!Cu表面を選択
cm,a_targ,area	!a_targという名をつける  TARGがくっつける相手の（通常大きいほうの）面
allsel
r,CNUM
rmodif,CNUM,14,1e6		!14は接触コンダクタンスのこと CONTA174の リアルコンスタントのことらしい
real,CNUM
type,3		!要素ナンバー3のこと 3ということはtarge170
cmsel,s,a_targ	!Cuの表面選択
nsla,s,1	!選択されたエリアに関する節点の選択
esurf		!既存の要素の自由表面に重ねて要素を生成とのこと
type,7	!銅とはんだの接触
cmsel,s,a_cont	!
nsla,s,1	!選択されたエリアに関する節点の選択
esurf
allsel

*ENDDO
*ENDDO


*DO,jj,1,2,1
*DO,ii,1,PARA,1
CNUM=CNUM+1
allsel
!Create Contact Pair
X5=ABASE+2*PARA*6*10
X5=X5+2*PARA*20
X5=X5+(jj-1)*PARA*16+(ii-1)*16+14
asel,s,,,X5	!
cm,a_cont,area	!a_contという名をつける
asel,s,,,X3+1+30*PARA*(jj-1)+30*(ii-1)	!Cu表面を選択
cm,a_targ,area	!a_targという名をつける  TARGがくっつける相手の（通常大きいほうの）面
allsel
r,CNUM
rmodif,CNUM,14,1e6		!14は接触コンダクタンスのこと CONTA174の リアルコンスタントのことらしい
real,CNUM
type,3		!要素ナンバー3のこと 3ということはtarge170
cmsel,s,a_targ	!Cuの表面選択
nsla,s,1	!選択されたエリアに関する節点の選択
esurf		!既存の要素の自由表面に重ねて要素を生成とのこと
type,5	!銅とはんだの接触
cmsel,s,a_cont	!
nsla,s,1	!選択されたエリアに関する節点の選択
esurf
allsel

CNUM=CNUM+1
allsel
!Create Contact Pair
X5=ABASE+2*PARA*6*10
X5=X5+2*PARA*20
X5=X5+(jj-1)*PARA*16+(ii-1)*16+6
asel,s,,,X5	!
cm,a_cont,area	!a_contという名をつける
asel,s,,,X3+12+30*PARA*(jj-1)+30*(ii-1)	!Cu表面を選択
cm,a_targ,area	!a_targという名をつける  TARGがくっつける相手の（通常大きいほうの）面
allsel
r,CNUM
rmodif,CNUM,14,1e6		!14は接触コンダクタンスのこと CONTA174の リアルコンスタントのことらしい
real,CNUM
type,3		!要素ナンバー3のこと 3ということはtarge170
cmsel,s,a_targ	!Cuの表面選択
nsla,s,1	!選択されたエリアに関する節点の選択
esurf		!既存の要素の自由表面に重ねて要素を生成とのこと
type,5	!銅とはんだの接触
cmsel,s,a_cont	!
nsla,s,1	!選択されたエリアに関する節点の選択
esurf
allsel

CNUM=CNUM+1
allsel
!Create Contact Pair
X5=ABASE+2*PARA*6*10
X5=X5+2*PARA*20
X5=X5+(jj-1)*PARA*16+(ii-1)*16+6
asel,s,,,X5	!
cm,a_cont,area	!a_contという名をつける
asel,s,,,X3+17+30*PARA*(jj-1)+30*(ii-1)	!Cu表面を選択
cm,a_targ,area	!a_targという名をつける  TARGがくっつける相手の（通常大きいほうの）面
allsel
r,CNUM
rmodif,CNUM,14,1e6		!14は接触コンダクタンスのこと CONTA174の リアルコンスタントのことらしい
real,CNUM
type,3		!要素ナンバー3のこと 3ということはtarge170
cmsel,s,a_targ	!Cuの表面選択
nsla,s,1	!選択されたエリアに関する節点の選択
esurf		!既存の要素の自由表面に重ねて要素を生成とのこと
type,5	!銅とはんだの接触
cmsel,s,a_cont	!
nsla,s,1	!選択されたエリアに関する節点の選択
esurf
allsel

CNUM=CNUM+1
allsel
!Create Contact Pair
X5=ABASE+2*PARA*6*10
X5=X5+2*PARA*20
X5=X5+(jj-1)*PARA*16+(ii-1)*16+10
asel,s,,,X5	!
cm,a_cont,area	!a_contという名をつける
asel,s,,,X3+17+30*PARA*(jj-1)+30*(ii-1)	!Cu表面を選択
cm,a_targ,area	!a_targという名をつける  TARGがくっつける相手の（通常大きいほうの）面
allsel
r,CNUM
rmodif,CNUM,14,1e6		!14は接触コンダクタンスのこと CONTA174の リアルコンスタントのことらしい
real,CNUM
type,3		!要素ナンバー3のこと 3ということはtarge170
cmsel,s,a_targ	!Cuの表面選択
nsla,s,1	!選択されたエリアに関する節点の選択
esurf		!既存の要素の自由表面に重ねて要素を生成とのこと
type,5	!銅とはんだの接触
cmsel,s,a_cont	!
nsla,s,1	!選択されたエリアに関する節点の選択
esurf
allsel


CNUM=CNUM+1
allsel
!Create Contact Pair
X5=ABASE+2*PARA*6*10
X5=X5+2*PARA*20
X5=X5+(jj-1)*PARA*16+(ii-1)*16+6
asel,s,,,X5	!
cm,a_cont,area	!a_contという名をつける
asel,s,,,X3+22+30*PARA*(jj-1)+30*(ii-1)	!Cu表面を選択
cm,a_targ,area	!a_targという名をつける  TARGがくっつける相手の（通常大きいほうの）面
allsel
r,CNUM
rmodif,CNUM,14,1e6		!14は接触コンダクタンスのこと CONTA174の リアルコンスタントのことらしい
real,CNUM
type,3		!要素ナンバー3のこと 3ということはtarge170
cmsel,s,a_targ	!Cuの表面選択
nsla,s,1	!選択されたエリアに関する節点の選択
esurf		!既存の要素の自由表面に重ねて要素を生成とのこと
type,5	!銅とはんだの接触
cmsel,s,a_cont	!
nsla,s,1	!選択されたエリアに関する節点の選択
esurf
allsel

CNUM=CNUM+1
allsel
!Create Contact Pair
X5=ABASE+2*PARA*6*10
X5=X5+2*PARA*20
X5=X5+(jj-1)*PARA*16+(ii-1)*16+10
asel,s,,,X5	!
cm,a_cont,area	!a_contという名をつける
asel,s,,,X3+22+30*PARA*(jj-1)+30*(ii-1)	!Cu表面を選択
cm,a_targ,area	!a_targという名をつける  TARGがくっつける相手の（通常大きいほうの）面
allsel
r,CNUM
rmodif,CNUM,14,1e6		!14は接触コンダクタンスのこと CONTA174の リアルコンスタントのことらしい
real,CNUM
type,3		!要素ナンバー3のこと 3ということはtarge170
cmsel,s,a_targ	!Cuの表面選択
nsla,s,1	!選択されたエリアに関する節点の選択
esurf		!既存の要素の自由表面に重ねて要素を生成とのこと
type,5	!銅とはんだの接触
cmsel,s,a_cont	!
nsla,s,1	!選択されたエリアに関する節点の選択
esurf
allsel

CNUM=CNUM+1
allsel
!Create Contact Pair
X5=ABASE+2*PARA*6*10
X5=X5+2*PARA*20
X5=X5+(jj-1)*PARA*16+(ii-1)*16+14
asel,s,,,X5	!
cm,a_cont,area	!a_contという名をつける
asel,s,,,X3+22+30*PARA*(jj-1)+30*(ii-1)	!Cu表面を選択
cm,a_targ,area	!a_targという名をつける  TARGがくっつける相手の（通常大きいほうの）面
allsel
r,CNUM
rmodif,CNUM,14,1e6		!14は接触コンダクタンスのこと CONTA174の リアルコンスタントのことらしい
real,CNUM
type,3		!要素ナンバー3のこと 3ということはtarge170
cmsel,s,a_targ	!Cuの表面選択
nsla,s,1	!選択されたエリアに関する節点の選択
esurf		!既存の要素の自由表面に重ねて要素を生成とのこと
type,5	!銅とはんだの接触
cmsel,s,a_cont	!
nsla,s,1	!選択されたエリアに関する節点の選択
esurf
allsel

CNUM=CNUM+1
allsel
!Create Contact Pair
X5=ABASE+2*PARA*6*10
X5=X5+2*PARA*20
X5=X5+(jj-1)*PARA*16+(ii-1)*16+10
asel,s,,,X5	!
cm,a_cont,area	!a_contという名をつける
asel,s,,,X3+27+30*PARA*(jj-1)+30*(ii-1)	!Cu表面を選択
cm,a_targ,area	!a_targという名をつける  TARGがくっつける相手の（通常大きいほうの）面
allsel
r,CNUM
rmodif,CNUM,14,1e6		!14は接触コンダクタンスのこと CONTA174の リアルコンスタントのことらしい
real,CNUM
type,3		!要素ナンバー3のこと 3ということはtarge170
cmsel,s,a_targ	!Cuの表面選択
nsla,s,1	!選択されたエリアに関する節点の選択
esurf		!既存の要素の自由表面に重ねて要素を生成とのこと
type,5	!銅とはんだの接触
cmsel,s,a_cont	!
nsla,s,1	!選択されたエリアに関する節点の選択
esurf
allsel

CNUM=CNUM+1
allsel
!Create Contact Pair
X5=ABASE+2*PARA*6*10
X5=X5+2*PARA*20
X5=X5+(jj-1)*PARA*16+(ii-1)*16+14
asel,s,,,X5	!
cm,a_cont,area	!a_contという名をつける
asel,s,,,X3+27+30*PARA*(jj-1)+30*(ii-1)	!Cu表面を選択
cm,a_targ,area	!a_targという名をつける  TARGがくっつける相手の（通常大きいほうの）面
allsel
r,CNUM
rmodif,CNUM,14,1e6		!14は接触コンダクタンスのこと CONTA174の リアルコンスタントのことらしい
real,CNUM
type,3		!要素ナンバー3のこと 3ということはtarge170
cmsel,s,a_targ	!Cuの表面選択
nsla,s,1	!選択されたエリアに関する節点の選択
esurf		!既存の要素の自由表面に重ねて要素を生成とのこと
type,5	!銅とはんだの接触
cmsel,s,a_cont	!
nsla,s,1	!選択されたエリアに関する節点の選択
esurf
allsel

CNUM=CNUM+1
allsel
!Create Contact Pair
X5=ABASE+2*PARA*6*10
X5=X5+2*PARA*20
X5=X5+(jj-1)*PARA*16+(ii-1)*16+6
asel,s,,,X5	!
cm,a_cont,area	!a_contという名をつける
asel,s,,,X3+30*PARA*2+(jj-1)*PARA*4+(ii-1)*4+1	!Cu表面を選択
cm,a_targ,area	!a_targという名をつける  TARGがくっつける相手の（通常大きいほうの）面
allsel
r,CNUM
rmodif,CNUM,14,1e6		!14は接触コンダクタンスのこと CONTA174の リアルコンスタントのことらしい
real,CNUM
type,3		!要素ナンバー3のこと 3ということはtarge170
cmsel,s,a_targ	!Cuの表面選択
nsla,s,1	!選択されたエリアに関する節点の選択
esurf		!既存の要素の自由表面に重ねて要素を生成とのこと
type,5	!銅とはんだの接触
cmsel,s,a_cont	!
nsla,s,1	!選択されたエリアに関する節点の選択
esurf
allsel

*ENDDO
*ENDDO


!エミッタ半田と樹脂の接合
*DO,jj,1,2,1
*DO,ii,1,PARA,1
CNUM=CNUM+1
allsel
!Create Contact Pair
X5=ABASE+2*PARA*6*2+2*PARA*6
X5=X5+(jj-1)*PARA*6+(ii-1)*6+2
asel,s,,,X5	!
cm,a_cont,area	!a_contという名をつける
asel,s,,,X3+4+30*PARA*(jj-1)+30*(ii-1)	!Cu表面を選択
cm,a_targ,area	!a_targという名をつける  TARGがくっつける相手の（通常大きいほうの）面
allsel
r,CNUM
rmodif,CNUM,14,1e6		!14は接触コンダクタンスのこと CONTA174の リアルコンスタントのことらしい
real,CNUM
type,3		!要素ナンバー3のこと 3ということはtarge170
cmsel,s,a_targ	!Cuの表面選択
nsla,s,1	!選択されたエリアに関する節点の選択
esurf		!既存の要素の自由表面に重ねて要素を生成とのこと
type,6	!銅とはんだの接触
cmsel,s,a_cont	!
nsla,s,1	!選択されたエリアに関する節点の選択
esurf
allsel

CNUM=CNUM+1
allsel
!Create Contact Pair
X5=ABASE+2*PARA*6*2+2*PARA*6
X5=X5+(jj-1)*PARA*6+(ii-1)*6+3
asel,s,,,X5	!
cm,a_cont,area	!a_contという名をつける
asel,s,,,X3+10+30*PARA*(jj-1)+30*(ii-1)	!Cu表面を選択
cm,a_targ,area	!a_targという名をつける  TARGがくっつける相手の（通常大きいほうの）面
allsel
r,CNUM
rmodif,CNUM,14,1e6		!14は接触コンダクタンスのこと CONTA174の リアルコンスタントのことらしい
real,CNUM
type,3		!要素ナンバー3のこと 3ということはtarge170
cmsel,s,a_targ	!Cuの表面選択
nsla,s,1	!選択されたエリアに関する節点の選択
esurf		!既存の要素の自由表面に重ねて要素を生成とのこと
type,6	!銅とはんだの接触
cmsel,s,a_cont	!
nsla,s,1	!選択されたエリアに関する節点の選択
esurf
allsel

CNUM=CNUM+1
allsel
!Create Contact Pair
X5=ABASE+2*PARA*6*2+2*PARA*6*2
X5=X5+(jj-1)*PARA*6+(ii-1)*6+2
asel,s,,,X5	!
cm,a_cont,area	!a_contという名をつける
asel,s,,,X3+15+30*PARA*(jj-1)+30*(ii-1)	!Cu表面を選択
cm,a_targ,area	!a_targという名をつける  TARGがくっつける相手の（通常大きいほうの）面
allsel
r,CNUM
rmodif,CNUM,14,1e6		!14は接触コンダクタンスのこと CONTA174の リアルコンスタントのことらしい
real,CNUM
type,3		!要素ナンバー3のこと 3ということはtarge170
cmsel,s,a_targ	!Cuの表面選択
nsla,s,1	!選択されたエリアに関する節点の選択
esurf		!既存の要素の自由表面に重ねて要素を生成とのこと
type,6	!銅とはんだの接触
cmsel,s,a_cont	!
nsla,s,1	!選択されたエリアに関する節点の選択
esurf
allsel

CNUM=CNUM+1
allsel
!Create Contact Pair
X5=ABASE+2*PARA*6*2+2*PARA*6*2
X5=X5+(jj-1)*PARA*6+(ii-1)*6+3
asel,s,,,X5	!
cm,a_cont,area	!a_contという名をつける
asel,s,,,X3+20+30*PARA*(jj-1)+30*(ii-1)	!Cu表面を選択
cm,a_targ,area	!a_targという名をつける  TARGがくっつける相手の（通常大きいほうの）面
allsel
r,CNUM
rmodif,CNUM,14,1e6		!14は接触コンダクタンスのこと CONTA174の リアルコンスタントのことらしい
real,CNUM
type,3		!要素ナンバー3のこと 3ということはtarge170
cmsel,s,a_targ	!Cuの表面選択
nsla,s,1	!選択されたエリアに関する節点の選択
esurf		!既存の要素の自由表面に重ねて要素を生成とのこと
type,6	!銅とはんだの接触
cmsel,s,a_cont	!
nsla,s,1	!選択されたエリアに関する節点の選択
esurf
allsel

CNUM=CNUM+1
allsel
!Create Contact Pair
X5=ABASE+2*PARA*6*2+2*PARA*6*2
X5=X5+(jj-1)*PARA*6+(ii-1)*6+4
asel,s,,,X5	!
cm,a_cont,area	!a_contという名をつける
asel,s,,,X3+23+30*PARA*(jj-1)+30*(ii-1)	!Cu表面を選択
cm,a_targ,area	!a_targという名をつける  TARGがくっつける相手の（通常大きいほうの）面
allsel
r,CNUM
rmodif,CNUM,14,1e6		!14は接触コンダクタンスのこと CONTA174の リアルコンスタントのことらしい
real,CNUM
type,3		!要素ナンバー3のこと 3ということはtarge170
cmsel,s,a_targ	!Cuの表面選択
nsla,s,1	!選択されたエリアに関する節点の選択
esurf		!既存の要素の自由表面に重ねて要素を生成とのこと
type,6	!銅とはんだの接触
cmsel,s,a_cont	!
nsla,s,1	!選択されたエリアに関する節点の選択
esurf
allsel

CNUM=CNUM+1
allsel
!Create Contact Pair
X5=ABASE+2*PARA*6*2
X5=X5+(jj-1)*PARA*6+(ii-1)*6+4
asel,s,,,X5	!
cm,a_cont,area	!a_contという名をつける
asel,s,,,X3+23+30*PARA*(jj-1)+30*(ii-1)	!Cu表面を選択
cm,a_targ,area	!a_targという名をつける  TARGがくっつける相手の（通常大きいほうの）面
allsel
r,CNUM
rmodif,CNUM,14,1e6		!14は接触コンダクタンスのこと CONTA174の リアルコンスタントのことらしい
real,CNUM
type,3		!要素ナンバー3のこと 3ということはtarge170
cmsel,s,a_targ	!Cuの表面選択
nsla,s,1	!選択されたエリアに関する節点の選択
esurf		!既存の要素の自由表面に重ねて要素を生成とのこと
type,6	!銅とはんだの接触
cmsel,s,a_cont	!
nsla,s,1	!選択されたエリアに関する節点の選択
esurf
allsel

CNUM=CNUM+1
allsel
!Create Contact Pair
X5=ABASE+2*PARA*6*2
X5=X5+(jj-1)*PARA*6+(ii-1)*6+5
asel,s,,,X5	!
cm,a_cont,area	!a_contという名をつける
asel,s,,,X3+28+30*PARA*(jj-1)+30*(ii-1)	!Cu表面を選択
cm,a_targ,area	!a_targという名をつける  TARGがくっつける相手の（通常大きいほうの）面
allsel
r,CNUM
rmodif,CNUM,14,1e6		!14は接触コンダクタンスのこと CONTA174の リアルコンスタントのことらしい
real,CNUM
type,3		!要素ナンバー3のこと 3ということはtarge170
cmsel,s,a_targ	!Cuの表面選択
nsla,s,1	!選択されたエリアに関する節点の選択
esurf		!既存の要素の自由表面に重ねて要素を生成とのこと
type,6	!銅とはんだの接触
cmsel,s,a_cont	!
nsla,s,1	!選択されたエリアに関する節点の選択
esurf
allsel

CNUM=CNUM+1
allsel
!Create Contact Pair
X5=ABASE+2*PARA*6*2+2*PARA*6
X5=X5+(jj-1)*PARA*6+(ii-1)*6+5
asel,s,,,X5	!
cm,a_cont,area	!a_contという名をつける
asel,s,,,X3+28+30*PARA*(jj-1)+30*(ii-1)	!Cu表面を選択
cm,a_targ,area	!a_targという名をつける  TARGがくっつける相手の（通常大きいほうの）面
allsel
r,CNUM
rmodif,CNUM,14,1e6		!14は接触コンダクタンスのこと CONTA174の リアルコンスタントのことらしい
real,CNUM
type,3		!要素ナンバー3のこと 3ということはtarge170
cmsel,s,a_targ	!Cuの表面選択
nsla,s,1	!選択されたエリアに関する節点の選択
esurf		!既存の要素の自由表面に重ねて要素を生成とのこと
type,6	!銅とはんだの接触
cmsel,s,a_cont	!
nsla,s,1	!選択されたエリアに関する節点の選択
esurf
allsel

*ENDDO
*ENDDO

!EMIはんだよこ+DENT樹脂7個で24+2=26個の点
!EMIはんだよこ+DENT樹脂7個で48+5=53本の線
!EMIはんだよこ+DENT樹脂7個で30+4=34の面
!EMIはんだよこ+DENT樹脂7個で6+1=7個のVOL


X1=KBASE+2*PARA*8*10
X1=X1+2*PARA*32+2*PARA*8
X1=X1+2*PARA*26
X2=LBASE+2*PARA*12*10
X2=X2+2*PARA*(32+20)
X2=X2+2*PARA*53
X3=ABASE+2*PARA*6*10	!樹脂なしの各PARA要素まで
X3=X3+2*PARA*(20+16)	!チップ周りの樹脂
X3=X3+2*PARA*34			!EMIはんだまわりの樹脂
X4=VBASE+2*PARA*10+2*PARA*8
X4=X4+2*PARA*7

X5=X3-2*PARA*34
!エミッタはんだ横の樹脂を面取りSPC下まで伸ばす
*DO,ii,1,2,1
*DO,jj,1,PARA,1
		ASEL,S,AREA,,X5+(ii-1)*PARA*30+(jj-1)*30+6
		ASEL,A,AREA,,X5+(ii-1)*PARA*30+(jj-1)*30+11
		ASEL,A,AREA,,X5+(ii-1)*PARA*30+(jj-1)*30+16
		ASEL,A,AREA,,X5+(ii-1)*PARA*30+(jj-1)*30+21
		ASEL,A,AREA,,X5+(ii-1)*PARA*30+(jj-1)*30+26
		ASEL,A,AREA,,X5+(ii-1)*PARA*30+(jj-1)*30+30
		ASEL,A,AREA,,X5+2*PARA*30+(ii-1)*PARA*4+(jj-1)*4+4
		EXTOPT,ESIZE,D_PLTZ   ,,,,,,!要素分割数
		EXTOPT,ACLEAR,1,,,,,,,,!ボリューム生成後　パタンエリアメッシュをクリアにする
		EXTOPT,ATTR,1,0,0,,,,,,!最初の1:各AREAのMAT踏襲　0:現在のREAL 0:現在の要素座標系踏襲
		vext,all,,,0,0,SPCZ	!下電極のスイープﾗｲﾝ　0.05立ち上げ
		aclear,all
		ALLSEL
*ENDDO
*ENDDO

!EMISPC横樹脂7個立ち上げで、
!点 13*PARA*2新規発生
!線 33*PARA*2新規発生
!面 27*PARA*2新規発生
!VOL 7*PARA*2新規発生

!SPC側面との接触
*DO,jj,1,2,1
*DO,ii,1,PARA,1
!----------------20240229追加 SPC段差下面への樹脂上面の接合------------------------------
CNUM=CNUM+1
allsel
!Create Contact Pair
X5=ABASE+2*PARA*6*10
X5=X5+2*PARA*(20+16)
X5=X5+2*PARA*34
X5=X5+(jj-1)*PARA*27+(ii-1)*27+1
asel,s,,,X5	!
cm,a_cont,area	!a_contという名をつける
X6=ABASE+2*PARA*6*7
X6=X6+(jj-1)*PARA*6+(ii-1)*6+1
asel,s,,,X6	!Cu表面を選択
cm,a_targ,area	!a_targという名をつける  TARGがくっつける相手の（通常大きいほうの）面
allsel
r,CNUM
rmodif,CNUM,14,1e6		!14は接触コンダクタンスのこと CONTA174の リアルコンスタントのことらしい
real,CNUM
type,3		!要素ナンバー3のこと 3ということはtarge170
cmsel,s,a_targ	!Cuの表面選択
nsla,s,1	!選択されたエリアに関する節点の選択
esurf		!既存の要素の自由表面に重ねて要素を生成とのこと
type,9
cmsel,s,a_cont	!
nsla,s,1	!選択されたエリアに関する節点の選択
esurf
allsel

*DO,kk,6,22,4
CNUM=CNUM+1
allsel
!Create Contact Pair
X5=ABASE+2*PARA*6*10
X5=X5+2*PARA*(20+16)
X5=X5+2*PARA*34
X5=X5+(jj-1)*PARA*27+(ii-1)*27+kk
asel,s,,,X5	!
cm,a_cont,area	!a_contという名をつける
X6=ABASE+2*PARA*6*7
X6=X6+(jj-1)*PARA*6+(ii-1)*6+1
asel,s,,,X6	!Cu表面を選択
cm,a_targ,area	!a_targという名をつける  TARGがくっつける相手の（通常大きいほうの）面
allsel
r,CNUM
rmodif,CNUM,14,1e6		!14は接触コンダクタンスのこと CONTA174の リアルコンスタントのことらしい
real,CNUM
type,3		!要素ナンバー3のこと 3ということはtarge170
cmsel,s,a_targ	!Cuの表面選択
nsla,s,1	!選択されたエリアに関する節点の選択
esurf		!既存の要素の自由表面に重ねて要素を生成とのこと
type,9
cmsel,s,a_cont	!
nsla,s,1	!選択されたエリアに関する節点の選択
esurf
allsel
*ENDDO

CNUM=CNUM+1
allsel
!Create Contact Pair
X5=ABASE+2*PARA*6*10
X5=X5+2*PARA*(20+16)
X5=X5+2*PARA*34
X5=X5+(jj-1)*PARA*27+(ii-1)*27+25
asel,s,,,X5	!
cm,a_cont,area	!a_contという名をつける
X6=ABASE+2*PARA*6*7
X6=X6+(jj-1)*PARA*6+(ii-1)*6+1
asel,s,,,X6	!Cu表面を選択
cm,a_targ,area	!a_targという名をつける  TARGがくっつける相手の（通常大きいほうの）面
allsel
r,CNUM
rmodif,CNUM,14,1e6		!14は接触コンダクタンスのこと CONTA174の リアルコンスタントのことらしい
real,CNUM
type,3		!要素ナンバー3のこと 3ということはtarge170
cmsel,s,a_targ	!Cuの表面選択
nsla,s,1	!選択されたエリアに関する節点の選択
esurf		!既存の要素の自由表面に重ねて要素を生成とのこと
type,9
cmsel,s,a_cont	!
nsla,s,1	!選択されたエリアに関する節点の選択
esurf
allsel

!----------------20240229追加 SPC段差下面への樹脂上面の接合 ここまで------------------------------

CNUM=CNUM+1
allsel
!Create Contact Pair
X5=ABASE+2*PARA*6*10
X5=X5+2*PARA*(20+16)
X5=X5+2*PARA*34
X5=X5+(jj-1)*PARA*27+(ii-1)*27+4
asel,s,,,X5	!
cm,a_cont,area	!a_contという名をつける
X6=ABASE+2*PARA*6*6
X6=X6+(jj-1)*PARA*6+(ii-1)*6+2
asel,s,,,X6	!Cu表面を選択
cm,a_targ,area	!a_targという名をつける  TARGがくっつける相手の（通常大きいほうの）面
allsel
r,CNUM
rmodif,CNUM,14,1e6		!14は接触コンダクタンスのこと CONTA174の リアルコンスタントのことらしい
real,CNUM
type,3		!要素ナンバー3のこと 3ということはtarge170
cmsel,s,a_targ	!Cuの表面選択
nsla,s,1	!選択されたエリアに関する節点の選択
esurf		!既存の要素の自由表面に重ねて要素を生成とのこと
type,9	!銅と樹脂の接触（細目)
cmsel,s,a_cont	!
nsla,s,1	!選択されたエリアに関する節点の選択
esurf
allsel

CNUM=CNUM+1
allsel
!Create Contact Pair
X5=ABASE+2*PARA*6*10
X5=X5+2*PARA*(20+16)
X5=X5+2*PARA*34
X5=X5+(jj-1)*PARA*27+(ii-1)*27+9
asel,s,,,X5	!
cm,a_cont,area	!a_contという名をつける
X6=ABASE+2*PARA*6*6
X6=X6+(jj-1)*PARA*6+(ii-1)*6+3
asel,s,,,X6	!Cu表面を選択
cm,a_targ,area	!a_targという名をつける  TARGがくっつける相手の（通常大きいほうの）面
allsel
r,CNUM
rmodif,CNUM,14,1e6		!14は接触コンダクタンスのこと CONTA174の リアルコンスタントのことらしい
real,CNUM
type,3		!要素ナンバー3のこと 3ということはtarge170
cmsel,s,a_targ	!Cuの表面選択
nsla,s,1	!選択されたエリアに関する節点の選択
esurf		!既存の要素の自由表面に重ねて要素を生成とのこと
type,9	!銅と樹脂の接触（細目)
cmsel,s,a_cont	!
nsla,s,1	!選択されたエリアに関する節点の選択
esurf
allsel

CNUM=CNUM+1
allsel
!Create Contact Pair
X5=ABASE+2*PARA*6*10
X5=X5+2*PARA*(20+16)
X5=X5+2*PARA*34
X5=X5+(jj-1)*PARA*27+(ii-1)*27+13
asel,s,,,X5	!
cm,a_cont,area	!a_contという名をつける
X6=ABASE+2*PARA*6*5
X6=X6+(jj-1)*PARA*6+(ii-1)*6+2
asel,s,,,X6	!Cu表面を選択
cm,a_targ,area	!a_targという名をつける  TARGがくっつける相手の（通常大きいほうの）面
allsel
r,CNUM
rmodif,CNUM,14,1e6		!14は接触コンダクタンスのこと CONTA174の リアルコンスタントのことらしい
real,CNUM
type,3		!要素ナンバー3のこと 3ということはtarge170
cmsel,s,a_targ	!Cuの表面選択
nsla,s,1	!選択されたエリアに関する節点の選択
esurf		!既存の要素の自由表面に重ねて要素を生成とのこと
type,9	!銅と樹脂の接触（細目)
cmsel,s,a_cont	!
nsla,s,1	!選択されたエリアに関する節点の選択
esurf
allsel

CNUM=CNUM+1
allsel
!Create Contact Pair
X5=ABASE+2*PARA*6*10
X5=X5+2*PARA*(20+16)
X5=X5+2*PARA*34
X5=X5+(jj-1)*PARA*27+(ii-1)*27+17
asel,s,,,X5	!
cm,a_cont,area	!a_contという名をつける
X6=ABASE+2*PARA*6*5
X6=X6+(jj-1)*PARA*6+(ii-1)*6+3
asel,s,,,X6	!Cu表面を選択
cm,a_targ,area	!a_targという名をつける  TARGがくっつける相手の（通常大きいほうの）面
allsel
r,CNUM
rmodif,CNUM,14,1e6		!14は接触コンダクタンスのこと CONTA174の リアルコンスタントのことらしい
real,CNUM
type,3		!要素ナンバー3のこと 3ということはtarge170
cmsel,s,a_targ	!Cuの表面選択
nsla,s,1	!選択されたエリアに関する節点の選択
esurf		!既存の要素の自由表面に重ねて要素を生成とのこと
type,9	!銅と樹脂の接触（細目)
cmsel,s,a_cont	!
nsla,s,1	!選択されたエリアに関する節点の選択
esurf
allsel

CNUM=CNUM+1
allsel
!Create Contact Pair
X5=ABASE+2*PARA*6*10
X5=X5+2*PARA*(20+16)
X5=X5+2*PARA*34
X5=X5+(jj-1)*PARA*27+(ii-1)*27+19
asel,s,,,X5	!
cm,a_cont,area	!a_contという名をつける
X6=ABASE+2*PARA*6*5
X6=X6+(jj-1)*PARA*6+(ii-1)*6+4
asel,s,,,X6	!Cu表面を選択
cm,a_targ,area	!a_targという名をつける  TARGがくっつける相手の（通常大きいほうの）面
allsel
r,CNUM
rmodif,CNUM,14,1e6		!14は接触コンダクタンスのこと CONTA174の リアルコンスタントのことらしい
real,CNUM
type,3		!要素ナンバー3のこと 3ということはtarge170
cmsel,s,a_targ	!Cuの表面選択
nsla,s,1	!選択されたエリアに関する節点の選択
esurf		!既存の要素の自由表面に重ねて要素を生成とのこと
type,9	!銅と樹脂の接触（細目)
cmsel,s,a_cont	!
nsla,s,1	!選択されたエリアに関する節点の選択
esurf
allsel

CNUM=CNUM+1
allsel
!Create Contact Pair
X5=ABASE+2*PARA*6*10
X5=X5+2*PARA*(20+16)
X5=X5+2*PARA*34
X5=X5+(jj-1)*PARA*27+(ii-1)*27+23
asel,s,,,X5	!
cm,a_cont,area	!a_contという名をつける
X6=ABASE+2*PARA*6*5
X6=X6+(jj-1)*PARA*6+(ii-1)*6+5
asel,s,,,X6	!Cu表面を選択
cm,a_targ,area	!a_targという名をつける  TARGがくっつける相手の（通常大きいほうの）面
allsel
r,CNUM
rmodif,CNUM,14,1e6		!14は接触コンダクタンスのこと CONTA174の リアルコンスタントのことらしい
real,CNUM
type,3		!要素ナンバー3のこと 3ということはtarge170
cmsel,s,a_targ	!Cuの表面選択
nsla,s,1	!選択されたエリアに関する節点の選択
esurf		!既存の要素の自由表面に重ねて要素を生成とのこと
type,9	!銅と樹脂の接触（細目)
cmsel,s,a_cont	!
nsla,s,1	!選択されたエリアに関する節点の選択
esurf
allsel

CNUM=CNUM+1
allsel
!Create Contact Pair
X5=ABASE+2*PARA*6*10
X5=X5+2*PARA*(20+16)
X5=X5+2*PARA*34
X5=X5+(jj-1)*PARA*27+(ii-1)*27+23
asel,s,,,X5	!
cm,a_cont,area	!a_contという名をつける
X6=ABASE+2*PARA*6*6
X6=X6+(jj-1)*PARA*6+(ii-1)*6+5
asel,s,,,X6	!Cu表面を選択
cm,a_targ,area	!a_targという名をつける  TARGがくっつける相手の（通常大きいほうの）面
allsel
r,CNUM
rmodif,CNUM,14,1e6		!14は接触コンダクタンスのこと CONTA174の リアルコンスタントのことらしい
real,CNUM
type,3		!要素ナンバー3のこと 3ということはtarge170
cmsel,s,a_targ	!Cuの表面選択
nsla,s,1	!選択されたエリアに関する節点の選択
esurf		!既存の要素の自由表面に重ねて要素を生成とのこと
type,9
cmsel,s,a_cont	!
nsla,s,1	!選択されたエリアに関する節点の選択
esurf
allsel

*ENDDO
*ENDDO

!EMISPC横樹脂7個立ち上げで、
!点 13*PARA*2新規発生
!線 33*PARA*2新規発生
!面 27*PARA*2新規発生
!VOL 7*PARA*2新規発生
X1=KBASE+2*PARA*8*10
X1=X1+2*PARA*32+2*PARA*8
X1=X1+2*PARA*26+13*PARA*2
X2=LBASE+2*PARA*12*10
X2=X2+2*PARA*(32+20)
X2=X2+2*PARA*53+33*PARA*2
X3=ABASE+2*PARA*6*10	!樹脂なしの各PARA要素まで
X3=X3+2*PARA*(20+16)	!チップ周りの樹脂
X3=X3+2*PARA*34+2*PARA*27			!EMIはんだまわりの樹脂+SPC周辺
X4=VBASE+2*PARA*10+2*PARA*8
X4=X4+2*PARA*7+2*PARA*7

!SPC面取り部分の側面樹脂------------------------------------------------------
*DO,ii,1,2,1			!OorP
	*DO,jj,1,PARA,1		!PARA
		ll=X1+(ii-1)*PARA*16+(jj-1)*16
		k,ll+1,RESINEMICHAN((ii-1)*PARA+jj,1,1,1,1),RESINEMICHAN((ii-1)*PARA+jj,1,1,1,2),RESINEMICHAN((ii-1)*PARA+jj,1,1,1,3)
		k,ll+2,RESINEMICHAN((ii-1)*PARA+jj,1,1,2,1),RESINEMICHAN((ii-1)*PARA+jj,1,1,2,2),RESINEMICHAN((ii-1)*PARA+jj,1,1,2,3)
		k,ll+3,RESINEMICHAN((ii-1)*PARA+jj,1,1,3,1),RESINEMICHAN((ii-1)*PARA+jj,1,1,3,2),RESINEMICHAN((ii-1)*PARA+jj,1,1,3,3)
		k,ll+4,RESINEMICHAN((ii-1)*PARA+jj,1,1,4,1),RESINEMICHAN((ii-1)*PARA+jj,1,1,4,2),RESINEMICHAN((ii-1)*PARA+jj,1,1,4,3)
		k,ll+5,RESINEMICHAN((ii-1)*PARA+jj,1,2,1,1),RESINEMICHAN((ii-1)*PARA+jj,1,2,1,2),RESINEMICHAN((ii-1)*PARA+jj,1,2,1,3)
		k,ll+6,RESINEMICHAN((ii-1)*PARA+jj,1,2,2,1),RESINEMICHAN((ii-1)*PARA+jj,1,2,2,2),RESINEMICHAN((ii-1)*PARA+jj,1,2,2,3)
		k,ll+7,RESINEMICHAN((ii-1)*PARA+jj,1,2,3,1),RESINEMICHAN((ii-1)*PARA+jj,1,2,3,2),RESINEMICHAN((ii-1)*PARA+jj,1,2,3,3)
		k,ll+8,RESINEMICHAN((ii-1)*PARA+jj,1,2,4,1),RESINEMICHAN((ii-1)*PARA+jj,1,2,4,2),RESINEMICHAN((ii-1)*PARA+jj,1,2,4,3)

		k,ll+9,RESINEMICHAN((ii-1)*PARA+jj,2,1,3,1),RESINEMICHAN((ii-1)*PARA+jj,2,1,3,2),RESINEMICHAN((ii-1)*PARA+jj,2,1,3,3)
		k,ll+10,RESINEMICHAN((ii-1)*PARA+jj,2,1,4,1),RESINEMICHAN((ii-1)*PARA+jj,2,1,4,2),RESINEMICHAN((ii-1)*PARA+jj,2,1,4,3)
		k,ll+11,RESINEMICHAN((ii-1)*PARA+jj,2,2,3,1),RESINEMICHAN((ii-1)*PARA+jj,2,2,3,2),RESINEMICHAN((ii-1)*PARA+jj,2,2,3,3)
		k,ll+12,RESINEMICHAN((ii-1)*PARA+jj,2,2,4,1),RESINEMICHAN((ii-1)*PARA+jj,2,2,4,2),RESINEMICHAN((ii-1)*PARA+jj,2,2,4,3)
		k,ll+13,RESINEMICHAN((ii-1)*PARA+jj,3,1,1,1),RESINEMICHAN((ii-1)*PARA+jj,3,1,1,2),RESINEMICHAN((ii-1)*PARA+jj,3,1,3,3)
		k,ll+14,RESINEMICHAN((ii-1)*PARA+jj,3,1,4,1),RESINEMICHAN((ii-1)*PARA+jj,3,1,4,2),RESINEMICHAN((ii-1)*PARA+jj,3,1,4,3)
		k,ll+15,RESINEMICHAN((ii-1)*PARA+jj,3,2,1,1),RESINEMICHAN((ii-1)*PARA+jj,3,2,1,2),RESINEMICHAN((ii-1)*PARA+jj,3,2,3,3)
		k,ll+16,RESINEMICHAN((ii-1)*PARA+jj,3,2,4,1),RESINEMICHAN((ii-1)*PARA+jj,3,2,4,2),RESINEMICHAN((ii-1)*PARA+jj,3,2,4,3)
!		X5=X4+(ii-1)*PARA*4+(jj-1)*4
		V,ll+1,ll+2,ll+3,ll+4,ll+5,ll+6,ll+7,ll+8
		V,ll+3,ll+2,ll+9,ll+10,ll+7,ll+6,ll+11,ll+12
		V,ll+13,ll+10,ll+9,ll+14,ll+15,ll+12,ll+11,ll+16
		V,ll+1,ll+4,ll+13,ll+14,ll+5,ll+8,ll+15,ll+16
	*ENDDO
*ENDDO
!ここまで
D_PLTX=NINT(UPSPCX/M_RESINX)
D_PLTY=NINT(UPSPCY/M_RESINY)
D_PLTZ=NINT(MDSPCZ/M_RESINZ)
nn=NINT((RESINEMICHAN(1,1,1,3,2)-RESINEMICHAN(1,1,1,2,2))/M_RESINY)
*IF,D_PLTZ,LT,3,THEN
	D_PLTZ=3
*ENDIF

*DO,ii,1,2,1			!OorP
	*DO,jj,1,PARA,1		!PARA
		lsel,s,,,X2+((ii-1)*PARA+(jj-1))*32+1
		lesiz,all,,,D_PLTX		!z分割
		lsel,all			!最後にこのALLがないと、次にLをSELできなくなってしまいエラーが発生します。これはMUST
		lsel,s,,,X2+((ii-1)*PARA+(jj-1))*32+2
		lesiz,all,,,nn		!z分割
		lsel,all			!最後にこのALLがないと、次にLをSELできなくなってしまいエラーが発生します。これはMUST
		lsel,s,,,X2+((ii-1)*PARA+(jj-1))*32+5
		lesiz,all,,,D_PLTZ		!z分割
		lsel,all			!最後にこのALLがないと、次にLをSELできなくなってしまいエラーが発生します。これはMUST

		VMESH,X4+(ii-1)*PARA*4+(jj-1)*4+1
		VMESH,X4+(ii-1)*PARA*4+(jj-1)*4+2
		VMESH,X4+(ii-1)*PARA*4+(jj-1)*4+3
		VMESH,X4+(ii-1)*PARA*4+(jj-1)*4+4
	*ENDDO
*ENDDO

!面取り横樹脂4個作成で、
!点 16*PARA*2新規発生
!線 32*PARA*2新規発生
!面 20*PARA*2新規発生
!VOL 4*PARA*2新規発生
!面取り部樹脂の接触----------------------
*DO,jj,1,2,1
*DO,ii,1,PARA,1
CNUM=CNUM+1
allsel
!Create Contact Pair
X5=ABASE+2*PARA*6*10
X5=X5+2*PARA*(20+16)
X5=X5+2*PARA*34
X5=X5+(jj-1)*PARA*27+(ii-1)*27+1
asel,s,,,X5	!
cm,a_cont,area	!a_contという名をつける
X6=X3+(jj-1)*PARA*20+(ii-1)*20+1
asel,s,,,X6	!Cu表面を選択
cm,a_targ,area	!a_targという名をつける  TARGがくっつける相手の（通常大きいほうの）面
allsel
r,CNUM
rmodif,CNUM,14,1e6		!14は接触コンダクタンスのこと CONTA174の リアルコンスタントのことらしい
real,CNUM
type,3		!要素ナンバー3のこと 3ということはtarge170
cmsel,s,a_targ	!Cuの表面選択
nsla,s,1	!選択されたエリアに関する節点の選択
esurf		!既存の要素の自由表面に重ねて要素を生成とのこと
type,5
cmsel,s,a_cont	!
nsla,s,1	!選択されたエリアに関する節点の選択
esurf
allsel

CNUM=CNUM+1
allsel
!Create Contact Pair
X5=ABASE+2*PARA*6*10
X5=X5+2*PARA*(20+16)
X5=X5+2*PARA*34
X5=X5+(jj-1)*PARA*27+(ii-1)*27+22
asel,s,,,X5	!
cm,a_cont,area	!a_contという名をつける
X6=X3+(jj-1)*PARA*20+(ii-1)*20+1
asel,s,,,X6	!Cu表面を選択
cm,a_targ,area	!a_targという名をつける  TARGがくっつける相手の（通常大きいほうの）面
allsel
r,CNUM
rmodif,CNUM,14,1e6		!14は接触コンダクタンスのこと CONTA174の リアルコンスタントのことらしい
real,CNUM
type,3		!要素ナンバー3のこと 3ということはtarge170
cmsel,s,a_targ	!Cuの表面選択
nsla,s,1	!選択されたエリアに関する節点の選択
esurf		!既存の要素の自由表面に重ねて要素を生成とのこと
type,5
cmsel,s,a_cont	!
nsla,s,1	!選択されたエリアに関する節点の選択
esurf
allsel

CNUM=CNUM+1
allsel
!Create Contact Pair
X5=ABASE+2*PARA*6*10
X5=X5+2*PARA*(20+16)
X5=X5+2*PARA*34
X5=X5+(jj-1)*PARA*27+(ii-1)*27+6
asel,s,,,X5	!
cm,a_cont,area	!a_contという名をつける
X6=X3+(jj-1)*PARA*20+(ii-1)*20+1
asel,s,,,X6	!Cu表面を選択
cm,a_targ,area	!a_targという名をつける  TARGがくっつける相手の（通常大きいほうの）面
allsel
r,CNUM
rmodif,CNUM,14,1e6		!14は接触コンダクタンスのこと CONTA174の リアルコンスタントのことらしい
real,CNUM
type,3		!要素ナンバー3のこと 3ということはtarge170
cmsel,s,a_targ	!Cuの表面選択
nsla,s,1	!選択されたエリアに関する節点の選択
esurf		!既存の要素の自由表面に重ねて要素を生成とのこと
type,5
cmsel,s,a_cont	!
nsla,s,1	!選択されたエリアに関する節点の選択
esurf
allsel

CNUM=CNUM+1
allsel
!Create Contact Pair
X5=ABASE+2*PARA*6*10
X5=X5+2*PARA*(20+16)
X5=X5+2*PARA*34
X5=X5+(jj-1)*PARA*27+(ii-1)*27+10
asel,s,,,X5	!
cm,a_cont,area	!a_contという名をつける
X6=X3+(jj-1)*PARA*20+(ii-1)*20+1
asel,s,,,X6	!Cu表面を選択
cm,a_targ,area	!a_targという名をつける  TARGがくっつける相手の（通常大きいほうの）面
allsel
r,CNUM
rmodif,CNUM,14,1e6		!14は接触コンダクタンスのこと CONTA174の リアルコンスタントのことらしい
real,CNUM
type,3		!要素ナンバー3のこと 3ということはtarge170
cmsel,s,a_targ	!Cuの表面選択
nsla,s,1	!選択されたエリアに関する節点の選択
esurf		!既存の要素の自由表面に重ねて要素を生成とのこと
type,5
cmsel,s,a_cont	!
nsla,s,1	!選択されたエリアに関する節点の選択
esurf
allsel

CNUM=CNUM+1
allsel
!Create Contact Pair
X5=ABASE+2*PARA*6*10
X5=X5+2*PARA*(20+16)
X5=X5+2*PARA*34
X5=X5+(jj-1)*PARA*27+(ii-1)*27+25
asel,s,,,X5	!
cm,a_cont,area	!a_contという名をつける
X6=X3+(jj-1)*PARA*20+(ii-1)*20+1
asel,s,,,X6	!Cu表面を選択
cm,a_targ,area	!a_targという名をつける  TARGがくっつける相手の（通常大きいほうの）面
allsel
r,CNUM
rmodif,CNUM,14,1e6		!14は接触コンダクタンスのこと CONTA174の リアルコンスタントのことらしい
real,CNUM
type,3		!要素ナンバー3のこと 3ということはtarge170
cmsel,s,a_targ	!Cuの表面選択
nsla,s,1	!選択されたエリアに関する節点の選択
esurf		!既存の要素の自由表面に重ねて要素を生成とのこと
type,5
cmsel,s,a_cont	!
nsla,s,1	!選択されたエリアに関する節点の選択
esurf
allsel

CNUM=CNUM+1
allsel
!Create Contact Pair
X5=ABASE+2*PARA*6*10
X5=X5+2*PARA*(20+16)
X5=X5+2*PARA*34
X5=X5+(jj-1)*PARA*27+(ii-1)*27+14
asel,s,,,X5	!
cm,a_cont,area	!a_contという名をつける
X6=X3+(jj-1)*PARA*20+(ii-1)*20+1
asel,s,,,X6	!Cu表面を選択
cm,a_targ,area	!a_targという名をつける  TARGがくっつける相手の（通常大きいほうの）面
allsel
r,CNUM
rmodif,CNUM,14,1e6		!14は接触コンダクタンスのこと CONTA174の リアルコンスタントのことらしい
real,CNUM
type,3		!要素ナンバー3のこと 3ということはtarge170
cmsel,s,a_targ	!Cuの表面選択
nsla,s,1	!選択されたエリアに関する節点の選択
esurf		!既存の要素の自由表面に重ねて要素を生成とのこと
type,5
cmsel,s,a_cont	!
nsla,s,1	!選択されたエリアに関する節点の選択
esurf
allsel

CNUM=CNUM+1
allsel
!Create Contact Pair
X5=ABASE+2*PARA*6*10
X5=X5+2*PARA*(20+16)
X5=X5+2*PARA*34
X5=X5+(jj-1)*PARA*27+(ii-1)*27+1
asel,s,,,X5	!
cm,a_cont,area	!a_contという名をつける
X6=X3+(jj-1)*PARA*20+(ii-1)*20+7
asel,s,,,X6	!Cu表面を選択
cm,a_targ,area	!a_targという名をつける  TARGがくっつける相手の（通常大きいほうの）面
allsel
r,CNUM
rmodif,CNUM,14,1e6		!14は接触コンダクタンスのこと CONTA174の リアルコンスタントのことらしい
real,CNUM
type,3		!要素ナンバー3のこと 3ということはtarge170
cmsel,s,a_targ	!Cuの表面選択
nsla,s,1	!選択されたエリアに関する節点の選択
esurf		!既存の要素の自由表面に重ねて要素を生成とのこと
type,5
cmsel,s,a_cont	!
nsla,s,1	!選択されたエリアに関する節点の選択
esurf
allsel

CNUM=CNUM+1
allsel
!Create Contact Pair
X5=ABASE+2*PARA*6*10
X5=X5+2*PARA*(20+16)
X5=X5+2*PARA*34
X5=X5+(jj-1)*PARA*27+(ii-1)*27+6
asel,s,,,X5	!
cm,a_cont,area	!a_contという名をつける
X6=X3+(jj-1)*PARA*20+(ii-1)*20+7
asel,s,,,X6	!Cu表面を選択
cm,a_targ,area	!a_targという名をつける  TARGがくっつける相手の（通常大きいほうの）面
allsel
r,CNUM
rmodif,CNUM,14,1e6		!14は接触コンダクタンスのこと CONTA174の リアルコンスタントのことらしい
real,CNUM
type,3		!要素ナンバー3のこと 3ということはtarge170
cmsel,s,a_targ	!Cuの表面選択
nsla,s,1	!選択されたエリアに関する節点の選択
esurf		!既存の要素の自由表面に重ねて要素を生成とのこと
type,5
cmsel,s,a_cont	!
nsla,s,1	!選択されたエリアに関する節点の選択
esurf
allsel

CNUM=CNUM+1
allsel
!Create Contact Pair
X5=ABASE+2*PARA*6*10
X5=X5+2*PARA*(20+16)
X5=X5+2*PARA*34
X5=X5+(jj-1)*PARA*27+(ii-1)*27+10
asel,s,,,X5	!
cm,a_cont,area	!a_contという名をつける
X6=X3+(jj-1)*PARA*20+(ii-1)*20+7
asel,s,,,X6	!Cu表面を選択
cm,a_targ,area	!a_targという名をつける  TARGがくっつける相手の（通常大きいほうの）面
allsel
r,CNUM
rmodif,CNUM,14,1e6		!14は接触コンダクタンスのこと CONTA174の リアルコンスタントのことらしい
real,CNUM
type,3		!要素ナンバー3のこと 3ということはtarge170
cmsel,s,a_targ	!Cuの表面選択
nsla,s,1	!選択されたエリアに関する節点の選択
esurf		!既存の要素の自由表面に重ねて要素を生成とのこと
type,5
cmsel,s,a_cont	!
nsla,s,1	!選択されたエリアに関する節点の選択
esurf
allsel

CNUM=CNUM+1
allsel
!Create Contact Pair
X5=ABASE+2*PARA*6*10
X5=X5+2*PARA*(20+16)
X5=X5+2*PARA*34
X5=X5+(jj-1)*PARA*27+(ii-1)*27+25
asel,s,,,X5	!
cm,a_cont,area	!a_contという名をつける
X6=X3+(jj-1)*PARA*20+(ii-1)*20+7
asel,s,,,X6	!Cu表面を選択
cm,a_targ,area	!a_targという名をつける  TARGがくっつける相手の（通常大きいほうの）面
allsel
r,CNUM
rmodif,CNUM,14,1e6		!14は接触コンダクタンスのこと CONTA174の リアルコンスタントのことらしい
real,CNUM
type,3		!要素ナンバー3のこと 3ということはtarge170
cmsel,s,a_targ	!Cuの表面選択
nsla,s,1	!選択されたエリアに関する節点の選択
esurf		!既存の要素の自由表面に重ねて要素を生成とのこと
type,5
cmsel,s,a_cont	!
nsla,s,1	!選択されたエリアに関する節点の選択
esurf
allsel

CNUM=CNUM+1
allsel
!Create Contact Pair
X5=ABASE+2*PARA*6*10
X5=X5+2*PARA*(20+16)
X5=X5+2*PARA*34
X5=X5+(jj-1)*PARA*27+(ii-1)*27+14
asel,s,,,X5	!
cm,a_cont,area	!a_contという名をつける
X6=X3+(jj-1)*PARA*20+(ii-1)*20+7
asel,s,,,X6	!Cu表面を選択
cm,a_targ,area	!a_targという名をつける  TARGがくっつける相手の（通常大きいほうの）面
allsel
r,CNUM
rmodif,CNUM,14,1e6		!14は接触コンダクタンスのこと CONTA174の リアルコンスタントのことらしい
real,CNUM
type,3		!要素ナンバー3のこと 3ということはtarge170
cmsel,s,a_targ	!Cuの表面選択
nsla,s,1	!選択されたエリアに関する節点の選択
esurf		!既存の要素の自由表面に重ねて要素を生成とのこと
type,5
cmsel,s,a_cont	!
nsla,s,1	!選択されたエリアに関する節点の選択
esurf
allsel

CNUM=CNUM+1
allsel
!Create Contact Pair
X5=ABASE+2*PARA*6*10
X5=X5+2*PARA*(20+16)
X5=X5+2*PARA*34
X5=X5+(jj-1)*PARA*27+(ii-1)*27+18
asel,s,,,X5	!
cm,a_cont,area	!a_contという名をつける
X6=X3+(jj-1)*PARA*20+(ii-1)*20+7
asel,s,,,X6	!Cu表面を選択
cm,a_targ,area	!a_targという名をつける  TARGがくっつける相手の（通常大きいほうの）面
allsel
r,CNUM
rmodif,CNUM,14,1e6		!14は接触コンダクタンスのこと CONTA174の リアルコンスタントのことらしい
real,CNUM
type,3		!要素ナンバー3のこと 3ということはtarge170
cmsel,s,a_targ	!Cuの表面選択
nsla,s,1	!選択されたエリアに関する節点の選択
esurf		!既存の要素の自由表面に重ねて要素を生成とのこと
type,5
cmsel,s,a_cont	!
nsla,s,1	!選択されたエリアに関する節点の選択
esurf
allsel

CNUM=CNUM+1
allsel
!Create Contact Pair
X5=ABASE+2*PARA*6*10
X5=X5+2*PARA*(20+16)
X5=X5+2*PARA*34
X5=X5+(jj-1)*PARA*27+(ii-1)*27+18
asel,s,,,X5	!
cm,a_cont,area	!a_contという名をつける
X6=X3+(jj-1)*PARA*20+(ii-1)*20+12
asel,s,,,X6	!Cu表面を選択
cm,a_targ,area	!a_targという名をつける  TARGがくっつける相手の（通常大きいほうの）面
allsel
r,CNUM
rmodif,CNUM,14,1e6		!14は接触コンダクタンスのこと CONTA174の リアルコンスタントのことらしい
real,CNUM
type,3		!要素ナンバー3のこと 3ということはtarge170
cmsel,s,a_targ	!Cuの表面選択
nsla,s,1	!選択されたエリアに関する節点の選択
esurf		!既存の要素の自由表面に重ねて要素を生成とのこと
type,5
cmsel,s,a_cont	!
nsla,s,1	!選択されたエリアに関する節点の選択
esurf
allsel

CNUM=CNUM+1
allsel
!Create Contact Pair
X5=ABASE+2*PARA*6*10
X5=X5+2*PARA*(20+16)
X5=X5+2*PARA*34
X5=X5+(jj-1)*PARA*27+(ii-1)*27+14
asel,s,,,X5	!
cm,a_cont,area	!a_contという名をつける
X6=X3+(jj-1)*PARA*20+(ii-1)*20+12
asel,s,,,X6	!Cu表面を選択
cm,a_targ,area	!a_targという名をつける  TARGがくっつける相手の（通常大きいほうの）面
allsel
r,CNUM
rmodif,CNUM,14,1e6		!14は接触コンダクタンスのこと CONTA174の リアルコンスタントのことらしい
real,CNUM
type,3		!要素ナンバー3のこと 3ということはtarge170
cmsel,s,a_targ	!Cuの表面選択
nsla,s,1	!選択されたエリアに関する節点の選択
esurf		!既存の要素の自由表面に重ねて要素を生成とのこと
type,5
cmsel,s,a_cont	!
nsla,s,1	!選択されたエリアに関する節点の選択
esurf
allsel

CNUM=CNUM+1
allsel
!Create Contact Pair
X5=ABASE+2*PARA*6*10
X5=X5+2*PARA*(20+16)
X5=X5+2*PARA*34
X5=X5+(jj-1)*PARA*27+(ii-1)*27+22
asel,s,,,X5	!
cm,a_cont,area	!a_contという名をつける
X6=X3+(jj-1)*PARA*20+(ii-1)*20+12
asel,s,,,X6	!Cu表面を選択
cm,a_targ,area	!a_targという名をつける  TARGがくっつける相手の（通常大きいほうの）面
allsel
r,CNUM
rmodif,CNUM,14,1e6		!14は接触コンダクタンスのこと CONTA174の リアルコンスタントのことらしい
real,CNUM
type,3		!要素ナンバー3のこと 3ということはtarge170
cmsel,s,a_targ	!Cuの表面選択
nsla,s,1	!選択されたエリアに関する節点の選択
esurf		!既存の要素の自由表面に重ねて要素を生成とのこと
type,5
cmsel,s,a_cont	!
nsla,s,1	!選択されたエリアに関する節点の選択
esurf
allsel

CNUM=CNUM+1
allsel
!Create Contact Pair
X5=ABASE+2*PARA*6*10
X5=X5+2*PARA*(20+16)
X5=X5+2*PARA*34
X5=X5+(jj-1)*PARA*27+(ii-1)*27+22
asel,s,,,X5	!
cm,a_cont,area	!a_contという名をつける
X6=X3+(jj-1)*PARA*20+(ii-1)*20+17
asel,s,,,X6	!Cu表面を選択
cm,a_targ,area	!a_targという名をつける  TARGがくっつける相手の（通常大きいほうの）面
allsel
r,CNUM
rmodif,CNUM,14,1e6		!14は接触コンダクタンスのこと CONTA174の リアルコンスタントのことらしい
real,CNUM
type,3		!要素ナンバー3のこと 3ということはtarge170
cmsel,s,a_targ	!Cuの表面選択
nsla,s,1	!選択されたエリアに関する節点の選択
esurf		!既存の要素の自由表面に重ねて要素を生成とのこと
type,5
cmsel,s,a_cont	!
nsla,s,1	!選択されたエリアに関する節点の選択
esurf
allsel

CNUM=CNUM+1
allsel
!Create Contact Pair
X5=ABASE+2*PARA*6*10
X5=X5+2*PARA*(20+16)
X5=X5+2*PARA*34
X5=X5+(jj-1)*PARA*27+(ii-1)*27+18
asel,s,,,X5	!
cm,a_cont,area	!a_contという名をつける
X6=X3+(jj-1)*PARA*20+(ii-1)*20+17
asel,s,,,X6	!Cu表面を選択
cm,a_targ,area	!a_targという名をつける  TARGがくっつける相手の（通常大きいほうの）面
allsel
r,CNUM
rmodif,CNUM,14,1e6		!14は接触コンダクタンスのこと CONTA174の リアルコンスタントのことらしい
real,CNUM
type,3		!要素ナンバー3のこと 3ということはtarge170
cmsel,s,a_targ	!Cuの表面選択
nsla,s,1	!選択されたエリアに関する節点の選択
esurf		!既存の要素の自由表面に重ねて要素を生成とのこと
type,5
cmsel,s,a_cont	!
nsla,s,1	!選択されたエリアに関する節点の選択
esurf
allsel

CNUM=CNUM+1
allsel
!Create Contact Pair
X5=ABASE+2*PARA*6*10
X5=X5+2*PARA*(20+16)
X5=X5+2*PARA*34
X5=X5+(jj-1)*PARA*27+(ii-1)*27+1
asel,s,,,X5	!
cm,a_cont,area	!a_contという名をつける
X6=X3+(jj-1)*PARA*20+(ii-1)*20+17
asel,s,,,X6	!Cu表面を選択
cm,a_targ,area	!a_targという名をつける  TARGがくっつける相手の（通常大きいほうの）面
allsel
r,CNUM
rmodif,CNUM,14,1e6		!14は接触コンダクタンスのこと CONTA174の リアルコンスタントのことらしい
real,CNUM
type,3		!要素ナンバー3のこと 3ということはtarge170
cmsel,s,a_targ	!Cuの表面選択
nsla,s,1	!選択されたエリアに関する節点の選択
esurf		!既存の要素の自由表面に重ねて要素を生成とのこと
type,5
cmsel,s,a_cont	!
nsla,s,1	!選択されたエリアに関する節点の選択
esurf
allsel

*ENDDO
*ENDDO

!面取りの側面
*DO,jj,1,2,1
*DO,ii,1,PARA,1
CNUM=CNUM+1
allsel
!Create Contact Pair
X5=ABASE+2*PARA*6*7
asel,s,,,X5+(jj-1)*PARA*6+(ii-1)*6+2	!
cm,a_cont,area	!a_contという名をつける
X6=X3+(jj-1)*PARA*20+(ii-1)*20+4
asel,s,,,X6	!Cu表面を選択
cm,a_targ,area	!a_targという名をつける  TARGがくっつける相手の（通常大きいほうの）面
allsel
r,CNUM
rmodif,CNUM,14,1e6		!14は接触コンダクタンスのこと CONTA174の リアルコンスタントのことらしい
real,CNUM
type,3		!要素ナンバー3のこと 3ということはtarge170
cmsel,s,a_targ	!Cuの表面選択
nsla,s,1	!選択されたエリアに関する節点の選択
esurf		!既存の要素の自由表面に重ねて要素を生成とのこと
type,9	!銅と樹脂の接触（細目)
cmsel,s,a_cont	!
nsla,s,1	!選択されたエリアに関する節点の選択
esurf
allsel

CNUM=CNUM+1
allsel
!Create Contact Pair
X5=ABASE+2*PARA*6*7
asel,s,,,X5+(jj-1)*PARA*6+(ii-1)*6+3	!
cm,a_cont,area	!a_contという名をつける
X6=X3+(jj-1)*PARA*20+(ii-1)*20+10
asel,s,,,X6	!Cu表面を選択
cm,a_targ,area	!a_targという名をつける  TARGがくっつける相手の（通常大きいほうの）面
allsel
r,CNUM
rmodif,CNUM,14,1e6		!14は接触コンダクタンスのこと CONTA174の リアルコンスタントのことらしい
real,CNUM
type,3		!要素ナンバー3のこと 3ということはtarge170
cmsel,s,a_targ	!Cuの表面選択
nsla,s,1	!選択されたエリアに関する節点の選択
esurf		!既存の要素の自由表面に重ねて要素を生成とのこと
type,9	!銅と樹脂の接触（細目)
cmsel,s,a_cont	!
nsla,s,1	!選択されたエリアに関する節点の選択
esurf
allsel

CNUM=CNUM+1
allsel
!Create Contact Pair
X5=ABASE+2*PARA*6*7
asel,s,,,X5+(jj-1)*PARA*6+(ii-1)*6+4	!
cm,a_cont,area	!a_contという名をつける
X6=X3+(jj-1)*PARA*20+(ii-1)*20+13
asel,s,,,X6	!Cu表面を選択
cm,a_targ,area	!a_targという名をつける  TARGがくっつける相手の（通常大きいほうの）面
allsel
r,CNUM
rmodif,CNUM,14,1e6		!14は接触コンダクタンスのこと CONTA174の リアルコンスタントのことらしい
real,CNUM
type,3		!要素ナンバー3のこと 3ということはtarge170
cmsel,s,a_targ	!Cuの表面選択
nsla,s,1	!選択されたエリアに関する節点の選択
esurf		!既存の要素の自由表面に重ねて要素を生成とのこと
type,9	!銅と樹脂の接触（細目)
cmsel,s,a_cont	!
nsla,s,1	!選択されたエリアに関する節点の選択
esurf
allsel

CNUM=CNUM+1
allsel
!Create Contact Pair
X5=ABASE+2*PARA*6*7
asel,s,,,X5+(jj-1)*PARA*6+(ii-1)*6+5	!
cm,a_cont,area	!a_contという名をつける
X6=X3+(jj-1)*PARA*20+(ii-1)*20+18
asel,s,,,X6	!Cu表面を選択
cm,a_targ,area	!a_targという名をつける  TARGがくっつける相手の（通常大きいほうの）面
allsel
r,CNUM
rmodif,CNUM,14,1e6		!14は接触コンダクタンスのこと CONTA174の リアルコンスタントのことらしい
real,CNUM
type,3		!要素ナンバー3のこと 3ということはtarge170
cmsel,s,a_targ	!Cuの表面選択
nsla,s,1	!選択されたエリアに関する節点の選択
esurf		!既存の要素の自由表面に重ねて要素を生成とのこと
type,9	!銅と樹脂の接触（細目)
cmsel,s,a_cont	!
nsla,s,1	!選択されたエリアに関する節点の選択
esurf
allsel

*ENDDO
*ENDDO

!面取り横樹脂4個作成で、
!点 16*PARA*2新規発生
!線 32*PARA*2新規発生
!面 20*PARA*2新規発生
!VOL 4*PARA*2新規発生
X1=KBASE+2*PARA*8*10
X1=X1+2*PARA*32+2*PARA*8
X1=X1+2*PARA*26+13*PARA*2
X1=X1+16*PARA*2
X2=LBASE+2*PARA*12*10
X2=X2+2*PARA*(32+20)
X2=X2+2*PARA*53+33*PARA*2
X2=X2+32*PARA*2
X3=ABASE+2*PARA*6*10	!樹脂なしの各PARA要素まで
X3=X3+2*PARA*(20+16)	!チップ周りの樹脂
X3=X3+2*PARA*34+2*PARA*27			!EMIはんだまわりの樹脂+SPC周辺
X3=X3+20*PARA*2		!面取り周りの樹脂
X4=VBASE+2*PARA*10+2*PARA*8
X4=X4+2*PARA*7+2*PARA*7
X4=X4+4*PARA*2
!上側SPCの側面樹脂の立ち上げ
X5=X3-20*PARA*2
D_PLTZ=NINT(UPSPCZ/M_RESINZ)
*DO,ii,1,2,1
*DO,jj,1,PARA,1
		ASEL,S,AREA,,X5+(ii-1)*PARA*20+(jj-1)*20+6
		ASEL,A,AREA,,X5+(ii-1)*PARA*20+(jj-1)*20+11
		ASEL,A,AREA,,X5+(ii-1)*PARA*20+(jj-1)*20+16
		ASEL,A,AREA,,X5+(ii-1)*PARA*20+(jj-1)*20+20
		EXTOPT,ESIZE,D_PLTZ   ,,,,,,!要素分割数
		EXTOPT,ACLEAR,1,,,,,,,,!ボリューム生成後　パタンエリアメッシュをクリアにする
		EXTOPT,ATTR,1,0,0,,,,,,!最初の1:各AREAのMAT踏襲　0:現在のREAL 0:現在の要素座標系踏襲
		vext,all,,,0,0,UPSPCZ	!下電極のスイープﾗｲﾝ　0.05立ち上げ
		aclear,all
		ALLSEL
*ENDDO
*ENDDO
!上SPC横樹脂4個作成で、
!点 8*PARA*2新規発生
!線 20*PARA*2新規発生
!面 16*PARA*2新規発生
!VOL 4*PARA*2新規発生

!上SPCと樹脂の接触
*DO,jj,1,2,1
*DO,ii,1,PARA,1
CNUM=CNUM+1
allsel
!Create Contact Pair
X5=ABASE+2*PARA*6*8
X5=X5+(jj-1)*PARA*6+(ii-1)*6+2
asel,s,,,X5	!
cm,a_cont,area	!a_contという名をつける
X6=X3+(jj-1)*PARA*16+(ii-1)*16+4
asel,s,,,X6	!Cu表面を選択
cm,a_targ,area	!a_targという名をつける  TARGがくっつける相手の（通常大きいほうの）面
allsel
r,CNUM
rmodif,CNUM,14,1e6		!14は接触コンダクタンスのこと CONTA174の リアルコンスタントのことらしい
real,CNUM
type,3		!要素ナンバー3のこと 3ということはtarge170
cmsel,s,a_targ	!Cuの表面選択
nsla,s,1	!選択されたエリアに関する節点の選択
esurf		!既存の要素の自由表面に重ねて要素を生成とのこと
type,9
cmsel,s,a_cont	!
nsla,s,1	!選択されたエリアに関する節点の選択
esurf
allsel

CNUM=CNUM+1
allsel
!Create Contact Pair
X5=ABASE+2*PARA*6*8
X5=X5+(jj-1)*PARA*6+(ii-1)*6+3
asel,s,,,X5	!
cm,a_cont,area	!a_contという名をつける
X6=X3+(jj-1)*PARA*16+(ii-1)*16+9
asel,s,,,X6	!Cu表面を選択
cm,a_targ,area	!a_targという名をつける  TARGがくっつける相手の（通常大きいほうの）面
allsel
r,CNUM
rmodif,CNUM,14,1e6		!14は接触コンダクタンスのこと CONTA174の リアルコンスタントのことらしい
real,CNUM
type,3		!要素ナンバー3のこと 3ということはtarge170
cmsel,s,a_targ	!Cuの表面選択
nsla,s,1	!選択されたエリアに関する節点の選択
esurf		!既存の要素の自由表面に重ねて要素を生成とのこと
type,9
cmsel,s,a_cont	!
nsla,s,1	!選択されたエリアに関する節点の選択
esurf
allsel

CNUM=CNUM+1
allsel
!Create Contact Pair
X5=ABASE+2*PARA*6*8
X5=X5+(jj-1)*PARA*6+(ii-1)*6+4
asel,s,,,X5	!
cm,a_cont,area	!a_contという名をつける
X6=X3+(jj-1)*PARA*16+(ii-1)*16+11
asel,s,,,X6	!Cu表面を選択
cm,a_targ,area	!a_targという名をつける  TARGがくっつける相手の（通常大きいほうの）面
allsel
r,CNUM
rmodif,CNUM,14,1e6		!14は接触コンダクタンスのこと CONTA174の リアルコンスタントのことらしい
real,CNUM
type,3		!要素ナンバー3のこと 3ということはtarge170
cmsel,s,a_targ	!Cuの表面選択
nsla,s,1	!選択されたエリアに関する節点の選択
esurf		!既存の要素の自由表面に重ねて要素を生成とのこと
type,9
cmsel,s,a_cont	!
nsla,s,1	!選択されたエリアに関する節点の選択
esurf
allsel

CNUM=CNUM+1
allsel
!Create Contact Pair
X5=ABASE+2*PARA*6*8
X5=X5+(jj-1)*PARA*6+(ii-1)*6+5
asel,s,,,X5	!
cm,a_cont,area	!a_contという名をつける
X6=X3+(jj-1)*PARA*16+(ii-1)*16+15
asel,s,,,X6	!Cu表面を選択
cm,a_targ,area	!a_targという名をつける  TARGがくっつける相手の（通常大きいほうの）面
allsel
r,CNUM
rmodif,CNUM,14,1e6		!14は接触コンダクタンスのこと CONTA174の リアルコンスタントのことらしい
real,CNUM
type,3		!要素ナンバー3のこと 3ということはtarge170
cmsel,s,a_targ	!Cuの表面選択
nsla,s,1	!選択されたエリアに関する節点の選択
esurf		!既存の要素の自由表面に重ねて要素を生成とのこと
type,9
cmsel,s,a_cont	!
nsla,s,1	!選択されたエリアに関する節点の選択
esurf
allsel

*ENDDO
*ENDDO

!SPC上のはんだ側面樹脂
*DO,ii,1,2,1			!OorP
	*DO,jj,1,PARA,1		!PARA
		mm=X1+(ii-1)*PARA*8+(jj-1)*8
		ll=X1+2*PARA*8+(ii-1)*PARA*8+(jj-1)*8
		k,ll+1,RESINEMICHAN((ii-1)*PARA+jj,1,1,1,1),RESINEMICHAN((ii-1)*PARA+jj,1,1,1,2),SOL3(ii,jj,2,1,3)
		k,ll+2,RESINEMICHAN((ii-1)*PARA+jj,1,1,2,1),RESINEMICHAN((ii-1)*PARA+jj,1,1,2,2),SOL3(ii,jj,2,1,3)
		k,ll+3,SOL3(ii,jj,2,2,1),SOL3(ii,jj,2,2,2),SOL3(ii,jj,2,2,3)
		k,ll+4,SOL3(ii,jj,2,1,1),SOL3(ii,jj,2,1,2),SOL3(ii,jj,2,1,3)
		k,ll+5,RESINEMICHAN((ii-1)*PARA+jj,2,1,3,1),RESINEMICHAN((ii-1)*PARA+jj,2,1,3,2),SOL3(ii,jj,2,1,3)
		k,ll+6,SOL3(ii,jj,2,3,1),SOL3(ii,jj,2,3,2),SOL3(ii,jj,2,3,3)
		k,ll+7,SOL3(ii,jj,2,4,1),SOL3(ii,jj,2,4,2),SOL3(ii,jj,2,4,3)
		k,ll+8,RESINEMICHAN((ii-1)*PARA+jj,3,1,4,1),RESINEMICHAN((ii-1)*PARA+jj,3,1,4,2),SOL3(ii,jj,2,1,3)


		V,mm+2,mm+1,mm+3,mm+4,ll+1,ll+2,ll+3,ll+4
		V,mm+3,mm+1,mm+5,mm+6,ll+3,ll+2,ll+5,ll+6
		V,mm+7,mm+6,mm+5,mm+8,ll+7,ll+6,ll+5,ll+8
		V,mm+2,mm+4,mm+7,mm+8,ll+1,ll+4,ll+7,ll+8
	*ENDDO
*ENDDO
!ここまで
D_PLTX=NINT(UPSPCX/M_RESINX)
D_PLTY=NINT(UPSPCY/M_RESINY)
D_PLTZ=NINT(SPSOLT/M_SOLZ)
*IF,D_PLTZ,LT,3,THEN
	D_PLTZ=3
*ENDIF

*DO,ii,1,2,1			!OorP
	*DO,jj,1,PARA,1		!PARA
		lsel,s,,,X2+((ii-1)*PARA+(jj-1))*20+5
		lesiz,all,,,D_PLTZ		!z分割
		lsel,all			!最後にこのALLがないと、次にLをSELできなくなってしまいエラーが発生します。これはMUST

		VMESH,X4+2*PARA*4+(ii-1)*PARA*4+(jj-1)*4+1
		VMESH,X4+2*PARA*4+(ii-1)*PARA*4+(jj-1)*4+2
		VMESH,X4+2*PARA*4+(ii-1)*PARA*4+(jj-1)*4+3
		VMESH,X4+2*PARA*4+(ii-1)*PARA*4+(jj-1)*4+4
	*ENDDO
*ENDDO

!SPCうえはんだと側面樹脂の接合
*DO,jj,1,2,1
*DO,ii,1,PARA,1
CNUM=CNUM+1
allsel
!Create Contact Pair
X5=ABASE+2*PARA*6*9
X5=X5+(jj-1)*PARA*6+(ii-1)*6+2
asel,s,,,X5	!
cm,a_cont,area	!a_contという名をつける
X6=X3+2*PARA*16
X6=X6+(jj-1)*PARA*16+(ii-1)*16+3
asel,s,,,X6	!Cu表面を選択
cm,a_targ,area	!a_targという名をつける  TARGがくっつける相手の（通常大きいほうの）面
allsel
r,CNUM
rmodif,CNUM,14,1e6		!14は接触コンダクタンスのこと CONTA174の リアルコンスタントのことらしい
real,CNUM
type,3		!要素ナンバー3のこと 3ということはtarge170
cmsel,s,a_targ	!Cuの表面選択
nsla,s,1	!選択されたエリアに関する節点の選択
esurf		!既存の要素の自由表面に重ねて要素を生成とのこと
type,6
cmsel,s,a_cont	!
nsla,s,1	!選択されたエリアに関する節点の選択
esurf
allsel

CNUM=CNUM+1
allsel
!Create Contact Pair
X5=ABASE+2*PARA*6*9
X5=X5+(jj-1)*PARA*6+(ii-1)*6+3
asel,s,,,X5	!
cm,a_cont,area	!a_contという名をつける
X6=X3+2*PARA*16
X6=X6+(jj-1)*PARA*16+(ii-1)*16+8
asel,s,,,X6	!Cu表面を選択
cm,a_targ,area	!a_targという名をつける  TARGがくっつける相手の（通常大きいほうの）面
allsel
r,CNUM
rmodif,CNUM,14,1e6		!14は接触コンダクタンスのこと CONTA174の リアルコンスタントのことらしい
real,CNUM
type,3		!要素ナンバー3のこと 3ということはtarge170
cmsel,s,a_targ	!Cuの表面選択
nsla,s,1	!選択されたエリアに関する節点の選択
esurf		!既存の要素の自由表面に重ねて要素を生成とのこと
type,6
cmsel,s,a_cont	!
nsla,s,1	!選択されたエリアに関する節点の選択
esurf
allsel

CNUM=CNUM+1
allsel
!Create Contact Pair
X5=ABASE+2*PARA*6*9
X5=X5+(jj-1)*PARA*6+(ii-1)*6+4
asel,s,,,X5	!
cm,a_cont,area	!a_contという名をつける
X6=X3+2*PARA*16
X6=X6+(jj-1)*PARA*16+(ii-1)*16+10
asel,s,,,X6	!Cu表面を選択
cm,a_targ,area	!a_targという名をつける  TARGがくっつける相手の（通常大きいほうの）面
allsel
r,CNUM
rmodif,CNUM,14,1e6		!14は接触コンダクタンスのこと CONTA174の リアルコンスタントのことらしい
real,CNUM
type,3		!要素ナンバー3のこと 3ということはtarge170
cmsel,s,a_targ	!Cuの表面選択
nsla,s,1	!選択されたエリアに関する節点の選択
esurf		!既存の要素の自由表面に重ねて要素を生成とのこと
type,6
cmsel,s,a_cont	!
nsla,s,1	!選択されたエリアに関する節点の選択
esurf
allsel

CNUM=CNUM+1
allsel
!Create Contact Pair
X5=ABASE+2*PARA*6*9
X5=X5+(jj-1)*PARA*6+(ii-1)*6+5
asel,s,,,X5	!
cm,a_cont,area	!a_contという名をつける
X6=X3+2*PARA*16
X6=X6+(jj-1)*PARA*16+(ii-1)*16+14
asel,s,,,X6	!Cu表面を選択
cm,a_targ,area	!a_targという名をつける  TARGがくっつける相手の（通常大きいほうの）面
allsel
r,CNUM
rmodif,CNUM,14,1e6		!14は接触コンダクタンスのこと CONTA174の リアルコンスタントのことらしい
real,CNUM
type,3		!要素ナンバー3のこと 3ということはtarge170
cmsel,s,a_targ	!Cuの表面選択
nsla,s,1	!選択されたエリアに関する節点の選択
esurf		!既存の要素の自由表面に重ねて要素を生成とのこと
type,6
cmsel,s,a_cont	!
nsla,s,1	!選択されたエリアに関する節点の選択
esurf
allsel

*ENDDO
*ENDDO

!上側DBCとはんだまわり樹脂の接合
*DO,jj,1,2,1
*DO,ii,1,PARA,1
CNUM=CNUM+1
allsel
!Create Contact Pair
asel,s,,,195+18*(jj-1)	!
cm,a_cont,area	!a_contという名をつける
X6=X3+2*PARA*16
X6=X6+(jj-1)*PARA*16+(ii-1)*16+5
asel,s,,,X6	!Cu表面を選択
cm,a_targ,area	!a_targという名をつける  TARGがくっつける相手の（通常大きいほうの）面
allsel
r,CNUM
rmodif,CNUM,14,1e6		!14は接触コンダクタンスのこと CONTA174の リアルコンスタントのことらしい
real,CNUM
type,3		!要素ナンバー3のこと 3ということはtarge170
cmsel,s,a_targ	!Cuの表面選択
nsla,s,1	!選択されたエリアに関する節点の選択
esurf		!既存の要素の自由表面に重ねて要素を生成とのこと
type,8
cmsel,s,a_cont	!
nsla,s,1	!選択されたエリアに関する節点の選択
esurf
allsel

CNUM=CNUM+1
allsel
!Create Contact Pair
asel,s,,,195+18*(jj-1)	!
cm,a_cont,area	!a_contという名をつける
X6=X3+2*PARA*16
X6=X6+(jj-1)*PARA*16+(ii-1)*16+9
asel,s,,,X6	!Cu表面を選択
cm,a_targ,area	!a_targという名をつける  TARGがくっつける相手の（通常大きいほうの）面
allsel
r,CNUM
rmodif,CNUM,14,1e6		!14は接触コンダクタンスのこと CONTA174の リアルコンスタントのことらしい
real,CNUM
type,3		!要素ナンバー3のこと 3ということはtarge170
cmsel,s,a_targ	!Cuの表面選択
nsla,s,1	!選択されたエリアに関する節点の選択
esurf		!既存の要素の自由表面に重ねて要素を生成とのこと
type,8
cmsel,s,a_cont	!
nsla,s,1	!選択されたエリアに関する節点の選択
esurf
allsel

CNUM=CNUM+1
allsel
!Create Contact Pair
asel,s,,,195+18*(jj-1)	!
cm,a_cont,area	!a_contという名をつける
X6=X3+2*PARA*16
X6=X6+(jj-1)*PARA*16+(ii-1)*16+13
asel,s,,,X6	!Cu表面を選択
cm,a_targ,area	!a_targという名をつける  TARGがくっつける相手の（通常大きいほうの）面
allsel
r,CNUM
rmodif,CNUM,14,1e6		!14は接触コンダクタンスのこと CONTA174の リアルコンスタントのことらしい
real,CNUM
type,3		!要素ナンバー3のこと 3ということはtarge170
cmsel,s,a_targ	!Cuの表面選択
nsla,s,1	!選択されたエリアに関する節点の選択
esurf		!既存の要素の自由表面に重ねて要素を生成とのこと
type,8
cmsel,s,a_cont	!
nsla,s,1	!選択されたエリアに関する節点の選択
esurf
allsel

CNUM=CNUM+1
allsel
!Create Contact Pair
asel,s,,,195+18*(jj-1)	!
cm,a_cont,area	!a_contという名をつける
X6=X3+2*PARA*16
X6=X6+(jj-1)*PARA*16+(ii-1)*16+16
asel,s,,,X6	!Cu表面を選択
cm,a_targ,area	!a_targという名をつける  TARGがくっつける相手の（通常大きいほうの）面
allsel
r,CNUM
rmodif,CNUM,14,1e6		!14は接触コンダクタンスのこと CONTA174の リアルコンスタントのことらしい
real,CNUM
type,3		!要素ナンバー3のこと 3ということはtarge170
cmsel,s,a_targ	!Cuの表面選択
nsla,s,1	!選択されたエリアに関する節点の選択
esurf		!既存の要素の自由表面に重ねて要素を生成とのこと
type,8
cmsel,s,a_cont	!
nsla,s,1	!選択されたエリアに関する節点の選択
esurf
allsel

*ENDDO
*ENDDO

!SPC上はんだ横樹脂4個作成で、
!点 8*PARA*2新規発生
!線 20*PARA*2新規発生
!面 16*PARA*2新規発生
!VOL 4*PARA*2新規発生
X1=KBASE+2*PARA*8*10
X1=X1+2*PARA*32+2*PARA*8
X1=X1+2*PARA*26+13*PARA*2
X1=X1+16*PARA*2+8*PARA*2
X1=X1+8*PARA*2
X2=LBASE+2*PARA*12*10
X2=X2+2*PARA*(32+20)		!チップ側面樹脂まで
X2=X2+2*PARA*53+33*PARA*2	!53EMIはんだ側面樹脂
X2=X2+32*PARA*2+20*PARA*2	!
X2=X2+20*PARA*2
X3=ABASE+2*PARA*6*10	!樹脂なしの各PARA要素まで
X3=X3+2*PARA*(20+16)	!チップ周りの樹脂
X3=X3+2*PARA*(30+4)+2*PARA*27			!EMIはんだまわりの樹脂+SPC周辺
X3=X3+20*PARA*2+16*PARA*2
X3=X3+16*PARA*2
X4=VBASE+2*PARA*10+2*PARA*8
X4=X4+2*PARA*7+2*PARA*7
X4=X4+4*PARA*2+4*PARA*2
X4=X4+4*PARA*2


!チップ上の最後の樹脂
*DO,ii,1,2,1			!OorP
	*DO,jj,1,PARA,1		!PARA
		ll=X1+(ii-1)*PARA*8+(jj-1)*8
		k,ll+1,RESINEMILAST((ii-1)*PARA+jj,1,1,1),RESINEMILAST((ii-1)*PARA+jj,1,1,2),RESINEMILAST((ii-1)*PARA+jj,1,1,3)
		k,ll+2,RESINEMILAST((ii-1)*PARA+jj,1,2,1),RESINEMILAST((ii-1)*PARA+jj,1,2,2),RESINEMILAST((ii-1)*PARA+jj,1,2,3)
		k,ll+3,RESINEMILAST((ii-1)*PARA+jj,1,3,1),RESINEMILAST((ii-1)*PARA+jj,1,3,2),RESINEMILAST((ii-1)*PARA+jj,1,3,3)
		k,ll+4,RESINEMILAST((ii-1)*PARA+jj,1,4,1),RESINEMILAST((ii-1)*PARA+jj,1,4,2),RESINEMILAST((ii-1)*PARA+jj,1,4,3)
		k,ll+5,RESINEMILAST((ii-1)*PARA+jj,2,1,1),RESINEMILAST((ii-1)*PARA+jj,2,1,2),RESINEMILAST((ii-1)*PARA+jj,2,1,3)
		k,ll+6,RESINEMILAST((ii-1)*PARA+jj,2,2,1),RESINEMILAST((ii-1)*PARA+jj,2,2,2),RESINEMILAST((ii-1)*PARA+jj,2,2,3)
		k,ll+7,RESINEMILAST((ii-1)*PARA+jj,2,3,1),RESINEMILAST((ii-1)*PARA+jj,2,3,2),RESINEMILAST((ii-1)*PARA+jj,2,3,3)
		k,ll+8,RESINEMILAST((ii-1)*PARA+jj,2,4,1),RESINEMILAST((ii-1)*PARA+jj,2,4,2),RESINEMILAST((ii-1)*PARA+jj,2,4,3)
		V,ll+1,ll+2,ll+3,ll+4,ll+5,ll+6,ll+7,ll+8
	*ENDDO
*ENDDO
!ここまで
D_PLTX=NINT((RESINEMILAST(1,1,2,1)-RESINEMILAST(1,1,1,1))/M_RESINX)
D_PLTY=NINT((RESINEMILAST(1,1,3,2)-RESINEMILAST(1,1,2,2))/M_RESINY)
D_PLTZ=NINT((RESINEMILAST(1,2,1,3)-RESINEMILAST(1,1,1,3))/M_RESINZ)
*IF,D_PLTZ,LT,3,THEN
	D_PLTZ=3
*ENDIF

*DO,ii,1,2,1			!OorP
	*DO,jj,1,PARA,1		!PARA
		lsel,s,,,X2+((ii-1)*PARA+(jj-1))*12+5
		lesiz,all,,,D_PLTZ		!z分割
		lsel,all			!最後にこのALLがないと、次にLをSELできなくなってしまいエラーが発生します。これはMUST
		lsel,s,,,X2+((ii-1)*PARA+(jj-1))*12+1
		lesiz,all,,,D_PLTX		!z分割
		lsel,all			!最後にこのALLがないと、次にLをSELできなくなってしまいエラーが発生します。これはMUST
		lsel,s,,,X2+((ii-1)*PARA+(jj-1))*12+2
		lesiz,all,,,D_PLTY		!z分割
		lsel,all			!最後にこのALLがないと、次にLをSELできなくなってしまいエラーが発生します。これはMUST

		VMESH,X4+(ii-1)*PARA+(jj-1)+1
	*ENDDO
*ENDDO

!EMI上最後の樹脂の接触
!まずは下面
*DO,jj,1,2,1
*DO,ii,1,PARA,1
CNUM=CNUM+1
allsel
!Create Contact Pair
X5=ABASE+2*PARA*6+(jj-1)*PARA*6+(ii-1)*6+6
asel,s,,,X5	!
cm,a_cont,area	!a_contという名をつける
X6=X3+(jj-1)*PARA*6+(ii-1)*6+1
asel,s,,,X6	!Cu表面を選択
cm,a_targ,area	!a_targという名をつける  TARGがくっつける相手の（通常大きいほうの）面
allsel
r,CNUM
rmodif,CNUM,14,1e6		!14は接触コンダクタンスのこと CONTA174の リアルコンスタントのことらしい
real,CNUM
type,3		!要素ナンバー3のこと 3ということはtarge170
cmsel,s,a_targ	!Cuの表面選択
nsla,s,1	!選択されたエリアに関する節点の選択
esurf		!既存の要素の自由表面に重ねて要素を生成とのこと
type,7
cmsel,s,a_cont	!
nsla,s,1	!選択されたエリアに関する節点の選択
esurf
allsel

CNUM=CNUM+1
allsel
!Create Contact Pair
X5=ABASE+2*PARA*6*10
X5=X5+2*PARA*20
X5=X5+(jj-1)*PARA*16+(ii-1)*16+1
asel,s,,,X5	!
cm,a_cont,area	!a_contという名をつける
X6=X3+(jj-1)*PARA*6+(ii-1)*6+1
asel,s,,,X6	!Cu表面を選択
cm,a_targ,area	!a_targという名をつける  TARGがくっつける相手の（通常大きいほうの）面
allsel
r,CNUM
rmodif,CNUM,14,1e6		!14は接触コンダクタンスのこと CONTA174の リアルコンスタントのことらしい
real,CNUM
type,3		!要素ナンバー3のこと 3ということはtarge170
cmsel,s,a_targ	!Cuの表面選択
nsla,s,1	!選択されたエリアに関する節点の選択
esurf		!既存の要素の自由表面に重ねて要素を生成とのこと
type,5
cmsel,s,a_cont	!
nsla,s,1	!選択されたエリアに関する節点の選択
esurf
allsel

CNUM=CNUM+1
allsel
!Create Contact Pair
X5=ABASE+2*PARA*6*10
X5=X5+2*PARA*20
X5=X5+(jj-1)*PARA*16+(ii-1)*16+6
asel,s,,,X5	!
cm,a_cont,area	!a_contという名をつける
X6=X3+(jj-1)*PARA*6+(ii-1)*6+1
asel,s,,,X6	!Cu表面を選択
cm,a_targ,area	!a_targという名をつける  TARGがくっつける相手の（通常大きいほうの）面
allsel
r,CNUM
rmodif,CNUM,14,1e6		!14は接触コンダクタンスのこと CONTA174の リアルコンスタントのことらしい
real,CNUM
type,3		!要素ナンバー3のこと 3ということはtarge170
cmsel,s,a_targ	!Cuの表面選択
nsla,s,1	!選択されたエリアに関する節点の選択
esurf		!既存の要素の自由表面に重ねて要素を生成とのこと
type,5
cmsel,s,a_cont	!
nsla,s,1	!選択されたエリアに関する節点の選択
esurf
allsel

CNUM=CNUM+1
allsel
!Create Contact Pair
X5=ABASE+2*PARA*6*10
X5=X5+2*PARA*20
X5=X5+(jj-1)*PARA*16+(ii-1)*16+14
asel,s,,,X5	!
cm,a_cont,area	!a_contという名をつける
X6=X3+(jj-1)*PARA*6+(ii-1)*6+1
asel,s,,,X6	!Cu表面を選択
cm,a_targ,area	!a_targという名をつける  TARGがくっつける相手の（通常大きいほうの）面
allsel
r,CNUM
rmodif,CNUM,14,1e6		!14は接触コンダクタンスのこと CONTA174の リアルコンスタントのことらしい
real,CNUM
type,3		!要素ナンバー3のこと 3ということはtarge170
cmsel,s,a_targ	!Cuの表面選択
nsla,s,1	!選択されたエリアに関する節点の選択
esurf		!既存の要素の自由表面に重ねて要素を生成とのこと
type,5
cmsel,s,a_cont	!
nsla,s,1	!選択されたエリアに関する節点の選択
esurf
allsel

!後ろ面
CNUM=CNUM+1
allsel
!Create Contact Pair
X5=ABASE+2*PARA*6*10
X5=X5+2*PARA*(20+16)
X5=X5+(jj-1)*PARA*30+(ii-1)*30+2
asel,s,,,X5	!
cm,a_cont,area	!a_contという名をつける
X6=X3+(jj-1)*PARA*6+(ii-1)*6+4
asel,s,,,X6	!Cu表面を選択
cm,a_targ,area	!a_targという名をつける  TARGがくっつける相手の（通常大きいほうの）面
allsel
r,CNUM
rmodif,CNUM,14,1e6		!14は接触コンダクタンスのこと CONTA174の リアルコンスタントのことらしい
real,CNUM
type,3		!要素ナンバー3のこと 3ということはtarge170
cmsel,s,a_targ	!Cuの表面選択
nsla,s,1	!選択されたエリアに関する節点の選択
esurf		!既存の要素の自由表面に重ねて要素を生成とのこと
type,5
cmsel,s,a_cont	!
nsla,s,1	!選択されたエリアに関する節点の選択
esurf
allsel

CNUM=CNUM+1
allsel
!Create Contact Pair
X5=ABASE+2*PARA*6*10
X5=X5+2*PARA*(20+16+30)
X5=X5+(jj-1)*PARA*4+(ii-1)*4+2
asel,s,,,X5	!
cm,a_cont,area	!a_contという名をつける
X6=X3+(jj-1)*PARA*6+(ii-1)*6+4
asel,s,,,X6	!Cu表面を選択
cm,a_targ,area	!a_targという名をつける  TARGがくっつける相手の（通常大きいほうの）面
allsel
r,CNUM
rmodif,CNUM,14,1e6		!14は接触コンダクタンスのこと CONTA174の リアルコンスタントのことらしい
real,CNUM
type,3		!要素ナンバー3のこと 3ということはtarge170
cmsel,s,a_targ	!Cuの表面選択
nsla,s,1	!選択されたエリアに関する節点の選択
esurf		!既存の要素の自由表面に重ねて要素を生成とのこと
type,5
cmsel,s,a_cont	!
nsla,s,1	!選択されたエリアに関する節点の選択
esurf
allsel

CNUM=CNUM+1
allsel
!Create Contact Pair
X5=ABASE+2*PARA*6*10
X5=X5+2*PARA*(20+16+30+4)
X5=X5+(jj-1)*PARA*27+(ii-1)*27+2
asel,s,,,X5	!
cm,a_cont,area	!a_contという名をつける
X6=X3+(jj-1)*PARA*6+(ii-1)*6+4
asel,s,,,X6	!Cu表面を選択
cm,a_targ,area	!a_targという名をつける  TARGがくっつける相手の（通常大きいほうの）面
allsel
r,CNUM
rmodif,CNUM,14,1e6		!14は接触コンダクタンスのこと CONTA174の リアルコンスタントのことらしい
real,CNUM
type,3		!要素ナンバー3のこと 3ということはtarge170
cmsel,s,a_targ	!Cuの表面選択
nsla,s,1	!選択されたエリアに関する節点の選択
esurf		!既存の要素の自由表面に重ねて要素を生成とのこと
type,5
cmsel,s,a_cont	!
nsla,s,1	!選択されたエリアに関する節点の選択
esurf
allsel

CNUM=CNUM+1
allsel
!Create Contact Pair
X5=ABASE+2*PARA*6*10
X5=X5+2*PARA*(20+16+30+4)
X5=X5+(jj-1)*PARA*27+(ii-1)*27+26
asel,s,,,X5	!
cm,a_cont,area	!a_contという名をつける
X6=X3+(jj-1)*PARA*6+(ii-1)*6+4
asel,s,,,X6	!Cu表面を選択
cm,a_targ,area	!a_targという名をつける  TARGがくっつける相手の（通常大きいほうの）面
allsel
r,CNUM
rmodif,CNUM,14,1e6		!14は接触コンダクタンスのこと CONTA174の リアルコンスタントのことらしい
real,CNUM
type,3		!要素ナンバー3のこと 3ということはtarge170
cmsel,s,a_targ	!Cuの表面選択
nsla,s,1	!選択されたエリアに関する節点の選択
esurf		!既存の要素の自由表面に重ねて要素を生成とのこと
type,5
cmsel,s,a_cont	!
nsla,s,1	!選択されたエリアに関する節点の選択
esurf
allsel

CNUM=CNUM+1
allsel
!Create Contact Pair
X5=ABASE+2*PARA*6*10
X5=X5+2*PARA*(20+16+30+4)
X5=X5+2*PARA*27
X5=X5+(jj-1)*PARA*20+(ii-1)*20+2
asel,s,,,X5	!
cm,a_cont,area	!a_contという名をつける
X6=X3+(jj-1)*PARA*6+(ii-1)*6+4
asel,s,,,X6	!Cu表面を選択
cm,a_targ,area	!a_targという名をつける  TARGがくっつける相手の（通常大きいほうの）面
allsel
r,CNUM
rmodif,CNUM,14,1e6		!14は接触コンダクタンスのこと CONTA174の リアルコンスタントのことらしい
real,CNUM
type,3		!要素ナンバー3のこと 3ということはtarge170
cmsel,s,a_targ	!Cuの表面選択
nsla,s,1	!選択されたエリアに関する節点の選択
esurf		!既存の要素の自由表面に重ねて要素を生成とのこと
type,5
cmsel,s,a_cont	!
nsla,s,1	!選択されたエリアに関する節点の選択
esurf
allsel

CNUM=CNUM+1
allsel
!Create Contact Pair
X5=ABASE+2*PARA*6*10
X5=X5+2*PARA*(20+16+30+4)
X5=X5+2*PARA*(27+20)
X5=X5+(jj-1)*PARA*16+(ii-1)*16+2
asel,s,,,X5	!
cm,a_cont,area	!a_contという名をつける
X6=X3+(jj-1)*PARA*6+(ii-1)*6+4
asel,s,,,X6	!Cu表面を選択
cm,a_targ,area	!a_targという名をつける  TARGがくっつける相手の（通常大きいほうの）面
allsel
r,CNUM
rmodif,CNUM,14,1e6		!14は接触コンダクタンスのこと CONTA174の リアルコンスタントのことらしい
real,CNUM
type,3		!要素ナンバー3のこと 3ということはtarge170
cmsel,s,a_targ	!Cuの表面選択
nsla,s,1	!選択されたエリアに関する節点の選択
esurf		!既存の要素の自由表面に重ねて要素を生成とのこと
type,5
cmsel,s,a_cont	!
nsla,s,1	!選択されたエリアに関する節点の選択
esurf
allsel

CNUM=CNUM+1
allsel
!Create Contact Pair
X5=ABASE+2*PARA*6*10
X5=X5+2*PARA*(20+16+30+4)
X5=X5+2*PARA*(27+20+16)
X5=X5+(jj-1)*PARA*16+(ii-1)*16+1
asel,s,,,X5	!
cm,a_cont,area	!a_contという名をつける
X6=X3+(jj-1)*PARA*6+(ii-1)*6+4
asel,s,,,X6	!Cu表面を選択
cm,a_targ,area	!a_targという名をつける  TARGがくっつける相手の（通常大きいほうの）面
allsel
r,CNUM
rmodif,CNUM,14,1e6		!14は接触コンダクタンスのこと CONTA174の リアルコンスタントのことらしい
real,CNUM
type,3		!要素ナンバー3のこと 3ということはtarge170
cmsel,s,a_targ	!Cuの表面選択
nsla,s,1	!選択されたエリアに関する節点の選択
esurf		!既存の要素の自由表面に重ねて要素を生成とのこと
type,5
cmsel,s,a_cont	!
nsla,s,1	!選択されたエリアに関する節点の選択
esurf
allsel

!上面と上DBCの接合
CNUM=CNUM+1
allsel
!Create Contact Pair
asel,s,,,195+18*(jj-1)	!
cm,a_cont,area	!a_contという名をつける
X6=X3+(jj-1)*PARA*6+(ii-1)*6+6
asel,s,,,X6	!Cu表面を選択
cm,a_targ,area	!a_targという名をつける  TARGがくっつける相手の（通常大きいほうの）面
allsel
r,CNUM
rmodif,CNUM,14,1e6		!14は接触コンダクタンスのこと CONTA174の リアルコンスタントのことらしい
real,CNUM
type,3		!要素ナンバー3のこと 3ということはtarge170
cmsel,s,a_targ	!Cuの表面選択
nsla,s,1	!選択されたエリアに関する節点の選択
esurf		!既存の要素の自由表面に重ねて要素を生成とのこと
type,8
cmsel,s,a_cont	!
nsla,s,1	!選択されたエリアに関する節点の選択
esurf
allsel
*ENDDO
*ENDDO

!EMI上の最後の樹脂1個作成で、
!点 8*PARA*2新規発生
!線 12*PARA*2新規発生
!面 6*PARA*2新規発生
!VOL 1*PARA*2新規発生
X1=KBASE+2*PARA*8*10
X1=X1+2*PARA*32+2*PARA*8
X1=X1+2*PARA*26+13*PARA*2
X1=X1+16*PARA*2+8*PARA*2
X1=X1+8*PARA*2+8*PARA*2		!チップ周辺最後の樹脂
X2=LBASE+2*PARA*12*10
X2=X2+2*PARA*(32+20)		!チップ側面樹脂まで
X2=X2+2*PARA*53+33*PARA*2	!53EMIはんだ側面樹脂
X2=X2+32*PARA*2+20*PARA*2	!
X2=X2+20*PARA*2+12*PARA*2
X3=ABASE+2*PARA*6*10	!樹脂なしの各PARA要素まで
X3=X3+2*PARA*(20+16)	!チップ周りの樹脂
X3=X3+2*PARA*(30+4)+2*PARA*27			!EMIはんだまわりの樹脂+SPC周辺
X3=X3+20*PARA*2+16*PARA*2
X3=X3+16*PARA*2+6*PARA*2
X4=VBASE+2*PARA*10+2*PARA*8
X4=X4+2*PARA*7+2*PARA*7
X4=X4+4*PARA*2+4*PARA*2
X4=X4+4*PARA*2+PARA*2
!-----------パラ間の樹脂---------------------------------------------------------------------------------------
*DO,ii,1,2,1			!OorP
	*DO,jj,1,PARA-2,1		!PARA
		*DO,kk,1,2,1	!上or下
			*DO,mm,1,4,1
				X5=X1+((ii-1)*(PARA-2)+(jj-1))*8
				X5=X5+(kk-1)*4+mm
				k,X5,RESINPARA(ii,jj,kk,mm,1),RESINPARA(ii,jj,kk,mm,2),RESINPARA(ii,jj,kk,mm,3)
			*ENDDO
		*ENDDO
	*ENDDO
*ENDDO
*DO,ii,1,2,1			!OorP
	*DO,jj,1,PARA-2,1		!PARA
			kk=X1+(ii-1)*(PARA-2)*8
			kk=kk+(jj-1)*8
			V,kk+1,kk+2,kk+3,kk+4,kk+5,kk+6,kk+7,kk+8
	*ENDDO
*ENDDO
nn=VBASE+2*PARA*25+2*PARA*4
D_PLTX=NINT((PARACL-FINERESINCOR*2)/M_RESINX)
D_PLTY=NINT((IGBTY+FINERESINCOR*2)/M_RESINY)
D_PLTZ=NINT((BSOLT*2+OPOLEZ)/M_RESINZ)
*IF,D_PLTZ,LT,3,THEN
	D_PLTZ=3
*ENDIF
*DO,ii,1,2,1			!OorP
	*DO,jj,1,PARA-2,1		!PARA
		lsel,s,,,X2+((ii-1)*(PARA-2)+(jj-1))*12+1
		lesiz,all,,,D_PLTX		!z分割
		lsel,all			!最後にこのALLがないと、次にLをSELできなくなってしまいエラーが発生します。これはMUST
		lsel,s,,,X2+((ii-1)*(PARA-2)+(jj-1))*12+2
		lesiz,all,,,D_PLTY		!z分割
		lsel,all			!最後にこのALLがないと、次にLをSELできなくなってしまいエラーが発生します。これはMUST
		lsel,s,,,X2+((ii-1)*(PARA-2)+(jj-1))*12+5
		lesiz,all,,,D_PLTZ		!z分割
		lsel,all			!最後にこのALLがないと、次にLをSELできなくなってしまいエラーが発生します。これはMUST
		VMESH,X4+((ii-1)*(PARA-2)+(jj-1))+1
	*ENDDO
*ENDDO

!------------パラ間樹脂の接合----------------------
!改めて面の基準どり
X1=ABASE+PARA*2*6*10	! ←樹脂の手前まで 上のDBC下はんだまで
X2=ABASE+PARA*2*6*10+20*PARA*2	! ダイ半田横の樹脂まで
X3=X2+16*PARA*2					! チップ横の樹脂まで
X4=X3+30*PARA*2					!EMIはんだ周辺樹脂まで
X5=X4+4*PARA*2					!EMIはんだまわり全部
X6=X5+27*PARA*2			!SPC下部分周辺樹脂まで
X7=X6+20*PARA*2			!面取り周辺樹脂まで
X8=X7+16*PARA*2			!上SPC周辺樹脂まで
X9=X8+16*PARA*2			!SPC上はんだ周辺樹脂まで
mm=X9+6*PARA*2			!EMI上の最後の樹脂まで

*DO,ii,1,2,1
	*DO,jj,1,PARA-2,1
		nn=mm+(ii-1)*(PARA-2)*6+(jj-1)*6
		CNUM=CNUM+1
		allsel
		!Create Contact Pair
		asel,s,,,nn+1		!下面
		cm,a_cont,area	!a_contという名をつける
		asel,s,,,12+18*(ii-1)		!
		cm,a_targ,area	!a_targという名をつける  TARGがくっつける相手の（通常大きいほうの）面
		allsel
		r,CNUM
		rmodif,CNUM,14,1e6		!14は接触コンダクタンスのこと CONTA174の リアルコンスタントのことらしい
		real,CNUM
		type,3		!要素ナンバー3のこと 3ということはtarge170
		cmsel,s,a_targ	!Cuの表面選択
		nsla,s,1	!選択されたエリアに関する節点の選択
		esurf		!既存の要素の自由表面に重ねて要素を生成とのこと
		type,8	!粗い樹脂と銅の接触
		cmsel,s,a_cont	!はんだ下面の選択
		nsla,s,1	!選択されたエリアに関する節点の選択
		esurf
		allsel

		CNUM=CNUM+1
		allsel
		!Create Contact Pair
		asel,s,,,nn+6		!上面
		cm,a_cont,area	!a_contという名をつける
		asel,s,,,195+18*(ii-1)		!
		cm,a_targ,area	!a_targという名をつける  TARGがくっつける相手の（通常大きいほうの）面
		allsel
		r,CNUM
		rmodif,CNUM,14,1e6		!14は接触コンダクタンスのこと CONTA174の リアルコンスタントのことらしい
		real,CNUM
		type,3		!要素ナンバー3のこと 3ということはtarge170
		cmsel,s,a_targ	!Cuの表面選択
		nsla,s,1	!選択されたエリアに関する節点の選択
		esurf		!既存の要素の自由表面に重ねて要素を生成とのこと
		type,8	!粗い樹脂と銅の接触
		cmsel,s,a_cont	!はんだ下面の選択
		nsla,s,1	!選択されたエリアに関する節点の選択
		esurf
		allsel

		CNUM=CNUM+1
		allsel
		!Create Contact Pair
		asel,s,,,nn+3		!右面
		cm,a_cont,area	!a_contという名をつける
		asel,s,,,X1+20*((ii-1)*PARA+(jj+1))+19		!
		cm,a_targ,area	!a_targという名をつける  TARGがくっつける相手の（通常大きいほうの）面
		allsel
		r,CNUM
		rmodif,CNUM,14,1e6		!14は接触コンダクタンスのこと CONTA174の リアルコンスタントのことらしい
		real,CNUM
		type,3		!要素ナンバー3のこと 3ということはtarge170
		cmsel,s,a_targ	!Cuの表面選択
		nsla,s,1	!選択されたエリアに関する節点の選択
		esurf		!既存の要素の自由表面に重ねて要素を生成とのこと
		type,5	!評価しない接触
		cmsel,s,a_cont	!はんだ下面の選択
		nsla,s,1	!選択されたエリアに関する節点の選択
		esurf
		allsel

		CNUM=CNUM+1
		allsel
		!Create Contact Pair
		asel,s,,,nn+3		!右面
		cm,a_cont,area	!a_contという名をつける
		asel,s,,,X2+16*((ii-1)*PARA+(jj+1))+16	!
		cm,a_targ,area	!a_targという名をつける  TARGがくっつける相手の（通常大きいほうの）面
		allsel
		r,CNUM
		rmodif,CNUM,14,1e6		!14は接触コンダクタンスのこと CONTA174の リアルコンスタントのことらしい
		real,CNUM
		type,3		!要素ナンバー3のこと 3ということはtarge170
		cmsel,s,a_targ	!Cuの表面選択
		nsla,s,1	!選択されたエリアに関する節点の選択
		esurf		!既存の要素の自由表面に重ねて要素を生成とのこと
		type,5	!評価しない接触
		cmsel,s,a_cont	!はんだ下面の選択
		nsla,s,1	!選択されたエリアに関する節点の選択
		esurf
		allsel

		CNUM=CNUM+1
		allsel
		!Create Contact Pair
		asel,s,,,nn+3		!右面
		cm,a_cont,area	!a_contという名をつける
		asel,s,,,X3+30*((ii-1)*PARA+(jj+1))+29	!
		cm,a_targ,area	!a_targという名をつける  TARGがくっつける相手の（通常大きいほうの）面
		allsel
		r,CNUM
		rmodif,CNUM,14,1e6		!14は接触コンダクタンスのこと CONTA174の リアルコンスタントのことらしい
		real,CNUM
		type,3		!要素ナンバー3のこと 3ということはtarge170
		cmsel,s,a_targ	!Cuの表面選択
		nsla,s,1	!選択されたエリアに関する節点の選択
		esurf		!既存の要素の自由表面に重ねて要素を生成とのこと
		type,5	!評価しない接触
		cmsel,s,a_cont	!はんだ下面の選択
		nsla,s,1	!選択されたエリアに関する節点の選択
		esurf
		allsel

		CNUM=CNUM+1
		allsel
		!Create Contact Pair
		asel,s,,,nn+3		!右面
		cm,a_cont,area	!a_contという名をつける
		asel,s,,,X5+27*((ii-1)*PARA+(jj+1))+24	!
		cm,a_targ,area	!a_targという名をつける  TARGがくっつける相手の（通常大きいほうの）面
		allsel
		r,CNUM
		rmodif,CNUM,14,1e6		!14は接触コンダクタンスのこと CONTA174の リアルコンスタントのことらしい
		real,CNUM
		type,3		!要素ナンバー3のこと 3ということはtarge170
		cmsel,s,a_targ	!Cuの表面選択
		nsla,s,1	!選択されたエリアに関する節点の選択
		esurf		!既存の要素の自由表面に重ねて要素を生成とのこと
		type,5	!評価しない接触
		cmsel,s,a_cont	!はんだ下面の選択
		nsla,s,1	!選択されたエリアに関する節点の選択
		esurf
		allsel

		CNUM=CNUM+1
		allsel
		!Create Contact Pair
		asel,s,,,nn+3		!右面
		cm,a_cont,area	!a_contという名をつける
		asel,s,,,X6+20*((ii-1)*PARA+(jj+1))+19	!
		cm,a_targ,area	!a_targという名をつける  TARGがくっつける相手の（通常大きいほうの）面
		allsel
		r,CNUM
		rmodif,CNUM,14,1e6		!14は接触コンダクタンスのこと CONTA174の リアルコンスタントのことらしい
		real,CNUM
		type,3		!要素ナンバー3のこと 3ということはtarge170
		cmsel,s,a_targ	!Cuの表面選択
		nsla,s,1	!選択されたエリアに関する節点の選択
		esurf		!既存の要素の自由表面に重ねて要素を生成とのこと
		type,5	!評価しない接触
		cmsel,s,a_cont	!はんだ下面の選択
		nsla,s,1	!選択されたエリアに関する節点の選択
		esurf
		allsel

		CNUM=CNUM+1
		allsel
		!Create Contact Pair
		asel,s,,,nn+3		!右面
		cm,a_cont,area	!a_contという名をつける
		asel,s,,,X7+16*((ii-1)*PARA+(jj+1))+16	!
		cm,a_targ,area	!a_targという名をつける  TARGがくっつける相手の（通常大きいほうの）面
		allsel
		r,CNUM
		rmodif,CNUM,14,1e6		!14は接触コンダクタンスのこと CONTA174の リアルコンスタントのことらしい
		real,CNUM
		type,3		!要素ナンバー3のこと 3ということはtarge170
		cmsel,s,a_targ	!Cuの表面選択
		nsla,s,1	!選択されたエリアに関する節点の選択
		esurf		!既存の要素の自由表面に重ねて要素を生成とのこと
		type,5	!評価しない接触
		cmsel,s,a_cont	!はんだ下面の選択
		nsla,s,1	!選択されたエリアに関する節点の選択
		esurf
		allsel

		CNUM=CNUM+1
		allsel
		!Create Contact Pair
		asel,s,,,nn+3		!右面
		cm,a_cont,area	!a_contという名をつける
		asel,s,,,X8+16*((ii-1)*PARA+(jj+1))+15	!
		cm,a_targ,area	!a_targという名をつける  TARGがくっつける相手の（通常大きいほうの）面
		allsel
		r,CNUM
		rmodif,CNUM,14,1e6		!14は接触コンダクタンスのこと CONTA174の リアルコンスタントのことらしい
		real,CNUM
		type,3		!要素ナンバー3のこと 3ということはtarge170
		cmsel,s,a_targ	!Cuの表面選択
		nsla,s,1	!選択されたエリアに関する節点の選択
		esurf		!既存の要素の自由表面に重ねて要素を生成とのこと
		type,5	!評価しない接触
		cmsel,s,a_cont	!はんだ下面の選択
		nsla,s,1	!選択されたエリアに関する節点の選択
		esurf
		allsel

		CNUM=CNUM+1
		allsel
		!Create Contact Pair
		asel,s,,,nn+3		!右面
		cm,a_cont,area	!a_contという名をつける
		asel,s,,,X9+6*((ii-1)*PARA+(jj+1))+5	!
		cm,a_targ,area	!a_targという名をつける  TARGがくっつける相手の（通常大きいほうの）面
		allsel
		r,CNUM
		rmodif,CNUM,14,1e6		!14は接触コンダクタンスのこと CONTA174の リアルコンスタントのことらしい
		real,CNUM
		type,3		!要素ナンバー3のこと 3ということはtarge170
		cmsel,s,a_targ	!Cuの表面選択
		nsla,s,1	!選択されたエリアに関する節点の選択
		esurf		!既存の要素の自由表面に重ねて要素を生成とのこと
		type,5	!評価しない接触
		cmsel,s,a_cont	!はんだ下面の選択
		nsla,s,1	!選択されたエリアに関する節点の選択
		esurf
		allsel

		CNUM=CNUM+1
		allsel
		!Create Contact Pair
		asel,s,,,nn+5		!左面
		cm,a_cont,area	!a_contという名をつける
		asel,s,,,X1+20*((ii-1)*PARA+(jj-1))+8	!
		cm,a_targ,area	!a_targという名をつける  TARGがくっつける相手の（通常大きいほうの）面
		allsel
		r,CNUM
		rmodif,CNUM,14,1e6		!14は接触コンダクタンスのこと CONTA174の リアルコンスタントのことらしい
		real,CNUM
		type,3		!要素ナンバー3のこと 3ということはtarge170
		cmsel,s,a_targ	!Cuの表面選択
		nsla,s,1	!選択されたエリアに関する節点の選択
		esurf		!既存の要素の自由表面に重ねて要素を生成とのこと
		type,5	!評価しない接触
		cmsel,s,a_cont	!はんだ下面の選択
		nsla,s,1	!選択されたエリアに関する節点の選択
		esurf
		allsel

		CNUM=CNUM+1
		allsel
		!Create Contact Pair
		asel,s,,,nn+5		!左面
		cm,a_cont,area	!a_contという名をつける
		asel,s,,,X2+16*((ii-1)*PARA+(jj-1))+7	!
		cm,a_targ,area	!a_targという名をつける  TARGがくっつける相手の（通常大きいほうの）面
		allsel
		r,CNUM
		rmodif,CNUM,14,1e6		!14は接触コンダクタンスのこと CONTA174の リアルコンスタントのことらしい
		real,CNUM
		type,3		!要素ナンバー3のこと 3ということはtarge170
		cmsel,s,a_targ	!Cuの表面選択
		nsla,s,1	!選択されたエリアに関する節点の選択
		esurf		!既存の要素の自由表面に重ねて要素を生成とのこと
		type,5	!評価しない接触
		cmsel,s,a_cont	!はんだ下面の選択
		nsla,s,1	!選択されたエリアに関する節点の選択
		esurf
		allsel

		CNUM=CNUM+1
		allsel
		!Create Contact Pair
		asel,s,,,nn+5		!左面
		cm,a_cont,area	!a_contという名をつける
		asel,s,,,X3+30*((ii-1)*PARA+(jj-1))+18	!
		cm,a_targ,area	!a_targという名をつける  TARGがくっつける相手の（通常大きいほうの）面
		allsel
		r,CNUM
		rmodif,CNUM,14,1e6		!14は接触コンダクタンスのこと CONTA174の リアルコンスタントのことらしい
		real,CNUM
		type,3		!要素ナンバー3のこと 3ということはtarge170
		cmsel,s,a_targ	!Cuの表面選択
		nsla,s,1	!選択されたエリアに関する節点の選択
		esurf		!既存の要素の自由表面に重ねて要素を生成とのこと
		type,5	!評価しない接触
		cmsel,s,a_cont	!はんだ下面の選択
		nsla,s,1	!選択されたエリアに関する節点の選択
		esurf
		allsel

		CNUM=CNUM+1
		allsel
		!Create Contact Pair
		asel,s,,,nn+5		!左面
		cm,a_cont,area	!a_contという名をつける
		asel,s,,,X4+4*((ii-1)*PARA+(jj-1))+3	!
		cm,a_targ,area	!a_targという名をつける  TARGがくっつける相手の（通常大きいほうの）面
		allsel
		r,CNUM
		rmodif,CNUM,14,1e6		!14は接触コンダクタンスのこと CONTA174の リアルコンスタントのことらしい
		real,CNUM
		type,3		!要素ナンバー3のこと 3ということはtarge170
		cmsel,s,a_targ	!Cuの表面選択
		nsla,s,1	!選択されたエリアに関する節点の選択
		esurf		!既存の要素の自由表面に重ねて要素を生成とのこと
		type,5	!評価しない接触
		cmsel,s,a_cont	!はんだ下面の選択
		nsla,s,1	!選択されたエリアに関する節点の選択
		esurf
		allsel

		CNUM=CNUM+1
		allsel
		!Create Contact Pair
		asel,s,,,nn+5		!左面
		cm,a_cont,area	!a_contという名をつける
		asel,s,,,X5+27*((ii-1)*PARA+(jj-1))+15	!
		cm,a_targ,area	!a_targという名をつける  TARGがくっつける相手の（通常大きいほうの）面
		allsel
		r,CNUM
		rmodif,CNUM,14,1e6		!14は接触コンダクタンスのこと CONTA174の リアルコンスタントのことらしい
		real,CNUM
		type,3		!要素ナンバー3のこと 3ということはtarge170
		cmsel,s,a_targ	!Cuの表面選択
		nsla,s,1	!選択されたエリアに関する節点の選択
		esurf		!既存の要素の自由表面に重ねて要素を生成とのこと
		type,5	!評価しない接触
		cmsel,s,a_cont	!はんだ下面の選択
		nsla,s,1	!選択されたエリアに関する節点の選択
		esurf
		allsel

		CNUM=CNUM+1
		allsel
		!Create Contact Pair
		asel,s,,,nn+5		!左面
		cm,a_cont,area	!a_contという名をつける
		asel,s,,,X5+27*((ii-1)*PARA+(jj-1))+27	!
		cm,a_targ,area	!a_targという名をつける  TARGがくっつける相手の（通常大きいほうの）面
		allsel
		r,CNUM
		rmodif,CNUM,14,1e6		!14は接触コンダクタンスのこと CONTA174の リアルコンスタントのことらしい
		real,CNUM
		type,3		!要素ナンバー3のこと 3ということはtarge170
		cmsel,s,a_targ	!Cuの表面選択
		nsla,s,1	!選択されたエリアに関する節点の選択
		esurf		!既存の要素の自由表面に重ねて要素を生成とのこと
		type,5	!評価しない接触
		cmsel,s,a_cont	!はんだ下面の選択
		nsla,s,1	!選択されたエリアに関する節点の選択
		esurf
		allsel

		CNUM=CNUM+1
		allsel
		!Create Contact Pair
		asel,s,,,nn+5		!左面
		cm,a_cont,area	!a_contという名をつける
		asel,s,,,X6+20*((ii-1)*PARA+(jj-1))+8	!
		cm,a_targ,area	!a_targという名をつける  TARGがくっつける相手の（通常大きいほうの）面
		allsel
		r,CNUM
		rmodif,CNUM,14,1e6		!14は接触コンダクタンスのこと CONTA174の リアルコンスタントのことらしい
		real,CNUM
		type,3		!要素ナンバー3のこと 3ということはtarge170
		cmsel,s,a_targ	!Cuの表面選択
		nsla,s,1	!選択されたエリアに関する節点の選択
		esurf		!既存の要素の自由表面に重ねて要素を生成とのこと
		type,5	!評価しない接触
		cmsel,s,a_cont	!はんだ下面の選択
		nsla,s,1	!選択されたエリアに関する節点の選択
		esurf
		allsel

		CNUM=CNUM+1
		allsel
		!Create Contact Pair
		asel,s,,,nn+5		!左面
		cm,a_cont,area	!a_contという名をつける
		asel,s,,,X7+16*((ii-1)*PARA+(jj-1))+7	!
		cm,a_targ,area	!a_targという名をつける  TARGがくっつける相手の（通常大きいほうの）面
		allsel
		r,CNUM
		rmodif,CNUM,14,1e6		!14は接触コンダクタンスのこと CONTA174の リアルコンスタントのことらしい
		real,CNUM
		type,3		!要素ナンバー3のこと 3ということはtarge170
		cmsel,s,a_targ	!Cuの表面選択
		nsla,s,1	!選択されたエリアに関する節点の選択
		esurf		!既存の要素の自由表面に重ねて要素を生成とのこと
		type,5	!評価しない接触
		cmsel,s,a_cont	!はんだ下面の選択
		nsla,s,1	!選択されたエリアに関する節点の選択
		esurf
		allsel

		CNUM=CNUM+1
		allsel
		!Create Contact Pair
		asel,s,,,nn+5		!左面
		cm,a_cont,area	!a_contという名をつける
		asel,s,,,X8+16*((ii-1)*PARA+(jj-1))+6	!
		cm,a_targ,area	!a_targという名をつける  TARGがくっつける相手の（通常大きいほうの）面
		allsel
		r,CNUM
		rmodif,CNUM,14,1e6		!14は接触コンダクタンスのこと CONTA174の リアルコンスタントのことらしい
		real,CNUM
		type,3		!要素ナンバー3のこと 3ということはtarge170
		cmsel,s,a_targ	!Cuの表面選択
		nsla,s,1	!選択されたエリアに関する節点の選択
		esurf		!既存の要素の自由表面に重ねて要素を生成とのこと
		type,5	!評価しない接触
		cmsel,s,a_cont	!はんだ下面の選択
		nsla,s,1	!選択されたエリアに関する節点の選択
		esurf
		allsel

		CNUM=CNUM+1
		allsel
		!Create Contact Pair
		asel,s,,,nn+5		!左面
		cm,a_cont,area	!a_contという名をつける
		asel,s,,,X9+6*((ii-1)*PARA+(jj-1))+3	!
		cm,a_targ,area	!a_targという名をつける  TARGがくっつける相手の（通常大きいほうの）面
		allsel
		r,CNUM
		rmodif,CNUM,14,1e6		!14は接触コンダクタンスのこと CONTA174の リアルコンスタントのことらしい
		real,CNUM
		type,3		!要素ナンバー3のこと 3ということはtarge170
		cmsel,s,a_targ	!Cuの表面選択
		nsla,s,1	!選択されたエリアに関する節点の選択
		esurf		!既存の要素の自由表面に重ねて要素を生成とのこと
		type,5	!評価しない接触
		cmsel,s,a_cont	!はんだ下面の選択
		nsla,s,1	!選択されたエリアに関する節点の選択
		esurf
		allsel
	*ENDDO
*ENDDO

!PARA間の樹脂作成で、
!点 8*(PARA-2)*2新規発生
!線 12*(PARA-2)*2新規発生
!面 6*(PARA-2)*2新規発生
!VOL 1*(PARA-2)*2新規発生
X1=KBASE+2*PARA*8*10
X1=X1+2*PARA*32+2*PARA*8
X1=X1+2*PARA*26+13*PARA*2
X1=X1+16*PARA*2+8*PARA*2
X1=X1+8*PARA*2+8*PARA*2		!チップ周辺最後の樹脂
X1=X1+8*(PARA-2)*2
X2=LBASE+2*PARA*12*10
X2=X2+2*PARA*(32+20)		!チップ側面樹脂まで
X2=X2+2*PARA*53+33*PARA*2	!53EMIはんだ側面樹脂
X2=X2+32*PARA*2+20*PARA*2	!
X2=X2+20*PARA*2+12*PARA*2
X2=X2+12*(PARA-2)*2
X3=ABASE+2*PARA*6*10	!樹脂なしの各PARA要素まで
X3=X3+2*PARA*(20+16)	!チップ周りの樹脂
X3=X3+2*PARA*(30+4)+2*PARA*27			!EMIはんだまわりの樹脂+SPC周辺
X3=X3+20*PARA*2+16*PARA*2
X3=X3+16*PARA*2+6*PARA*2
X3=X3+6*(PARA-2)*2
X4=VBASE+2*PARA*10+2*PARA*8
X4=X4+2*PARA*7+2*PARA*7
X4=X4+4*PARA*2+4*PARA*2
X4=X4+4*PARA*2+PARA*2
X4=X4+(PARA-2)*2
!-----------中央の薄い樹脂の作成--------------
*DO,ii,1,2,1
	*DO,jj,1,2,1
		*DO,kk,1,4,1
			k,X1+(ii-1)*8+(jj-1)*4+kk,RESINMID(ii,jj,kk,1),RESINMID(ii,jj,kk,2),RESINMID(ii,jj,kk,3)
		*ENDDO
	*ENDDO
*ENDDO
*DO,ii,1,2,1
	mm=X1+(ii-1)*8
	V,mm+1,mm+2,mm+3,mm+4,mm+5,mm+6,mm+7,mm+8
*ENDDO

D_PLTY=NINT((YMID_CHIP-FINERESINCOR*2)/M_RESINY)
D_PLTZ=NINT((BSOLT*2+OPOLEZ)/M_RESINZ)
*IF,D_PLTZ,LT,3,THEN
	D_PLTZ=3
*ENDIF
*DO,ii,1,2,1			!OorP
		D_PLTX=NINT((RESINMID(ii,1,2,1)-RESINMID(ii,1,1,1))/M_RESINX)
		lsel,s,,,X2+(ii-1)*12+1
		lesiz,all,,,D_PLTX		!z分割
		lsel,all			!最後にこのALLがないと、次にLをSELできなくなってしまいエラーが発生します。これはMUST
		lsel,s,,,X2+(ii-1)*12+2
		lesiz,all,,,D_PLTY		!z分割
		lsel,all			!最後にこのALLがないと、次にLをSELできなくなってしまいエラーが発生します。これはMUST
		lsel,s,,,X2+(ii-1)*12+5
		lesiz,all,,,D_PLTZ		!z分割
		lsel,all			!最後にこのALLがないと、次にLをSELできなくなってしまいエラーが発生します。これはMUST
		VMESH,X4+ii
*ENDDO

!------------中央の薄い樹脂の接合----------------------
!改めて面の基準どり
A1=ABASE+PARA*2*6*10	! ←樹脂の手前まで 上のDBC下はんだまで
A2=A1+20*PARA*2	! ダイ半田横の樹脂まで
A3=A2+16*PARA*2					! チップ横の樹脂まで
A4=A3+30*PARA*2					!EMIはんだ周辺樹脂まで
A5=A4+4*PARA*2					!EMIはんだまわり全部
A6=A5+27*PARA*2			!SPC下部分周辺樹脂まで
A7=A6+20*PARA*2			!面取り周辺樹脂まで
A8=A7+16*PARA*2			!上SPC周辺樹脂まで
A9=A8+16*PARA*2			!SPC上はんだ周辺樹脂まで
A10=A9+6*PARA*2			!EMI上の最後の樹脂まで
A11=A10+6*(PARA-2)*2			!PARA間の樹脂まで

*DO,ii,1,3,1
		CNUM=CNUM+1
		allsel
		!Create Contact Pair
		asel,s,,,A11+1		!下面
		cm,a_cont,area	!a_contという名をつける
		asel,s,,,12+6*(ii-1)		!
		cm,a_targ,area	!a_targという名をつける  TARGがくっつける相手の（通常大きいほうの）面
		allsel
		r,CNUM
		rmodif,CNUM,14,1e6		!14は接触コンダクタンスのこと CONTA174の リアルコンスタントのことらしい
		real,CNUM
		type,3		!要素ナンバー3のこと 3ということはtarge170
		cmsel,s,a_targ	!Cuの表面選択
		nsla,s,1	!選択されたエリアに関する節点の選択
		esurf		!既存の要素の自由表面に重ねて要素を生成とのこと
		type,8	!粗い樹脂と銅の接触
		cmsel,s,a_cont	!はんだ下面の選択
		nsla,s,1	!選択されたエリアに関する節点の選択
		esurf
		allsel
*ENDDO

		CNUM=CNUM+1
		allsel
		!Create Contact Pair
		asel,s,,,A11+1		!下面
		cm,a_cont,area	!a_contという名をつける
		asel,s,,,42		!
		cm,a_targ,area	!a_targという名をつける  TARGがくっつける相手の（通常大きいほうの）面
		allsel
		r,CNUM
		rmodif,CNUM,14,1e6		!14は接触コンダクタンスのこと CONTA174の リアルコンスタントのことらしい
		real,CNUM
		type,3		!要素ナンバー3のこと 3ということはtarge170
		cmsel,s,a_targ	!Cuの表面選択
		nsla,s,1	!選択されたエリアに関する節点の選択
		esurf		!既存の要素の自由表面に重ねて要素を生成とのこと
		type,8	!粗い樹脂と銅の接触
		cmsel,s,a_cont	!はんだ下面の選択
		nsla,s,1	!選択されたエリアに関する節点の選択
		esurf
		allsel

*DO,ii,1,2,1
		CNUM=CNUM+1
		allsel
		!Create Contact Pair
		asel,s,,,A11+6+1		!下面
		cm,a_cont,area	!a_contという名をつける
		asel,s,,,30-6*(ii-1)		!
		cm,a_targ,area	!a_targという名をつける  TARGがくっつける相手の（通常大きいほうの）面
		allsel
		r,CNUM
		rmodif,CNUM,14,1e6		!14は接触コンダクタンスのこと CONTA174の リアルコンスタントのことらしい
		real,CNUM
		type,3		!要素ナンバー3のこと 3ということはtarge170
		cmsel,s,a_targ	!Cuの表面選択
		nsla,s,1	!選択されたエリアに関する節点の選択
		esurf		!既存の要素の自由表面に重ねて要素を生成とのこと
		type,8	!粗い樹脂と銅の接触
		cmsel,s,a_cont	!はんだ下面の選択
		nsla,s,1	!選択されたエリアに関する節点の選択
		esurf
		allsel
*ENDDO

		CNUM=CNUM+1
		allsel
		!Create Contact Pair
		asel,s,,,A11+6+1		!下面
		cm,a_cont,area	!a_contという名をつける
		asel,s,,,42		!
		cm,a_targ,area	!a_targという名をつける  TARGがくっつける相手の（通常大きいほうの）面
		allsel
		r,CNUM
		rmodif,CNUM,14,1e6		!14は接触コンダクタンスのこと CONTA174の リアルコンスタントのことらしい
		real,CNUM
		type,3		!要素ナンバー3のこと 3ということはtarge170
		cmsel,s,a_targ	!Cuの表面選択
		nsla,s,1	!選択されたエリアに関する節点の選択
		esurf		!既存の要素の自由表面に重ねて要素を生成とのこと
		type,8	!粗い樹脂と銅の接触
		cmsel,s,a_cont	!はんだ下面の選択
		nsla,s,1	!選択されたエリアに関する節点の選択
		esurf
		allsel

*DO,ii,1,2,1
		CNUM=CNUM+1
		allsel
		!Create Contact Pair
		asel,s,,,A11+1		!下面
		cm,a_cont,area	!a_contという名をつける
		asel,s,,,126-(ii-1)*18		!
		cm,a_targ,area	!a_targという名をつける  TARGがくっつける相手の（通常大きいほうの）面
		allsel
		r,CNUM
		rmodif,CNUM,14,1e6		!14は接触コンダクタンスのこと CONTA174の リアルコンスタントのことらしい
		real,CNUM
		type,3		!要素ナンバー3のこと 3ということはtarge170
		cmsel,s,a_targ	!Cuの表面選択
		nsla,s,1	!選択されたエリアに関する節点の選択
		esurf		!既存の要素の自由表面に重ねて要素を生成とのこと
		type,5
		cmsel,s,a_cont	!はんだ下面の選択
		nsla,s,1	!選択されたエリアに関する節点の選択
		esurf
		allsel
*ENDDO

*DO,ii,1,2,1
		CNUM=CNUM+1
		allsel
		!Create Contact Pair
		asel,s,,,A11+6+1		!下面
		cm,a_cont,area	!a_contという名をつける
		asel,s,,,132-(ii-1)*24		!
		cm,a_targ,area	!a_targという名をつける  TARGがくっつける相手の（通常大きいほうの）面
		allsel
		r,CNUM
		rmodif,CNUM,14,1e6		!14は接触コンダクタンスのこと CONTA174の リアルコンスタントのことらしい
		real,CNUM
		type,3		!要素ナンバー3のこと 3ということはtarge170
		cmsel,s,a_targ	!Cuの表面選択
		nsla,s,1	!選択されたエリアに関する節点の選択
		esurf		!既存の要素の自由表面に重ねて要素を生成とのこと
		type,5
		cmsel,s,a_cont	!はんだ下面の選択
		nsla,s,1	!選択されたエリアに関する節点の選択
		esurf
		allsel
*ENDDO
!上面の接合
*DO,ii,1,3,1
		CNUM=CNUM+1
		allsel
		!Create Contact Pair
		asel,s,,,A11+6		!上面
		cm,a_cont,area	!a_contという名をつける
		asel,s,,,195+(ii-1)*6		!
		cm,a_targ,area	!a_targという名をつける  TARGがくっつける相手の（通常大きいほうの）面
		allsel
		r,CNUM
		rmodif,CNUM,14,1e6		!14は接触コンダクタンスのこと CONTA174の リアルコンスタントのことらしい
		real,CNUM
		type,3		!要素ナンバー3のこと 3ということはtarge170
		cmsel,s,a_targ	!Cuの表面選択
		nsla,s,1	!選択されたエリアに関する節点の選択
		esurf		!既存の要素の自由表面に重ねて要素を生成とのこと
		type,8
		cmsel,s,a_cont	!はんだ下面の選択
		nsla,s,1	!選択されたエリアに関する節点の選択
		esurf
		allsel
*ENDDO

*DO,ii,1,2,1
		CNUM=CNUM+1
		allsel
		!Create Contact Pair
		asel,s,,,A11+6		!上面
		cm,a_cont,area	!a_contという名をつける
		asel,s,,,243+(ii-1)*6		!
		cm,a_targ,area	!a_targという名をつける  TARGがくっつける相手の（通常大きいほうの）面
		allsel
		r,CNUM
		rmodif,CNUM,14,1e6		!14は接触コンダクタンスのこと CONTA174の リアルコンスタントのことらしい
		real,CNUM
		type,3		!要素ナンバー3のこと 3ということはtarge170
		cmsel,s,a_targ	!Cuの表面選択
		nsla,s,1	!選択されたエリアに関する節点の選択
		esurf		!既存の要素の自由表面に重ねて要素を生成とのこと
		type,5
		cmsel,s,a_cont	!はんだ下面の選択
		nsla,s,1	!選択されたエリアに関する節点の選択
		esurf
		allsel
*ENDDO

*DO,ii,1,3,1
		CNUM=CNUM+1
		allsel
		!Create Contact Pair
		asel,s,,,A11+6+6		!上面
		cm,a_cont,area	!a_contという名をつける
		asel,s,,,201+(ii-1)*6		!
		cm,a_targ,area	!a_targという名をつける  TARGがくっつける相手の（通常大きいほうの）面
		allsel
		r,CNUM
		rmodif,CNUM,14,1e6		!14は接触コンダクタンスのこと CONTA174の リアルコンスタントのことらしい
		real,CNUM
		type,3		!要素ナンバー3のこと 3ということはtarge170
		cmsel,s,a_targ	!Cuの表面選択
		nsla,s,1	!選択されたエリアに関する節点の選択
		esurf		!既存の要素の自由表面に重ねて要素を生成とのこと
		type,8
		cmsel,s,a_cont	!はんだ下面の選択
		nsla,s,1	!選択されたエリアに関する節点の選択
		esurf
		allsel
*ENDDO

*DO,ii,1,2,1
		CNUM=CNUM+1
		allsel
		!Create Contact Pair
		asel,s,,,A11+6+6		!上面
		cm,a_cont,area	!a_contという名をつける
		asel,s,,,249+(ii-1)*6		!
		cm,a_targ,area	!a_targという名をつける  TARGがくっつける相手の（通常大きいほうの）面
		allsel
		r,CNUM
		rmodif,CNUM,14,1e6		!14は接触コンダクタンスのこと CONTA174の リアルコンスタントのことらしい
		real,CNUM
		type,3		!要素ナンバー3のこと 3ということはtarge170
		cmsel,s,a_targ	!Cuの表面選択
		nsla,s,1	!選択されたエリアに関する節点の選択
		esurf		!既存の要素の自由表面に重ねて要素を生成とのこと
		type,5
		cmsel,s,a_cont	!はんだ下面の選択
		nsla,s,1	!選択されたエリアに関する節点の選択
		esurf
		allsel
*ENDDO

!前後面の接合
*DO,ii,1,2,1
	*DO,jj,1,PARA,1
		kk=MOD(jj+1,2)	!奇数0 偶数1
		mm=MOD(jj,2)	!奇数1 偶数0
		CNUM=CNUM+1
		allsel
		!Create Contact Pair
		asel,s,,,A1+(ii-1)*PARA*20+(jj-1)*20+2+mm*12
		cm,a_cont,area	!a_contという名をつける
		asel,s,,,A11+(ii-1)*6+2+kk*2		!
		cm,a_targ,area	!a_targという名をつける  TARGがくっつける相手の（通常大きいほうの）面
		allsel
		r,CNUM
		rmodif,CNUM,14,1e6		!14は接触コンダクタンスのこと CONTA174の リアルコンスタントのことらしい
		real,CNUM
		type,3		!要素ナンバー3のこと 3ということはtarge170
		cmsel,s,a_targ	!Cuの表面選択
		nsla,s,1	!選択されたエリアに関する節点の選択
		esurf		!既存の要素の自由表面に重ねて要素を生成とのこと
		type,5
		cmsel,s,a_cont	!はんだ下面の選択
		nsla,s,1	!選択されたエリアに関する節点の選択
		esurf
		allsel

		CNUM=CNUM+1
		allsel
		!Create Contact Pair
		asel,s,,,A2+(ii-1)*PARA*16+(jj-1)*16+2+mm*10
		cm,a_cont,area	!a_contという名をつける
		asel,s,,,A11+(ii-1)*6+2+kk*2		!
		cm,a_targ,area	!a_targという名をつける  TARGがくっつける相手の（通常大きいほうの）面
		allsel
		r,CNUM
		rmodif,CNUM,14,1e6		!14は接触コンダクタンスのこと CONTA174の リアルコンスタントのことらしい
		real,CNUM
		type,3		!要素ナンバー3のこと 3ということはtarge170
		cmsel,s,a_targ	!Cuの表面選択
		nsla,s,1	!選択されたエリアに関する節点の選択
		esurf		!既存の要素の自由表面に重ねて要素を生成とのこと
		type,5
		cmsel,s,a_cont	!はんだ下面の選択
		nsla,s,1	!選択されたエリアに関する節点の選択
		esurf
		allsel

	*IF,mm,EQ,0,THEN
		CNUM=CNUM+1
		allsel
		!Create Contact Pair
		asel,s,,,A9+(ii-1)*PARA*6+(jj-1)*6+2
		cm,a_cont,area	!a_contという名をつける
		asel,s,,,A11+(ii-1)*6+2+kk*2		!
		cm,a_targ,area	!a_targという名をつける  TARGがくっつける相手の（通常大きいほうの）面
		allsel
		r,CNUM
		rmodif,CNUM,14,1e6		!14は接触コンダクタンスのこと CONTA174の リアルコンスタントのことらしい
		real,CNUM
		type,3		!要素ナンバー3のこと 3ということはtarge170
		cmsel,s,a_targ	!Cuの表面選択
		nsla,s,1	!選択されたエリアに関する節点の選択
		esurf		!既存の要素の自由表面に重ねて要素を生成とのこと
		type,5
		cmsel,s,a_cont	!はんだ下面の選択
		nsla,s,1	!選択されたエリアに関する節点の選択
		esurf
		allsel
	*ENDIF

	*IF,mm,EQ,1,THEN
		CNUM=CNUM+1
		allsel
		!Create Contact Pair
		asel,s,,,A3+(ii-1)*PARA*30+(jj-1)*30+24
		cm,a_cont,area	!a_contという名をつける
		asel,s,,,A11+(ii-1)*6+2+kk*2		!
		cm,a_targ,area	!a_targという名をつける  TARGがくっつける相手の（通常大きいほうの）面
		allsel
		r,CNUM
		rmodif,CNUM,14,1e6		!14は接触コンダクタンスのこと CONTA174の リアルコンスタントのことらしい
		real,CNUM
		type,3		!要素ナンバー3のこと 3ということはtarge170
		cmsel,s,a_targ	!Cuの表面選択
		nsla,s,1	!選択されたエリアに関する節点の選択
		esurf		!既存の要素の自由表面に重ねて要素を生成とのこと
		type,5
		cmsel,s,a_cont	!はんだ下面の選択
		nsla,s,1	!選択されたエリアに関する節点の選択
		esurf
		allsel

		CNUM=CNUM+1
		allsel
		!Create Contact Pair
		asel,s,,,A5+(ii-1)*PARA*27+(jj-1)*27+20
		cm,a_cont,area	!a_contという名をつける
		asel,s,,,A11+(ii-1)*6+2+kk*2		!
		cm,a_targ,area	!a_targという名をつける  TARGがくっつける相手の（通常大きいほうの）面
		allsel
		r,CNUM
		rmodif,CNUM,14,1e6		!14は接触コンダクタンスのこと CONTA174の リアルコンスタントのことらしい
		real,CNUM
		type,3		!要素ナンバー3のこと 3ということはtarge170
		cmsel,s,a_targ	!Cuの表面選択
		nsla,s,1	!選択されたエリアに関する節点の選択
		esurf		!既存の要素の自由表面に重ねて要素を生成とのこと
		type,5
		cmsel,s,a_cont	!はんだ下面の選択
		nsla,s,1	!選択されたエリアに関する節点の選択
		esurf
		allsel

		CNUM=CNUM+1
		allsel
		!Create Contact Pair
		asel,s,,,A6+(ii-1)*PARA*20+(jj-1)*20+14
		cm,a_cont,area	!a_contという名をつける
		asel,s,,,A11+(ii-1)*6+2+kk*2		!
		cm,a_targ,area	!a_targという名をつける  TARGがくっつける相手の（通常大きいほうの）面
		allsel
		r,CNUM
		rmodif,CNUM,14,1e6		!14は接触コンダクタンスのこと CONTA174の リアルコンスタントのことらしい
		real,CNUM
		type,3		!要素ナンバー3のこと 3ということはtarge170
		cmsel,s,a_targ	!Cuの表面選択
		nsla,s,1	!選択されたエリアに関する節点の選択
		esurf		!既存の要素の自由表面に重ねて要素を生成とのこと
		type,5
		cmsel,s,a_cont	!はんだ下面の選択
		nsla,s,1	!選択されたエリアに関する節点の選択
		esurf
		allsel

		CNUM=CNUM+1
		allsel
		!Create Contact Pair
		asel,s,,,A7+(ii-1)*PARA*16+(jj-1)*16+12
		cm,a_cont,area	!a_contという名をつける
		asel,s,,,A11+(ii-1)*6+2+kk*2		!
		cm,a_targ,area	!a_targという名をつける  TARGがくっつける相手の（通常大きいほうの）面
		allsel
		r,CNUM
		rmodif,CNUM,14,1e6		!14は接触コンダクタンスのこと CONTA174の リアルコンスタントのことらしい
		real,CNUM
		type,3		!要素ナンバー3のこと 3ということはtarge170
		cmsel,s,a_targ	!Cuの表面選択
		nsla,s,1	!選択されたエリアに関する節点の選択
		esurf		!既存の要素の自由表面に重ねて要素を生成とのこと
		type,5
		cmsel,s,a_cont	!はんだ下面の選択
		nsla,s,1	!選択されたエリアに関する節点の選択
		esurf
		allsel

		CNUM=CNUM+1
		allsel
		!Create Contact Pair
		asel,s,,,A8+(ii-1)*PARA*16+(jj-1)*16+11
		cm,a_cont,area	!a_contという名をつける
		asel,s,,,A11+(ii-1)*6+2+kk*2		!
		cm,a_targ,area	!a_targという名をつける  TARGがくっつける相手の（通常大きいほうの）面
		allsel
		r,CNUM
		rmodif,CNUM,14,1e6		!14は接触コンダクタンスのこと CONTA174の リアルコンスタントのことらしい
		real,CNUM
		type,3		!要素ナンバー3のこと 3ということはtarge170
		cmsel,s,a_targ	!Cuの表面選択
		nsla,s,1	!選択されたエリアに関する節点の選択
		esurf		!既存の要素の自由表面に重ねて要素を生成とのこと
		type,5
		cmsel,s,a_cont	!はんだ下面の選択
		nsla,s,1	!選択されたエリアに関する節点の選択
		esurf
		allsel
	*ENDIF
	*ENDDO
*ENDDO


*DO,ii,1,2,1
	*DO,jj,1,PARA-2,1
		kk=MOD(jj+1,2)	!奇数0 偶数1
		mm=MOD(jj,2)	!奇数1 偶数0
		CNUM=CNUM+1
		allsel
		!Create Contact Pair
		asel,s,,,A10+(ii-1)*(PARA-2)*6+(jj-1)*6+2+mm*2	!最初のはんだ下面を選択
		cm,a_cont,area	!a_contという名をつける
		asel,s,,,A11+(ii-1)*6+2+kk*2	!Cu表面を選択
		cm,a_targ,area	!a_targという名をつける  TARGがくっつける相手の（通常大きいほうの）面
		allsel
		r,CNUM
		rmodif,CNUM,14,1e6		!14は接触コンダクタンスのこと CONTA174の リアルコンスタントのことらしい
		real,CNUM
		type,3		!要素ナンバー3のこと 3ということはtarge170
		cmsel,s,a_targ	!Cuの表面選択
		nsla,s,1	!選択されたエリアに関する節点の選択
		esurf		!既存の要素の自由表面に重ねて要素を生成とのこと
		type,5	!評価しない接触
		cmsel,s,a_cont	!はんだ下面の選択
		nsla,s,1	!選択されたエリアに関する節点の選択
		esurf
		allsel
	*ENDDO
*ENDDO

!中央樹脂の側面 O柱との接触
!ABASE-32がO柱の前まで
*DO,ii,1,2,1
		CNUM=CNUM+1
		allsel
		!Create Contact Pair
		asel,s,,,ABASE-32+5-(ii-1)*2	!最初のはんだ下面を選択
		cm,a_cont,area	!a_contという名をつける
		asel,s,,,A11+(ii-1)*8+3	!Cu表面を選択
		cm,a_targ,area	!a_targという名をつける  TARGがくっつける相手の（通常大きいほうの）面
		allsel
		r,CNUM
		rmodif,CNUM,14,1e6		!14は接触コンダクタンスのこと CONTA174の リアルコンスタントのことらしい
		real,CNUM
		type,3		!要素ナンバー3のこと 3ということはtarge170
		cmsel,s,a_targ	!Cuの表面選択
		nsla,s,1	!選択されたエリアに関する節点の選択
		esurf		!既存の要素の自由表面に重ねて要素を生成とのこと
		type,6
		cmsel,s,a_cont	!はんだ下面の選択
		nsla,s,1	!選択されたエリアに関する節点の選択
		esurf
		allsel

		CNUM=CNUM+1
		allsel
		!Create Contact Pair
		asel,s,,,ABASE-32+6+5-(ii-1)*2	!最初のはんだ下面を選択
		cm,a_cont,area	!a_contという名をつける
		asel,s,,,A11+(ii-1)*8+3	!Cu表面を選択
		cm,a_targ,area	!a_targという名をつける  TARGがくっつける相手の（通常大きいほうの）面
		allsel
		r,CNUM
		rmodif,CNUM,14,1e6		!14は接触コンダクタンスのこと CONTA174の リアルコンスタントのことらしい
		real,CNUM
		type,3		!要素ナンバー3のこと 3ということはtarge170
		cmsel,s,a_targ	!Cuの表面選択
		nsla,s,1	!選択されたエリアに関する節点の選択
		esurf		!既存の要素の自由表面に重ねて要素を生成とのこと
		type,8
		cmsel,s,a_cont	!はんだ下面の選択
		nsla,s,1	!選択されたエリアに関する節点の選択
		esurf
		allsel


		CNUM=CNUM+1
		allsel
		!Create Contact Pair
		asel,s,,,ABASE-32+11+5-(ii-1)*2	!最初のはんだ下面を選択
		cm,a_cont,area	!a_contという名をつける
		asel,s,,,A11+(ii-1)*8+3	!Cu表面を選択
		cm,a_targ,area	!a_targという名をつける  TARGがくっつける相手の（通常大きいほうの）面
		allsel
		r,CNUM
		rmodif,CNUM,14,1e6		!14は接触コンダクタンスのこと CONTA174の リアルコンスタントのことらしい
		real,CNUM
		type,3		!要素ナンバー3のこと 3ということはtarge170
		cmsel,s,a_targ	!Cuの表面選択
		nsla,s,1	!選択されたエリアに関する節点の選択
		esurf		!既存の要素の自由表面に重ねて要素を生成とのこと
		type,6
		cmsel,s,a_cont	!はんだ下面の選択
		nsla,s,1	!選択されたエリアに関する節点の選択
		esurf
		allsel
*ENDDO

!中央の樹脂作成で、
!点 8*2新規発生
!線 12*2新規発生
!面 6*2新規発生
!VOL 2新規発生
!X1=KBASE+2*PARA*8*10
!X1=X1+2*PARA*32+2*PARA*8
!X1=X1+2*PARA*26+13*PARA*2
!X1=X1+16*PARA*2+8*PARA*2
!X1=X1+8*PARA*2+8*PARA*2		!チップ周辺最後の樹脂
!X1=X1+8*(PARA-2)*2
X1=X1+16
!X2=LBASE+2*PARA*12*10
!X2=X2+2*PARA*(32+20)		!チップ側面樹脂まで
!X2=X2+2*PARA*53+33*PARA*2	!53EMIはんだ側面樹脂
!X2=X2+32*PARA*2+20*PARA*2	!
!X2=X2+20*PARA*2+12*PARA*2
!X2=X2+12*(PARA-2)*2
X2=X2+24
!X3=ABASE+2*PARA*6*10	!樹脂なしの各PARA要素まで
!X3=X3+2*PARA*(20+16)	!チップ周りの樹脂
!X3=X3+2*PARA*(30+4)+2*PARA*27			!EMIはんだまわりの樹脂+SPC周辺
!X3=X3+20*PARA*2+16*PARA*2
!X3=X3+16*PARA*2+6*PARA*2
!X3=X3+6*(PARA-2)*2
X3=X3+12
!X4=VBASE+2*PARA*10+2*PARA*8
!X4=X4+2*PARA*7+2*PARA*7
!X4=X4+4*PARA*2+4*PARA*2
!X4=X4+4*PARA*2+PARA*2
!X4=X4+(PARA-2)*2
X4=X4+2
!チップ行横の樹脂作成 合計8個-----------------------------
*DO,ii,1,8,1			!8つすべて
	*DO,jj,1,2,1		!上下
		*DO,kk,1,4,1	!4方向
				nn=X1+(ii-1)*8+(jj-1)*4+kk
				k,nn,RESINCHIPSIDE(ii,jj,kk,1),RESINCHIPSIDE(ii,jj,kk,2),RESINCHIPSIDE(ii,jj,kk,3)
		*ENDDO
	*ENDDO
*ENDDO
*DO,ii,1,8,1
			kk=X1+(ii-1)*8
			V,kk+1,kk+2,kk+3,kk+4,kk+5,kk+6,kk+7,kk+8
*ENDDO
D_PLTZ=NINT((BSOLT*2+OPOLEZ)/M_RESINZ)
*IF,D_PLTZ,LT,3,THEN
	D_PLTZ=3
*ENDIF
*DO,ii,1,8,1
		D_PLTX=NINT((RESINCHIPSIDE(ii,1,2,1)-RESINCHIPSIDE(ii,1,1,1))/M_RESINX)
		D_PLTY=NINT((RESINCHIPSIDE(ii,1,3,2)-RESINCHIPSIDE(ii,1,2,2))/M_RESINY)
		lsel,s,,,X2+(ii-1)*12+1
		lesiz,all,,,D_PLTX		!z分割
		lsel,all			!最後にこのALLがないと、次にLをSELできなくなってしまいエラーが発生します。これはMUST
		lsel,s,,,X2+(ii-1)*12+2
		lesiz,all,,,D_PLTY		!z分割
		lsel,all			!最後にこのALLがないと、次にLをSELできなくなってしまいエラーが発生します。これはMUST
		lsel,s,,,X2+(ii-1)*12+5
		lesiz,all,,,D_PLTZ		!z分割
		lsel,all			!最後にこのALLがないと、次にLをSELできなくなってしまいエラーが発生します。これはMUST
		VMESH,X4+ii
*ENDDO

!---------ﾁｯﾌﾟ行横の樹脂の接合---------------------------------------------------------------------------------------------------------------------------------
!改めて面の基準どり
A1=ABASE+PARA*2*6*10	! ←樹脂の手前まで 上のDBC下はんだまで
A2=A1+20*PARA*2	! ダイ半田横の樹脂まで
A3=A2+16*PARA*2					! チップ横の樹脂まで
A4=A3+30*PARA*2					!EMIはんだ周辺樹脂まで
A5=A4+4*PARA*2					!EMIはんだまわり全部
A6=A5+27*PARA*2			!SPC下部分周辺樹脂まで
A7=A6+20*PARA*2			!面取り周辺樹脂まで
A8=A7+16*PARA*2			!上SPC周辺樹脂まで
A9=A8+16*PARA*2			!SPC上はんだ周辺樹脂まで
A10=A9+6*PARA*2			!EMI上の最後の樹脂まで
A11=A10+6*(PARA-2)*2			!PARA間の樹脂まで
A12=A11+6*2				!中央の樹脂まで

!原点からみて左下の樹脂から O島の端　前列

		CNUM=CNUM+1
		allsel
		!Create Contact Pair
		asel,s,,,A12+1	!下面を選択
		cm,a_cont,area	!a_contという名をつける
		asel,s,,,12	!Cu表面を選択
		cm,a_targ,area	!a_targという名をつける  TARGがくっつける相手の（通常大きいほうの）面
		allsel
		r,CNUM
		rmodif,CNUM,14,1e6		!14は接触コンダクタンスのこと CONTA174の リアルコンスタントのことらしい
		real,CNUM
		type,3		!要素ナンバー3のこと 3ということはtarge170
		cmsel,s,a_targ	!Cuの表面選択
		nsla,s,1	!選択されたエリアに関する節点の選択
		esurf		!既存の要素の自由表面に重ねて要素を生成とのこと
		type,8	!粗い樹脂と銅の接触
		cmsel,s,a_cont	!はんだ下面の選択
		nsla,s,1	!選択されたエリアに関する節点の選択
		esurf
		allsel

		CNUM=CNUM+1
		allsel
		!Create Contact Pair
		asel,s,,,A12+6	!上面を選択
		cm,a_cont,area	!a_contという名をつける
		asel,s,,,195	!Cu表面を選択
		cm,a_targ,area	!a_targという名をつける  TARGがくっつける相手の（通常大きいほうの）面
		allsel
		r,CNUM
		rmodif,CNUM,14,1e6		!14は接触コンダクタンスのこと CONTA174の リアルコンスタントのことらしい
		real,CNUM
		type,3		!要素ナンバー3のこと 3ということはtarge170
		cmsel,s,a_targ	!Cuの表面選択
		nsla,s,1	!選択されたエリアに関する節点の選択
		esurf		!既存の要素の自由表面に重ねて要素を生成とのこと
		type,8	!粗い樹脂と銅の接触
		cmsel,s,a_cont	!はんだ下面の選択
		nsla,s,1	!選択されたエリアに関する節点の選択
		esurf
		allsel

		CNUM=CNUM+1
		allsel
		!Create Contact Pair
		asel,s,,,A12+3	!右側面を選択
		cm,a_cont,area	!a_contという名をつける
		asel,s,,,A1+19	!Cu表面を選択
		cm,a_targ,area	!a_targという名をつける  TARGがくっつける相手の（通常大きいほうの）面
		allsel
		r,CNUM
		rmodif,CNUM,14,1e6		!14は接触コンダクタンスのこと CONTA174の リアルコンスタントのことらしい
		real,CNUM
		type,3		!要素ナンバー3のこと 3ということはtarge170
		cmsel,s,a_targ	!Cuの表面選択
		nsla,s,1	!選択されたエリアに関する節点の選択
		esurf		!既存の要素の自由表面に重ねて要素を生成とのこと
		type,5	!評価しない接触
		cmsel,s,a_cont	!はんだ下面の選択
		nsla,s,1	!選択されたエリアに関する節点の選択
		esurf
		allsel

		CNUM=CNUM+1
		allsel
		!Create Contact Pair
		asel,s,,,A12+3	!右側面を選択
		cm,a_cont,area	!a_contという名をつける
		asel,s,,,A2+16	!Cu表面を選択
		cm,a_targ,area	!a_targという名をつける  TARGがくっつける相手の（通常大きいほうの）面
		allsel
		r,CNUM
		rmodif,CNUM,14,1e6		!14は接触コンダクタンスのこと CONTA174の リアルコンスタントのことらしい
		real,CNUM
		type,3		!要素ナンバー3のこと 3ということはtarge170
		cmsel,s,a_targ	!Cuの表面選択
		nsla,s,1	!選択されたエリアに関する節点の選択
		esurf		!既存の要素の自由表面に重ねて要素を生成とのこと
		type,5	!評価しない接触
		cmsel,s,a_cont	!はんだ下面の選択
		nsla,s,1	!選択されたエリアに関する節点の選択
		esurf
		allsel

		CNUM=CNUM+1
		allsel
		!Create Contact Pair
		asel,s,,,A12+3	!右側面を選択
		cm,a_cont,area	!a_contという名をつける
		asel,s,,,A3+29	!Cu表面を選択
		cm,a_targ,area	!a_targという名をつける  TARGがくっつける相手の（通常大きいほうの）面
		allsel
		r,CNUM
		rmodif,CNUM,14,1e6		!14は接触コンダクタンスのこと CONTA174の リアルコンスタントのことらしい
		real,CNUM
		type,3		!要素ナンバー3のこと 3ということはtarge170
		cmsel,s,a_targ	!Cuの表面選択
		nsla,s,1	!選択されたエリアに関する節点の選択
		esurf		!既存の要素の自由表面に重ねて要素を生成とのこと
		type,5	!評価しない接触
		cmsel,s,a_cont	!はんだ下面の選択
		nsla,s,1	!選択されたエリアに関する節点の選択
		esurf
		allsel

		CNUM=CNUM+1
		allsel
		!Create Contact Pair
		asel,s,,,A12+3	!右側面を選択
		cm,a_cont,area	!a_contという名をつける
		asel,s,,,A5+24	!Cu表面を選択
		cm,a_targ,area	!a_targという名をつける  TARGがくっつける相手の（通常大きいほうの）面
		allsel
		r,CNUM
		rmodif,CNUM,14,1e6		!14は接触コンダクタンスのこと CONTA174の リアルコンスタントのことらしい
		real,CNUM
		type,3		!要素ナンバー3のこと 3ということはtarge170
		cmsel,s,a_targ	!Cuの表面選択
		nsla,s,1	!選択されたエリアに関する節点の選択
		esurf		!既存の要素の自由表面に重ねて要素を生成とのこと
		type,5	!評価しない接触
		cmsel,s,a_cont	!はんだ下面の選択
		nsla,s,1	!選択されたエリアに関する節点の選択
		esurf
		allsel

		CNUM=CNUM+1
		allsel
		!Create Contact Pair
		asel,s,,,A12+3	!右側面を選択
		cm,a_cont,area	!a_contという名をつける
		asel,s,,,A6+19	!Cu表面を選択
		cm,a_targ,area	!a_targという名をつける  TARGがくっつける相手の（通常大きいほうの）面
		allsel
		r,CNUM
		rmodif,CNUM,14,1e6		!14は接触コンダクタンスのこと CONTA174の リアルコンスタントのことらしい
		real,CNUM
		type,3		!要素ナンバー3のこと 3ということはtarge170
		cmsel,s,a_targ	!Cuの表面選択
		nsla,s,1	!選択されたエリアに関する節点の選択
		esurf		!既存の要素の自由表面に重ねて要素を生成とのこと
		type,5	!評価しない接触
		cmsel,s,a_cont	!はんだ下面の選択
		nsla,s,1	!選択されたエリアに関する節点の選択
		esurf
		allsel

		CNUM=CNUM+1
		allsel
		!Create Contact Pair
		asel,s,,,A12+3	!右側面を選択
		cm,a_cont,area	!a_contという名をつける
		asel,s,,,A7+16	!Cu表面を選択
		cm,a_targ,area	!a_targという名をつける  TARGがくっつける相手の（通常大きいほうの）面
		allsel
		r,CNUM
		rmodif,CNUM,14,1e6		!14は接触コンダクタンスのこと CONTA174の リアルコンスタントのことらしい
		real,CNUM
		type,3		!要素ナンバー3のこと 3ということはtarge170
		cmsel,s,a_targ	!Cuの表面選択
		nsla,s,1	!選択されたエリアに関する節点の選択
		esurf		!既存の要素の自由表面に重ねて要素を生成とのこと
		type,5	!評価しない接触
		cmsel,s,a_cont	!はんだ下面の選択
		nsla,s,1	!選択されたエリアに関する節点の選択
		esurf
		allsel

		CNUM=CNUM+1
		allsel
		!Create Contact Pair
		asel,s,,,A12+3	!右側面を選択
		cm,a_cont,area	!a_contという名をつける
		asel,s,,,A8+15	!Cu表面を選択
		cm,a_targ,area	!a_targという名をつける  TARGがくっつける相手の（通常大きいほうの）面
		allsel
		r,CNUM
		rmodif,CNUM,14,1e6		!14は接触コンダクタンスのこと CONTA174の リアルコンスタントのことらしい
		real,CNUM
		type,3		!要素ナンバー3のこと 3ということはtarge170
		cmsel,s,a_targ	!Cuの表面選択
		nsla,s,1	!選択されたエリアに関する節点の選択
		esurf		!既存の要素の自由表面に重ねて要素を生成とのこと
		type,5	!評価しない接触
		cmsel,s,a_cont	!はんだ下面の選択
		nsla,s,1	!選択されたエリアに関する節点の選択
		esurf
		allsel

		CNUM=CNUM+1
		allsel
		!Create Contact Pair
		asel,s,,,A12+3	!右側面を選択
		cm,a_cont,area	!a_contという名をつける
		asel,s,,,A9+5	!Cu表面を選択
		cm,a_targ,area	!a_targという名をつける  TARGがくっつける相手の（通常大きいほうの）面
		allsel
		r,CNUM
		rmodif,CNUM,14,1e6		!14は接触コンダクタンスのこと CONTA174の リアルコンスタントのことらしい
		real,CNUM
		type,3		!要素ナンバー3のこと 3ということはtarge170
		cmsel,s,a_targ	!Cuの表面選択
		nsla,s,1	!選択されたエリアに関する節点の選択
		esurf		!既存の要素の自由表面に重ねて要素を生成とのこと
		type,5	!評価しない接触
		cmsel,s,a_cont	!はんだ下面の選択
		nsla,s,1	!選択されたエリアに関する節点の選択
		esurf
		allsel

		CNUM=CNUM+1
		allsel
		!Create Contact Pair
		asel,s,,,A12+4	!後ろ面を選択
		cm,a_cont,area	!a_contという名をつける
		asel,s,,,A11+2	!Cu表面を選択
		cm,a_targ,area	!a_targという名をつける  TARGがくっつける相手の（通常大きいほうの）面
		allsel
		r,CNUM
		rmodif,CNUM,14,1e6		!14は接触コンダクタンスのこと CONTA174の リアルコンスタントのことらしい
		real,CNUM
		type,3		!要素ナンバー3のこと 3ということはtarge170
		cmsel,s,a_targ	!Cuの表面選択
		nsla,s,1	!選択されたエリアに関する節点の選択
		esurf		!既存の要素の自由表面に重ねて要素を生成とのこと
		type,5	!評価しない接触
		cmsel,s,a_cont	!はんだ下面の選択
		nsla,s,1	!選択されたエリアに関する節点の選択
		esurf
		allsel

!左上の樹脂
		CNUM=CNUM+1
		allsel
		!Create Contact Pair
		asel,s,,,A12+6+1	!下面を選択
		cm,a_cont,area	!a_contという名をつける
		asel,s,,,12	!Cu表面を選択
		cm,a_targ,area	!a_targという名をつける  TARGがくっつける相手の（通常大きいほうの）面
		allsel
		r,CNUM
		rmodif,CNUM,14,1e6		!14は接触コンダクタンスのこと CONTA174の リアルコンスタントのことらしい
		real,CNUM
		type,3		!要素ナンバー3のこと 3ということはtarge170
		cmsel,s,a_targ	!Cuの表面選択
		nsla,s,1	!選択されたエリアに関する節点の選択
		esurf		!既存の要素の自由表面に重ねて要素を生成とのこと
		type,8	!粗い樹脂と銅の接触
		cmsel,s,a_cont	!はんだ下面の選択
		nsla,s,1	!選択されたエリアに関する節点の選択
		esurf
		allsel

		CNUM=CNUM+1
		allsel
		!Create Contact Pair
		asel,s,,,A12+6+6	!上面を選択
		cm,a_cont,area	!a_contという名をつける
		asel,s,,,195	!Cu表面を選択
		cm,a_targ,area	!a_targという名をつける  TARGがくっつける相手の（通常大きいほうの）面
		allsel
		r,CNUM
		rmodif,CNUM,14,1e6		!14は接触コンダクタンスのこと CONTA174の リアルコンスタントのことらしい
		real,CNUM
		type,3		!要素ナンバー3のこと 3ということはtarge170
		cmsel,s,a_targ	!Cuの表面選択
		nsla,s,1	!選択されたエリアに関する節点の選択
		esurf		!既存の要素の自由表面に重ねて要素を生成とのこと
		type,8	!粗い樹脂と銅の接触
		cmsel,s,a_cont	!はんだ下面の選択
		nsla,s,1	!選択されたエリアに関する節点の選択
		esurf
		allsel

		CNUM=CNUM+1
		allsel
		!Create Contact Pair
		asel,s,,,A12+6+2	!前面を選択
		cm,a_cont,area	!a_contという名をつける
		asel,s,,,A11+4	!Cu表面を選択
		cm,a_targ,area	!a_targという名をつける  TARGがくっつける相手の（通常大きいほうの）面
		allsel
		r,CNUM
		rmodif,CNUM,14,1e6		!14は接触コンダクタンスのこと CONTA174の リアルコンスタントのことらしい
		real,CNUM
		type,3		!要素ナンバー3のこと 3ということはtarge170
		cmsel,s,a_targ	!Cuの表面選択
		nsla,s,1	!選択されたエリアに関する節点の選択
		esurf		!既存の要素の自由表面に重ねて要素を生成とのこと
		type,5	!評価しない接触
		cmsel,s,a_cont	!はんだ下面の選択
		nsla,s,1	!選択されたエリアに関する節点の選択
		esurf
		allsel

		CNUM=CNUM+1
		allsel
		!Create Contact Pair
		asel,s,,,A12+6+3	!右側面を選択
		cm,a_cont,area	!a_contという名をつける
		asel,s,,,A1+20+19	!Cu表面を選択
		cm,a_targ,area	!a_targという名をつける  TARGがくっつける相手の（通常大きいほうの）面
		allsel
		r,CNUM
		rmodif,CNUM,14,1e6		!14は接触コンダクタンスのこと CONTA174の リアルコンスタントのことらしい
		real,CNUM
		type,3		!要素ナンバー3のこと 3ということはtarge170
		cmsel,s,a_targ	!Cuの表面選択
		nsla,s,1	!選択されたエリアに関する節点の選択
		esurf		!既存の要素の自由表面に重ねて要素を生成とのこと
		type,5	!評価しない接触
		cmsel,s,a_cont	!はんだ下面の選択
		nsla,s,1	!選択されたエリアに関する節点の選択
		esurf
		allsel

		CNUM=CNUM+1
		allsel
		!Create Contact Pair
		asel,s,,,A12+6+3	!右側面を選択
		cm,a_cont,area	!a_contという名をつける
		asel,s,,,A2+16+16	!Cu表面を選択
		cm,a_targ,area	!a_targという名をつける  TARGがくっつける相手の（通常大きいほうの）面
		allsel
		r,CNUM
		rmodif,CNUM,14,1e6		!14は接触コンダクタンスのこと CONTA174の リアルコンスタントのことらしい
		real,CNUM
		type,3		!要素ナンバー3のこと 3ということはtarge170
		cmsel,s,a_targ	!Cuの表面選択
		nsla,s,1	!選択されたエリアに関する節点の選択
		esurf		!既存の要素の自由表面に重ねて要素を生成とのこと
		type,5	!評価しない接触
		cmsel,s,a_cont	!はんだ下面の選択
		nsla,s,1	!選択されたエリアに関する節点の選択
		esurf
		allsel

		CNUM=CNUM+1
		allsel
		!Create Contact Pair
		asel,s,,,A12+6+3	!右側面を選択
		cm,a_cont,area	!a_contという名をつける
		asel,s,,,A3+30+29	!Cu表面を選択
		cm,a_targ,area	!a_targという名をつける  TARGがくっつける相手の（通常大きいほうの）面
		allsel
		r,CNUM
		rmodif,CNUM,14,1e6		!14は接触コンダクタンスのこと CONTA174の リアルコンスタントのことらしい
		real,CNUM
		type,3		!要素ナンバー3のこと 3ということはtarge170
		cmsel,s,a_targ	!Cuの表面選択
		nsla,s,1	!選択されたエリアに関する節点の選択
		esurf		!既存の要素の自由表面に重ねて要素を生成とのこと
		type,5	!評価しない接触
		cmsel,s,a_cont	!はんだ下面の選択
		nsla,s,1	!選択されたエリアに関する節点の選択
		esurf
		allsel

		CNUM=CNUM+1
		allsel
		!Create Contact Pair
		asel,s,,,A12+6+3	!右側面を選択
		cm,a_cont,area	!a_contという名をつける
		asel,s,,,A5+27+24	!Cu表面を選択
		cm,a_targ,area	!a_targという名をつける  TARGがくっつける相手の（通常大きいほうの）面
		allsel
		r,CNUM
		rmodif,CNUM,14,1e6		!14は接触コンダクタンスのこと CONTA174の リアルコンスタントのことらしい
		real,CNUM
		type,3		!要素ナンバー3のこと 3ということはtarge170
		cmsel,s,a_targ	!Cuの表面選択
		nsla,s,1	!選択されたエリアに関する節点の選択
		esurf		!既存の要素の自由表面に重ねて要素を生成とのこと
		type,5	!評価しない接触
		cmsel,s,a_cont	!はんだ下面の選択
		nsla,s,1	!選択されたエリアに関する節点の選択
		esurf
		allsel

		CNUM=CNUM+1
		allsel
		!Create Contact Pair
		asel,s,,,A12+6+3	!右側面を選択
		cm,a_cont,area	!a_contという名をつける
		asel,s,,,A6+20+19	!Cu表面を選択
		cm,a_targ,area	!a_targという名をつける  TARGがくっつける相手の（通常大きいほうの）面
		allsel
		r,CNUM
		rmodif,CNUM,14,1e6		!14は接触コンダクタンスのこと CONTA174の リアルコンスタントのことらしい
		real,CNUM
		type,3		!要素ナンバー3のこと 3ということはtarge170
		cmsel,s,a_targ	!Cuの表面選択
		nsla,s,1	!選択されたエリアに関する節点の選択
		esurf		!既存の要素の自由表面に重ねて要素を生成とのこと
		type,5	!評価しない接触
		cmsel,s,a_cont	!はんだ下面の選択
		nsla,s,1	!選択されたエリアに関する節点の選択
		esurf
		allsel

		CNUM=CNUM+1
		allsel
		!Create Contact Pair
		asel,s,,,A12+6+3	!右側面を選択
		cm,a_cont,area	!a_contという名をつける
		asel,s,,,A7+16+16	!Cu表面を選択
		cm,a_targ,area	!a_targという名をつける  TARGがくっつける相手の（通常大きいほうの）面
		allsel
		r,CNUM
		rmodif,CNUM,14,1e6		!14は接触コンダクタンスのこと CONTA174の リアルコンスタントのことらしい
		real,CNUM
		type,3		!要素ナンバー3のこと 3ということはtarge170
		cmsel,s,a_targ	!Cuの表面選択
		nsla,s,1	!選択されたエリアに関する節点の選択
		esurf		!既存の要素の自由表面に重ねて要素を生成とのこと
		type,5	!評価しない接触
		cmsel,s,a_cont	!はんだ下面の選択
		nsla,s,1	!選択されたエリアに関する節点の選択
		esurf
		allsel

		CNUM=CNUM+1
		allsel
		!Create Contact Pair
		asel,s,,,A12+6+3	!右側面を選択
		cm,a_cont,area	!a_contという名をつける
		asel,s,,,A8+16+15	!Cu表面を選択
		cm,a_targ,area	!a_targという名をつける  TARGがくっつける相手の（通常大きいほうの）面
		allsel
		r,CNUM
		rmodif,CNUM,14,1e6		!14は接触コンダクタンスのこと CONTA174の リアルコンスタントのことらしい
		real,CNUM
		type,3		!要素ナンバー3のこと 3ということはtarge170
		cmsel,s,a_targ	!Cuの表面選択
		nsla,s,1	!選択されたエリアに関する節点の選択
		esurf		!既存の要素の自由表面に重ねて要素を生成とのこと
		type,5	!評価しない接触
		cmsel,s,a_cont	!はんだ下面の選択
		nsla,s,1	!選択されたエリアに関する節点の選択
		esurf
		allsel

		CNUM=CNUM+1
		allsel
		!Create Contact Pair
		asel,s,,,A12+6+3	!右側面を選択
		cm,a_cont,area	!a_contという名をつける
		asel,s,,,A9+6+5	!Cu表面を選択
		cm,a_targ,area	!a_targという名をつける  TARGがくっつける相手の（通常大きいほうの）面
		allsel
		r,CNUM
		rmodif,CNUM,14,1e6		!14は接触コンダクタンスのこと CONTA174の リアルコンスタントのことらしい
		real,CNUM
		type,3		!要素ナンバー3のこと 3ということはtarge170
		cmsel,s,a_targ	!Cuの表面選択
		nsla,s,1	!選択されたエリアに関する節点の選択
		esurf		!既存の要素の自由表面に重ねて要素を生成とのこと
		type,5	!評価しない接触
		cmsel,s,a_cont	!はんだ下面の選択
		nsla,s,1	!選択されたエリアに関する節点の選択
		esurf
		allsel

!O側中央下(信号側)
		CNUM=CNUM+1
		allsel
		!Create Contact Pair
		asel,s,,,A12+12+1	!下面を選択
		cm,a_cont,area	!a_contという名をつける
		asel,s,,,12	!Cu表面を選択
		cm,a_targ,area	!a_targという名をつける  TARGがくっつける相手の（通常大きいほうの）面
		allsel
		r,CNUM
		rmodif,CNUM,14,1e6		!14は接触コンダクタンスのこと CONTA174の リアルコンスタントのことらしい
		real,CNUM
		type,3		!要素ナンバー3のこと 3ということはtarge170
		cmsel,s,a_targ	!Cuの表面選択
		nsla,s,1	!選択されたエリアに関する節点の選択
		esurf		!既存の要素の自由表面に重ねて要素を生成とのこと
		type,8	!粗い樹脂と銅の接触
		cmsel,s,a_cont	!はんだ下面の選択
		nsla,s,1	!選択されたエリアに関する節点の選択
		esurf
		allsel

		CNUM=CNUM+1
		allsel
		!Create Contact Pair
		asel,s,,,A12+12+1	!下面を選択
		cm,a_cont,area	!a_contという名をつける
		asel,s,,,18	!Cu表面を選択
		cm,a_targ,area	!a_targという名をつける  TARGがくっつける相手の（通常大きいほうの）面
		allsel
		r,CNUM
		rmodif,CNUM,14,1e6		!14は接触コンダクタンスのこと CONTA174の リアルコンスタントのことらしい
		real,CNUM
		type,3		!要素ナンバー3のこと 3ということはtarge170
		cmsel,s,a_targ	!Cuの表面選択
		nsla,s,1	!選択されたエリアに関する節点の選択
		esurf		!既存の要素の自由表面に重ねて要素を生成とのこと
		type,8	!粗い樹脂と銅の接触
		cmsel,s,a_cont	!はんだ下面の選択
		nsla,s,1	!選択されたエリアに関する節点の選択
		esurf
		allsel

		CNUM=CNUM+1
		allsel
		!Create Contact Pair
		asel,s,,,A12+12+1	!下面を選択
		cm,a_cont,area	!a_contという名をつける
		asel,s,,,24	!Cu表面を選択
		cm,a_targ,area	!a_targという名をつける  TARGがくっつける相手の（通常大きいほうの）面
		allsel
		r,CNUM
		rmodif,CNUM,14,1e6		!14は接触コンダクタンスのこと CONTA174の リアルコンスタントのことらしい
		real,CNUM
		type,3		!要素ナンバー3のこと 3ということはtarge170
		cmsel,s,a_targ	!Cuの表面選択
		nsla,s,1	!選択されたエリアに関する節点の選択
		esurf		!既存の要素の自由表面に重ねて要素を生成とのこと
		type,8	!粗い樹脂と銅の接触
		cmsel,s,a_cont	!はんだ下面の選択
		nsla,s,1	!選択されたエリアに関する節点の選択
		esurf
		allsel

		CNUM=CNUM+1
		allsel
		!Create Contact Pair
		asel,s,,,A12+12+1	!下面を選択
		cm,a_cont,area	!a_contという名をつける
		asel,s,,,108	!Cu表面を選択
		cm,a_targ,area	!a_targという名をつける  TARGがくっつける相手の（通常大きいほうの）面
		allsel
		r,CNUM
		rmodif,CNUM,14,1e6		!14は接触コンダクタンスのこと CONTA174の リアルコンスタントのことらしい
		real,CNUM
		type,3		!要素ナンバー3のこと 3ということはtarge170
		cmsel,s,a_targ	!Cuの表面選択
		nsla,s,1	!選択されたエリアに関する節点の選択
		esurf		!既存の要素の自由表面に重ねて要素を生成とのこと
		type,5	!評価しない接触
		cmsel,s,a_cont	!はんだ下面の選択
		nsla,s,1	!選択されたエリアに関する節点の選択
		esurf
		allsel

		CNUM=CNUM+1
		allsel
		!Create Contact Pair
		asel,s,,,A12+12+1	!下面を選択
		cm,a_cont,area	!a_contという名をつける
		asel,s,,,126	!Cu表面を選択
		cm,a_targ,area	!a_targという名をつける  TARGがくっつける相手の（通常大きいほうの）面
		allsel
		r,CNUM
		rmodif,CNUM,14,1e6		!14は接触コンダクタンスのこと CONTA174の リアルコンスタントのことらしい
		real,CNUM
		type,3		!要素ナンバー3のこと 3ということはtarge170
		cmsel,s,a_targ	!Cuの表面選択
		nsla,s,1	!選択されたエリアに関する節点の選択
		esurf		!既存の要素の自由表面に重ねて要素を生成とのこと
		type,5	!評価しない接触
		cmsel,s,a_cont	!はんだ下面の選択
		nsla,s,1	!選択されたエリアに関する節点の選択
		esurf
		allsel

		CNUM=CNUM+1
		allsel
		!Create Contact Pair
		asel,s,,,A12+12+6	!上面を選択
		cm,a_cont,area	!a_contという名をつける
		asel,s,,,195	!Cu表面を選択
		cm,a_targ,area	!a_targという名をつける  TARGがくっつける相手の（通常大きいほうの）面
		allsel
		r,CNUM
		rmodif,CNUM,14,1e6		!14は接触コンダクタンスのこと CONTA174の リアルコンスタントのことらしい
		real,CNUM
		type,3		!要素ナンバー3のこと 3ということはtarge170
		cmsel,s,a_targ	!Cuの表面選択
		nsla,s,1	!選択されたエリアに関する節点の選択
		esurf		!既存の要素の自由表面に重ねて要素を生成とのこと
		type,8	!粗い樹脂と銅の接触
		cmsel,s,a_cont	!はんだ下面の選択
		nsla,s,1	!選択されたエリアに関する節点の選択
		esurf
		allsel

		CNUM=CNUM+1
		allsel
		!Create Contact Pair
		asel,s,,,A12+12+6	!上面を選択
		cm,a_cont,area	!a_contという名をつける
		asel,s,,,207	!Cu表面を選択
		cm,a_targ,area	!a_targという名をつける  TARGがくっつける相手の（通常大きいほうの）面
		allsel
		r,CNUM
		rmodif,CNUM,14,1e6		!14は接触コンダクタンスのこと CONTA174の リアルコンスタントのことらしい
		real,CNUM
		type,3		!要素ナンバー3のこと 3ということはtarge170
		cmsel,s,a_targ	!Cuの表面選択
		nsla,s,1	!選択されたエリアに関する節点の選択
		esurf		!既存の要素の自由表面に重ねて要素を生成とのこと
		type,8	!粗い樹脂と銅の接触
		cmsel,s,a_cont	!はんだ下面の選択
		nsla,s,1	!選択されたエリアに関する節点の選択
		esurf
		allsel

		CNUM=CNUM+1
		allsel
		!Create Contact Pair
		asel,s,,,A12+12+6	!上面を選択
		cm,a_cont,area	!a_contという名をつける
		asel,s,,,243	!Cu表面を選択
		cm,a_targ,area	!a_targという名をつける  TARGがくっつける相手の（通常大きいほうの）面
		allsel
		r,CNUM
		rmodif,CNUM,14,1e6		!14は接触コンダクタンスのこと CONTA174の リアルコンスタントのことらしい
		real,CNUM
		type,3		!要素ナンバー3のこと 3ということはtarge170
		cmsel,s,a_targ	!Cuの表面選択
		nsla,s,1	!選択されたエリアに関する節点の選択
		esurf		!既存の要素の自由表面に重ねて要素を生成とのこと
		type,5	!評価しない接触
		cmsel,s,a_cont	!はんだ下面の選択
		nsla,s,1	!選択されたエリアに関する節点の選択
		esurf
		allsel

		CNUM=CNUM+1
		allsel
		!Create Contact Pair
		asel,s,,,A12+12+6	!上面を選択
		cm,a_cont,area	!a_contという名をつける
		asel,s,,,249	!Cu表面を選択
		cm,a_targ,area	!a_targという名をつける  TARGがくっつける相手の（通常大きいほうの）面
		allsel
		r,CNUM
		rmodif,CNUM,14,1e6		!14は接触コンダクタンスのこと CONTA174の リアルコンスタントのことらしい
		real,CNUM
		type,3		!要素ナンバー3のこと 3ということはtarge170
		cmsel,s,a_targ	!Cuの表面選択
		nsla,s,1	!選択されたエリアに関する節点の選択
		esurf		!既存の要素の自由表面に重ねて要素を生成とのこと
		type,5	!評価しない接触
		cmsel,s,a_cont	!はんだ下面の選択
		nsla,s,1	!選択されたエリアに関する節点の選択
		esurf
		allsel

		CNUM=CNUM+1
		allsel
		!Create Contact Pair
		asel,s,,,A12+12+3	!右面を選択
		cm,a_cont,area	!a_contという名をつける
		asel,s,,,ABASE-32+5	!Cu表面を選択
		cm,a_targ,area	!a_targという名をつける  TARGがくっつける相手の（通常大きいほうの）面
		allsel
		r,CNUM
		rmodif,CNUM,14,1e6		!14は接触コンダクタンスのこと CONTA174の リアルコンスタントのことらしい
		real,CNUM
		type,3		!要素ナンバー3のこと 3ということはtarge170
		cmsel,s,a_targ	!Cuの表面選択
		nsla,s,1	!選択されたエリアに関する節点の選択
		esurf		!既存の要素の自由表面に重ねて要素を生成とのこと
		TYPE,5	!はんだと樹脂接触
		cmsel,s,a_cont	!はんだ下面の選択
		nsla,s,1	!選択されたエリアに関する節点の選択
		esurf
		allsel

		CNUM=CNUM+1
		allsel
		!Create Contact Pair
		asel,s,,,A12+12+3	!右面を選択
		cm,a_cont,area	!a_contという名をつける
		asel,s,,,ABASE-32+11	!Cu表面を選択
		cm,a_targ,area	!a_targという名をつける  TARGがくっつける相手の（通常大きいほうの）面
		allsel
		r,CNUM
		rmodif,CNUM,14,1e6		!14は接触コンダクタンスのこと CONTA174の リアルコンスタントのことらしい
		real,CNUM
		type,3		!要素ナンバー3のこと 3ということはtarge170
		cmsel,s,a_targ	!Cuの表面選択
		nsla,s,1	!選択されたエリアに関する節点の選択
		esurf		!既存の要素の自由表面に重ねて要素を生成とのこと
		type,8	!粗い樹脂と銅の接触
		cmsel,s,a_cont	!はんだ下面の選択
		nsla,s,1	!選択されたエリアに関する節点の選択
		esurf
		allsel

		CNUM=CNUM+1
		allsel
		!Create Contact Pair
		asel,s,,,A12+12+3	!右面を選択
		cm,a_cont,area	!a_contという名をつける
		asel,s,,,ABASE-32+16	!Cu表面を選択
		cm,a_targ,area	!a_targという名をつける  TARGがくっつける相手の（通常大きいほうの）面
		allsel
		r,CNUM
		rmodif,CNUM,14,1e6		!14は接触コンダクタンスのこと CONTA174の リアルコンスタントのことらしい
		real,CNUM
		type,3		!要素ナンバー3のこと 3ということはtarge170
		cmsel,s,a_targ	!Cuの表面選択
		nsla,s,1	!選択されたエリアに関する節点の選択
		esurf		!既存の要素の自由表面に重ねて要素を生成とのこと
		TYPE,5	!はんだと樹脂接触
		cmsel,s,a_cont	!はんだ下面の選択
		nsla,s,1	!選択されたエリアに関する節点の選択
		esurf
		allsel

		CNUM=CNUM+1
		allsel
		!Create Contact Pair
		asel,s,,,A12+12+4	!後ろ面を選択
		cm,a_cont,area	!a_contという名をつける
		asel,s,,,A11+2	!Cu表面を選択
		cm,a_targ,area	!a_targという名をつける  TARGがくっつける相手の（通常大きいほうの）面
		allsel
		r,CNUM
		rmodif,CNUM,14,1e6		!14は接触コンダクタンスのこと CONTA174の リアルコンスタントのことらしい
		real,CNUM
		type,3		!要素ナンバー3のこと 3ということはtarge170
		cmsel,s,a_targ	!Cuの表面選択
		nsla,s,1	!選択されたエリアに関する節点の選択
		esurf		!既存の要素の自由表面に重ねて要素を生成とのこと
		type,5	!評価しない接触
		cmsel,s,a_cont	!はんだ下面の選択
		nsla,s,1	!選択されたエリアに関する節点の選択
		esurf
		allsel

		kk=MOD(PARA+1,2)	!奇数0 偶数1
		mm=MOD(PARA,2)	!奇数1 偶数0

		CNUM=CNUM+1
		allsel
		!Create Contact Pair
		asel,s,,,A12+12+5	!後ろ面を選択
		cm,a_cont,area	!a_contという名をつける
		asel,s,,,A1+(PARA-1-kk)*20+8	!Cu表面を選択
		cm,a_targ,area	!a_targという名をつける  TARGがくっつける相手の（通常大きいほうの）面
		allsel
		r,CNUM
		rmodif,CNUM,14,1e6		!14は接触コンダクタンスのこと CONTA174の リアルコンスタントのことらしい
		real,CNUM
		type,3		!要素ナンバー3のこと 3ということはtarge170
		cmsel,s,a_targ	!Cuの表面選択
		nsla,s,1	!選択されたエリアに関する節点の選択
		esurf		!既存の要素の自由表面に重ねて要素を生成とのこと
		type,5	!評価しない接触
		cmsel,s,a_cont	!はんだ下面の選択
		nsla,s,1	!選択されたエリアに関する節点の選択
		esurf
		allsel

		CNUM=CNUM+1
		allsel
		!Create Contact Pair
		asel,s,,,A12+12+5	!後ろ面を選択
		cm,a_cont,area	!a_contという名をつける
		asel,s,,,A2+(PARA-1-kk)*16+7	!Cu表面を選択
		cm,a_targ,area	!a_targという名をつける  TARGがくっつける相手の（通常大きいほうの）面
		allsel
		r,CNUM
		rmodif,CNUM,14,1e6		!14は接触コンダクタンスのこと CONTA174の リアルコンスタントのことらしい
		real,CNUM
		type,3		!要素ナンバー3のこと 3ということはtarge170
		cmsel,s,a_targ	!Cuの表面選択
		nsla,s,1	!選択されたエリアに関する節点の選択
		esurf		!既存の要素の自由表面に重ねて要素を生成とのこと
		type,5	!評価しない接触
		cmsel,s,a_cont	!はんだ下面の選択
		nsla,s,1	!選択されたエリアに関する節点の選択
		esurf
		allsel

		CNUM=CNUM+1
		allsel
		!Create Contact Pair
		asel,s,,,A12+12+5	!後ろ面を選択
		cm,a_cont,area	!a_contという名をつける
		asel,s,,,A3+(PARA-1-kk)*30+18	!Cu表面を選択
		cm,a_targ,area	!a_targという名をつける  TARGがくっつける相手の（通常大きいほうの）面
		allsel
		r,CNUM
		rmodif,CNUM,14,1e6		!14は接触コンダクタンスのこと CONTA174の リアルコンスタントのことらしい
		real,CNUM
		type,3		!要素ナンバー3のこと 3ということはtarge170
		cmsel,s,a_targ	!Cuの表面選択
		nsla,s,1	!選択されたエリアに関する節点の選択
		esurf		!既存の要素の自由表面に重ねて要素を生成とのこと
		type,5	!評価しない接触
		cmsel,s,a_cont	!はんだ下面の選択
		nsla,s,1	!選択されたエリアに関する節点の選択
		esurf
		allsel

		CNUM=CNUM+1
		allsel
		!Create Contact Pair
		asel,s,,,A12+12+5	!後ろ面を選択
		cm,a_cont,area	!a_contという名をつける
		asel,s,,,A4+(PARA-1-kk)*4+3	!Cu表面を選択
		cm,a_targ,area	!a_targという名をつける  TARGがくっつける相手の（通常大きいほうの）面
		allsel
		r,CNUM
		rmodif,CNUM,14,1e6		!14は接触コンダクタンスのこと CONTA174の リアルコンスタントのことらしい
		real,CNUM
		type,3		!要素ナンバー3のこと 3ということはtarge170
		cmsel,s,a_targ	!Cuの表面選択
		nsla,s,1	!選択されたエリアに関する節点の選択
		esurf		!既存の要素の自由表面に重ねて要素を生成とのこと
		type,5	!評価しない接触
		cmsel,s,a_cont	!はんだ下面の選択
		nsla,s,1	!選択されたエリアに関する節点の選択
		esurf
		allsel

		CNUM=CNUM+1
		allsel
		!Create Contact Pair
		asel,s,,,A12+12+5	!後ろ面を選択
		cm,a_cont,area	!a_contという名をつける
		asel,s,,,A5+(PARA-1-kk)*27+15	!Cu表面を選択
		cm,a_targ,area	!a_targという名をつける  TARGがくっつける相手の（通常大きいほうの）面
		allsel
		r,CNUM
		rmodif,CNUM,14,1e6		!14は接触コンダクタンスのこと CONTA174の リアルコンスタントのことらしい
		real,CNUM
		type,3		!要素ナンバー3のこと 3ということはtarge170
		cmsel,s,a_targ	!Cuの表面選択
		nsla,s,1	!選択されたエリアに関する節点の選択
		esurf		!既存の要素の自由表面に重ねて要素を生成とのこと
		type,5	!評価しない接触
		cmsel,s,a_cont	!はんだ下面の選択
		nsla,s,1	!選択されたエリアに関する節点の選択
		esurf
		allsel

		CNUM=CNUM+1
		allsel
		!Create Contact Pair
		asel,s,,,A12+12+5	!後ろ面を選択
		cm,a_cont,area	!a_contという名をつける
		asel,s,,,A5+(PARA-1-kk)*27+27	!Cu表面を選択
		cm,a_targ,area	!a_targという名をつける  TARGがくっつける相手の（通常大きいほうの）面
		allsel
		r,CNUM
		rmodif,CNUM,14,1e6		!14は接触コンダクタンスのこと CONTA174の リアルコンスタントのことらしい
		real,CNUM
		type,3		!要素ナンバー3のこと 3ということはtarge170
		cmsel,s,a_targ	!Cuの表面選択
		nsla,s,1	!選択されたエリアに関する節点の選択
		esurf		!既存の要素の自由表面に重ねて要素を生成とのこと
		type,5	!評価しない接触
		cmsel,s,a_cont	!はんだ下面の選択
		nsla,s,1	!選択されたエリアに関する節点の選択
		esurf
		allsel

		CNUM=CNUM+1
		allsel
		!Create Contact Pair
		asel,s,,,A12+12+5	!後ろ面を選択
		cm,a_cont,area	!a_contという名をつける
		asel,s,,,A6+(PARA-1-kk)*20+8	!Cu表面を選択
		cm,a_targ,area	!a_targという名をつける  TARGがくっつける相手の（通常大きいほうの）面
		allsel
		r,CNUM
		rmodif,CNUM,14,1e6		!14は接触コンダクタンスのこと CONTA174の リアルコンスタントのことらしい
		real,CNUM
		type,3		!要素ナンバー3のこと 3ということはtarge170
		cmsel,s,a_targ	!Cuの表面選択
		nsla,s,1	!選択されたエリアに関する節点の選択
		esurf		!既存の要素の自由表面に重ねて要素を生成とのこと
		type,5	!評価しない接触
		cmsel,s,a_cont	!はんだ下面の選択
		nsla,s,1	!選択されたエリアに関する節点の選択
		esurf
		allsel

		CNUM=CNUM+1
		allsel
		!Create Contact Pair
		asel,s,,,A12+12+5	!後ろ面を選択
		cm,a_cont,area	!a_contという名をつける
		asel,s,,,A7+(PARA-1-kk)*16+7	!Cu表面を選択
		cm,a_targ,area	!a_targという名をつける  TARGがくっつける相手の（通常大きいほうの）面
		allsel
		r,CNUM
		rmodif,CNUM,14,1e6		!14は接触コンダクタンスのこと CONTA174の リアルコンスタントのことらしい
		real,CNUM
		type,3		!要素ナンバー3のこと 3ということはtarge170
		cmsel,s,a_targ	!Cuの表面選択
		nsla,s,1	!選択されたエリアに関する節点の選択
		esurf		!既存の要素の自由表面に重ねて要素を生成とのこと
		type,5	!評価しない接触
		cmsel,s,a_cont	!はんだ下面の選択
		nsla,s,1	!選択されたエリアに関する節点の選択
		esurf
		allsel

		CNUM=CNUM+1
		allsel
		!Create Contact Pair
		asel,s,,,A12+12+5	!後ろ面を選択
		cm,a_cont,area	!a_contという名をつける
		asel,s,,,A8+(PARA-1-kk)*16+6	!Cu表面を選択
		cm,a_targ,area	!a_targという名をつける  TARGがくっつける相手の（通常大きいほうの）面
		allsel
		r,CNUM
		rmodif,CNUM,14,1e6		!14は接触コンダクタンスのこと CONTA174の リアルコンスタントのことらしい
		real,CNUM
		type,3		!要素ナンバー3のこと 3ということはtarge170
		cmsel,s,a_targ	!Cuの表面選択
		nsla,s,1	!選択されたエリアに関する節点の選択
		esurf		!既存の要素の自由表面に重ねて要素を生成とのこと
		type,5	!評価しない接触
		cmsel,s,a_cont	!はんだ下面の選択
		nsla,s,1	!選択されたエリアに関する節点の選択
		esurf
		allsel

		CNUM=CNUM+1
		allsel
		!Create Contact Pair
		asel,s,,,A12+12+5	!後ろ面を選択
		cm,a_cont,area	!a_contという名をつける
		asel,s,,,A9+(PARA-1-kk)*6+3	!Cu表面を選択
		cm,a_targ,area	!a_targという名をつける  TARGがくっつける相手の（通常大きいほうの）面
		allsel
		r,CNUM
		rmodif,CNUM,14,1e6		!14は接触コンダクタンスのこと CONTA174の リアルコンスタントのことらしい
		real,CNUM
		type,3		!要素ナンバー3のこと 3ということはtarge170
		cmsel,s,a_targ	!Cuの表面選択
		nsla,s,1	!選択されたエリアに関する節点の選択
		esurf		!既存の要素の自由表面に重ねて要素を生成とのこと
		type,5	!評価しない接触
		cmsel,s,a_cont	!はんだ下面の選択
		nsla,s,1	!選択されたエリアに関する節点の選択
		esurf
		allsel

!O列右上
		CNUM=CNUM+1
		allsel
		!Create Contact Pair
		asel,s,,,A12+18+1	!下面を選択
		cm,a_cont,area	!a_contという名をつける
		asel,s,,,12	!Cu表面を選択
		cm,a_targ,area	!a_targという名をつける  TARGがくっつける相手の（通常大きいほうの）面
		allsel
		r,CNUM
		rmodif,CNUM,14,1e6		!14は接触コンダクタンスのこと CONTA174の リアルコンスタントのことらしい
		real,CNUM
		type,3		!要素ナンバー3のこと 3ということはtarge170
		cmsel,s,a_targ	!Cuの表面選択
		nsla,s,1	!選択されたエリアに関する節点の選択
		esurf		!既存の要素の自由表面に重ねて要素を生成とのこと
		type,8	!粗い樹脂と銅の接触
		cmsel,s,a_cont	!はんだ下面の選択
		nsla,s,1	!選択されたエリアに関する節点の選択
		esurf
		allsel

		CNUM=CNUM+1
		allsel
		!Create Contact Pair
		asel,s,,,A12+18+1	!下面を選択
		cm,a_cont,area	!a_contという名をつける
		asel,s,,,18	!Cu表面を選択
		cm,a_targ,area	!a_targという名をつける  TARGがくっつける相手の（通常大きいほうの）面
		allsel
		r,CNUM
		rmodif,CNUM,14,1e6		!14は接触コンダクタンスのこと CONTA174の リアルコンスタントのことらしい
		real,CNUM
		type,3		!要素ナンバー3のこと 3ということはtarge170
		cmsel,s,a_targ	!Cuの表面選択
		nsla,s,1	!選択されたエリアに関する節点の選択
		esurf		!既存の要素の自由表面に重ねて要素を生成とのこと
		type,8	!粗い樹脂と銅の接触
		cmsel,s,a_cont	!はんだ下面の選択
		nsla,s,1	!選択されたエリアに関する節点の選択
		esurf
		allsel

		CNUM=CNUM+1
		allsel
		!Create Contact Pair
		asel,s,,,A12+18+1	!下面を選択
		cm,a_cont,area	!a_contという名をつける
		asel,s,,,24	!Cu表面を選択
		cm,a_targ,area	!a_targという名をつける  TARGがくっつける相手の（通常大きいほうの）面
		allsel
		r,CNUM
		rmodif,CNUM,14,1e6		!14は接触コンダクタンスのこと CONTA174の リアルコンスタントのことらしい
		real,CNUM
		type,3		!要素ナンバー3のこと 3ということはtarge170
		cmsel,s,a_targ	!Cuの表面選択
		nsla,s,1	!選択されたエリアに関する節点の選択
		esurf		!既存の要素の自由表面に重ねて要素を生成とのこと
		type,8	!粗い樹脂と銅の接触
		cmsel,s,a_cont	!はんだ下面の選択
		nsla,s,1	!選択されたエリアに関する節点の選択
		esurf
		allsel

		CNUM=CNUM+1
		allsel
		!Create Contact Pair
		asel,s,,,A12+18+1	!下面を選択
		cm,a_cont,area	!a_contという名をつける
		asel,s,,,42	!Cu表面を選択
		cm,a_targ,area	!a_targという名をつける  TARGがくっつける相手の（通常大きいほうの）面
		allsel
		r,CNUM
		rmodif,CNUM,14,1e6		!14は接触コンダクタンスのこと CONTA174の リアルコンスタントのことらしい
		real,CNUM
		type,3		!要素ナンバー3のこと 3ということはtarge170
		cmsel,s,a_targ	!Cuの表面選択
		nsla,s,1	!選択されたエリアに関する節点の選択
		esurf		!既存の要素の自由表面に重ねて要素を生成とのこと
		type,8	!粗い樹脂と銅の接触
		cmsel,s,a_cont	!はんだ下面の選択
		nsla,s,1	!選択されたエリアに関する節点の選択
		esurf
		allsel

		CNUM=CNUM+1
		allsel
		!Create Contact Pair
		asel,s,,,A12+18+1	!下面を選択
		cm,a_cont,area	!a_contという名をつける
		asel,s,,,108	!Cu表面を選択
		cm,a_targ,area	!a_targという名をつける  TARGがくっつける相手の（通常大きいほうの）面
		allsel
		r,CNUM
		rmodif,CNUM,14,1e6		!14は接触コンダクタンスのこと CONTA174の リアルコンスタントのことらしい
		real,CNUM
		type,3		!要素ナンバー3のこと 3ということはtarge170
		cmsel,s,a_targ	!Cuの表面選択
		nsla,s,1	!選択されたエリアに関する節点の選択
		esurf		!既存の要素の自由表面に重ねて要素を生成とのこと
		type,5	!評価しない接触
		cmsel,s,a_cont	!はんだ下面の選択
		nsla,s,1	!選択されたエリアに関する節点の選択
		esurf
		allsel

		CNUM=CNUM+1
		allsel
		!Create Contact Pair
		asel,s,,,A12+18+1	!下面を選択
		cm,a_cont,area	!a_contという名をつける
		asel,s,,,126	!Cu表面を選択
		cm,a_targ,area	!a_targという名をつける  TARGがくっつける相手の（通常大きいほうの）面
		allsel
		r,CNUM
		rmodif,CNUM,14,1e6		!14は接触コンダクタンスのこと CONTA174の リアルコンスタントのことらしい
		real,CNUM
		type,3		!要素ナンバー3のこと 3ということはtarge170
		cmsel,s,a_targ	!Cuの表面選択
		nsla,s,1	!選択されたエリアに関する節点の選択
		esurf		!既存の要素の自由表面に重ねて要素を生成とのこと
		type,5	!評価しない接触
		cmsel,s,a_cont	!はんだ下面の選択
		nsla,s,1	!選択されたエリアに関する節点の選択
		esurf
		allsel

		CNUM=CNUM+1
		allsel
		!Create Contact Pair
		asel,s,,,A12+18+6	!上面を選択
		cm,a_cont,area	!a_contという名をつける
		asel,s,,,195	!Cu表面を選択
		cm,a_targ,area	!a_targという名をつける  TARGがくっつける相手の（通常大きいほうの）面
		allsel
		r,CNUM
		rmodif,CNUM,14,1e6		!14は接触コンダクタンスのこと CONTA174の リアルコンスタントのことらしい
		real,CNUM
		type,3		!要素ナンバー3のこと 3ということはtarge170
		cmsel,s,a_targ	!Cuの表面選択
		nsla,s,1	!選択されたエリアに関する節点の選択
		esurf		!既存の要素の自由表面に重ねて要素を生成とのこと
		type,8	!粗い樹脂と銅の接触
		cmsel,s,a_cont	!はんだ下面の選択
		nsla,s,1	!選択されたエリアに関する節点の選択
		esurf
		allsel

		CNUM=CNUM+1
		allsel
		!Create Contact Pair
		asel,s,,,A12+18+6	!上面を選択
		cm,a_cont,area	!a_contという名をつける
		asel,s,,,201	!Cu表面を選択
		cm,a_targ,area	!a_targという名をつける  TARGがくっつける相手の（通常大きいほうの）面
		allsel
		r,CNUM
		rmodif,CNUM,14,1e6		!14は接触コンダクタンスのこと CONTA174の リアルコンスタントのことらしい
		real,CNUM
		type,3		!要素ナンバー3のこと 3ということはtarge170
		cmsel,s,a_targ	!Cuの表面選択
		nsla,s,1	!選択されたエリアに関する節点の選択
		esurf		!既存の要素の自由表面に重ねて要素を生成とのこと
		type,8	!粗い樹脂と銅の接触
		cmsel,s,a_cont	!はんだ下面の選択
		nsla,s,1	!選択されたエリアに関する節点の選択
		esurf
		allsel

		CNUM=CNUM+1
		allsel
		!Create Contact Pair
		asel,s,,,A12+18+6	!上面を選択
		cm,a_cont,area	!a_contという名をつける
		asel,s,,,207	!Cu表面を選択
		cm,a_targ,area	!a_targという名をつける  TARGがくっつける相手の（通常大きいほうの）面
		allsel
		r,CNUM
		rmodif,CNUM,14,1e6		!14は接触コンダクタンスのこと CONTA174の リアルコンスタントのことらしい
		real,CNUM
		type,3		!要素ナンバー3のこと 3ということはtarge170
		cmsel,s,a_targ	!Cuの表面選択
		nsla,s,1	!選択されたエリアに関する節点の選択
		esurf		!既存の要素の自由表面に重ねて要素を生成とのこと
		type,8	!粗い樹脂と銅の接触
		cmsel,s,a_cont	!はんだ下面の選択
		nsla,s,1	!選択されたエリアに関する節点の選択
		esurf
		allsel

*DO,ii,1,3,1
		CNUM=CNUM+1
		allsel
		!Create Contact Pair
		asel,s,,,A12+18+6	!上面を選択
		cm,a_cont,area	!a_contという名をつける
		asel,s,,,243+(ii-1)*6	!Cu表面を選択
		cm,a_targ,area	!a_targという名をつける  TARGがくっつける相手の（通常大きいほうの）面
		allsel
		r,CNUM
		rmodif,CNUM,14,1e6		!14は接触コンダクタンスのこと CONTA174の リアルコンスタントのことらしい
		real,CNUM
		type,3		!要素ナンバー3のこと 3ということはtarge170
		cmsel,s,a_targ	!Cuの表面選択
		nsla,s,1	!選択されたエリアに関する節点の選択
		esurf		!既存の要素の自由表面に重ねて要素を生成とのこと
		type,5	!評価しない接触
		cmsel,s,a_cont	!はんだ下面の選択
		nsla,s,1	!選択されたエリアに関する節点の選択
		esurf
		allsel
*ENDDO

		CNUM=CNUM+1
		allsel
		!Create Contact Pair
		asel,s,,,A12+18+2	!前面を選択
		cm,a_cont,area	!a_contという名をつける
		asel,s,,,A11+4	!Cu表面を選択
		cm,a_targ,area	!a_targという名をつける  TARGがくっつける相手の（通常大きいほうの）面
		allsel
		r,CNUM
		rmodif,CNUM,14,1e6		!14は接触コンダクタンスのこと CONTA174の リアルコンスタントのことらしい
		real,CNUM
		type,3		!要素ナンバー3のこと 3ということはtarge170
		cmsel,s,a_targ	!Cuの表面選択
		nsla,s,1	!選択されたエリアに関する節点の選択
		esurf		!既存の要素の自由表面に重ねて要素を生成とのこと
		type,5	!評価しない接触
		cmsel,s,a_cont	!はんだ下面の選択
		nsla,s,1	!選択されたエリアに関する節点の選択
		esurf
		allsel

		CNUM=CNUM+1
		allsel
		!Create Contact Pair
		asel,s,,,A12+18+3	!右面を選択
		cm,a_cont,area	!a_contという名をつける
		asel,s,,,ABASE-32+16+5	!Cu表面を選択
		cm,a_targ,area	!a_targという名をつける  TARGがくっつける相手の（通常大きいほうの）面
		allsel
		r,CNUM
		rmodif,CNUM,14,1e6		!14は接触コンダクタンスのこと CONTA174の リアルコンスタントのことらしい
		real,CNUM
		type,3		!要素ナンバー3のこと 3ということはtarge170
		cmsel,s,a_targ	!Cuの表面選択
		nsla,s,1	!選択されたエリアに関する節点の選択
		esurf		!既存の要素の自由表面に重ねて要素を生成とのこと
		TYPE,5	!樹脂とはんだの接触
		cmsel,s,a_cont	!はんだ下面の選択
		nsla,s,1	!選択されたエリアに関する節点の選択
		esurf
		allsel

		CNUM=CNUM+1
		allsel
		!Create Contact Pair
		asel,s,,,A12+18+3	!右面を選択
		cm,a_cont,area	!a_contという名をつける
		asel,s,,,ABASE-32+16+11	!Cu表面を選択
		cm,a_targ,area	!a_targという名をつける  TARGがくっつける相手の（通常大きいほうの）面
		allsel
		r,CNUM
		rmodif,CNUM,14,1e6		!14は接触コンダクタンスのこと CONTA174の リアルコンスタントのことらしい
		real,CNUM
		type,3		!要素ナンバー3のこと 3ということはtarge170
		cmsel,s,a_targ	!Cuの表面選択
		nsla,s,1	!選択されたエリアに関する節点の選択
		esurf		!既存の要素の自由表面に重ねて要素を生成とのこと
		type,8	!粗い樹脂と銅の接触
		cmsel,s,a_cont	!はんだ下面の選択
		nsla,s,1	!選択されたエリアに関する節点の選択
		esurf
		allsel

		CNUM=CNUM+1
		allsel
		!Create Contact Pair
		asel,s,,,A12+18+3	!右面を選択
		cm,a_cont,area	!a_contという名をつける
		asel,s,,,ABASE-32+16+16	!Cu表面を選択
		cm,a_targ,area	!a_targという名をつける  TARGがくっつける相手の（通常大きいほうの）面
		allsel
		r,CNUM
		rmodif,CNUM,14,1e6		!14は接触コンダクタンスのこと CONTA174の リアルコンスタントのことらしい
		real,CNUM
		type,3		!要素ナンバー3のこと 3ということはtarge170
		cmsel,s,a_targ	!Cuの表面選択
		nsla,s,1	!選択されたエリアに関する節点の選択
		esurf		!既存の要素の自由表面に重ねて要素を生成とのこと
		TYPE,5	!樹脂とはんだの接触
		cmsel,s,a_cont	!はんだ下面の選択
		nsla,s,1	!選択されたエリアに関する節点の選択
		esurf
		allsel

		CNUM=CNUM+1
		allsel
		!Create Contact Pair
		asel,s,,,A12+18+5	!左面を選択
		cm,a_cont,area	!a_contという名をつける
		asel,s,,,A1+(PARA-1-mm)*20+7	!Cu表面を選択
		cm,a_targ,area	!a_targという名をつける  TARGがくっつける相手の（通常大きいほうの）面
		allsel
		r,CNUM
		rmodif,CNUM,14,1e6		!14は接触コンダクタンスのこと CONTA174の リアルコンスタントのことらしい
		real,CNUM
		type,3		!要素ナンバー3のこと 3ということはtarge170
		cmsel,s,a_targ	!Cuの表面選択
		nsla,s,1	!選択されたエリアに関する節点の選択
		esurf		!既存の要素の自由表面に重ねて要素を生成とのこと
		type,5	!評価しない接触
		cmsel,s,a_cont	!はんだ下面の選択
		nsla,s,1	!選択されたエリアに関する節点の選択
		esurf
		allsel

		CNUM=CNUM+1
		allsel
		!Create Contact Pair
		asel,s,,,A12+18+5	!左面を選択
		cm,a_cont,area	!a_contという名をつける
		asel,s,,,A2+(PARA-1-mm)*16+7	!Cu表面を選択
		cm,a_targ,area	!a_targという名をつける  TARGがくっつける相手の（通常大きいほうの）面
		allsel
		r,CNUM
		rmodif,CNUM,14,1e6		!14は接触コンダクタンスのこと CONTA174の リアルコンスタントのことらしい
		real,CNUM
		type,3		!要素ナンバー3のこと 3ということはtarge170
		cmsel,s,a_targ	!Cuの表面選択
		nsla,s,1	!選択されたエリアに関する節点の選択
		esurf		!既存の要素の自由表面に重ねて要素を生成とのこと
		type,5	!評価しない接触
		cmsel,s,a_cont	!はんだ下面の選択
		nsla,s,1	!選択されたエリアに関する節点の選択
		esurf
		allsel

		CNUM=CNUM+1
		allsel
		!Create Contact Pair
		asel,s,,,A12+18+5	!左面を選択
		cm,a_cont,area	!a_contという名をつける
		asel,s,,,A3+(PARA-1-mm)*30+18	!Cu表面を選択
		cm,a_targ,area	!a_targという名をつける  TARGがくっつける相手の（通常大きいほうの）面
		allsel
		r,CNUM
		rmodif,CNUM,14,1e6		!14は接触コンダクタンスのこと CONTA174の リアルコンスタントのことらしい
		real,CNUM
		type,3		!要素ナンバー3のこと 3ということはtarge170
		cmsel,s,a_targ	!Cuの表面選択
		nsla,s,1	!選択されたエリアに関する節点の選択
		esurf		!既存の要素の自由表面に重ねて要素を生成とのこと
		type,5	!評価しない接触
		cmsel,s,a_cont	!はんだ下面の選択
		nsla,s,1	!選択されたエリアに関する節点の選択
		esurf
		allsel
!
		CNUM=CNUM+1
		allsel
		!Create Contact Pair
		asel,s,,,A12+18+5	!左面を選択
		cm,a_cont,area	!a_contという名をつける
		asel,s,,,A4+(PARA-1-mm)*4+3	!Cu表面を選択
		cm,a_targ,area	!a_targという名をつける  TARGがくっつける相手の（通常大きいほうの）面
		allsel
		r,CNUM
		rmodif,CNUM,14,1e6		!14は接触コンダクタンスのこと CONTA174の リアルコンスタントのことらしい
		real,CNUM
		type,3		!要素ナンバー3のこと 3ということはtarge170
		cmsel,s,a_targ	!Cuの表面選択
		nsla,s,1	!選択されたエリアに関する節点の選択
		esurf		!既存の要素の自由表面に重ねて要素を生成とのこと
		type,5	!評価しない接触
		cmsel,s,a_cont	!はんだ下面の選択
		nsla,s,1	!選択されたエリアに関する節点の選択
		esurf
		allsel

		CNUM=CNUM+1
		allsel
		!Create Contact Pair
		asel,s,,,A12+18+5	!左面を選択
		cm,a_cont,area	!a_contという名をつける
		asel,s,,,A5+(PARA-1-mm)*27+15	!Cu表面を選択
		cm,a_targ,area	!a_targという名をつける  TARGがくっつける相手の（通常大きいほうの）面
		allsel
		r,CNUM
		rmodif,CNUM,14,1e6		!14は接触コンダクタンスのこと CONTA174の リアルコンスタントのことらしい
		real,CNUM
		type,3		!要素ナンバー3のこと 3ということはtarge170
		cmsel,s,a_targ	!Cuの表面選択
		nsla,s,1	!選択されたエリアに関する節点の選択
		esurf		!既存の要素の自由表面に重ねて要素を生成とのこと
		type,5	!評価しない接触
		cmsel,s,a_cont	!はんだ下面の選択
		nsla,s,1	!選択されたエリアに関する節点の選択
		esurf
		allsel

		CNUM=CNUM+1
		allsel
		!Create Contact Pair
		asel,s,,,A12+18+5	!左面を選択
		cm,a_cont,area	!a_contという名をつける
		asel,s,,,A5+(PARA-1-mm)*27+27	!Cu表面を選択
		cm,a_targ,area	!a_targという名をつける  TARGがくっつける相手の（通常大きいほうの）面
		allsel
		r,CNUM
		rmodif,CNUM,14,1e6		!14は接触コンダクタンスのこと CONTA174の リアルコンスタントのことらしい
		real,CNUM
		type,3		!要素ナンバー3のこと 3ということはtarge170
		cmsel,s,a_targ	!Cuの表面選択
		nsla,s,1	!選択されたエリアに関する節点の選択
		esurf		!既存の要素の自由表面に重ねて要素を生成とのこと
		type,5	!評価しない接触
		cmsel,s,a_cont	!はんだ下面の選択
		nsla,s,1	!選択されたエリアに関する節点の選択
		esurf
		allsel

		CNUM=CNUM+1
		allsel
		!Create Contact Pair
		asel,s,,,A12+18+5	!左面を選択
		cm,a_cont,area	!a_contという名をつける
		asel,s,,,A6+(PARA-1-mm)*20+8	!Cu表面を選択
		cm,a_targ,area	!a_targという名をつける  TARGがくっつける相手の（通常大きいほうの）面
		allsel
		r,CNUM
		rmodif,CNUM,14,1e6		!14は接触コンダクタンスのこと CONTA174の リアルコンスタントのことらしい
		real,CNUM
		type,3		!要素ナンバー3のこと 3ということはtarge170
		cmsel,s,a_targ	!Cuの表面選択
		nsla,s,1	!選択されたエリアに関する節点の選択
		esurf		!既存の要素の自由表面に重ねて要素を生成とのこと
		type,5	!評価しない接触
		cmsel,s,a_cont	!はんだ下面の選択
		nsla,s,1	!選択されたエリアに関する節点の選択
		esurf
		allsel

		CNUM=CNUM+1
		allsel
		!Create Contact Pair
		asel,s,,,A12+18+5	!左面を選択
		cm,a_cont,area	!a_contという名をつける
		asel,s,,,A7+(PARA-1-mm)*16+7	!Cu表面を選択
		cm,a_targ,area	!a_targという名をつける  TARGがくっつける相手の（通常大きいほうの）面
		allsel
		r,CNUM
		rmodif,CNUM,14,1e6		!14は接触コンダクタンスのこと CONTA174の リアルコンスタントのことらしい
		real,CNUM
		type,3		!要素ナンバー3のこと 3ということはtarge170
		cmsel,s,a_targ	!Cuの表面選択
		nsla,s,1	!選択されたエリアに関する節点の選択
		esurf		!既存の要素の自由表面に重ねて要素を生成とのこと
		type,5	!評価しない接触
		cmsel,s,a_cont	!はんだ下面の選択
		nsla,s,1	!選択されたエリアに関する節点の選択
		esurf
		allsel

		CNUM=CNUM+1
		allsel
		!Create Contact Pair
		asel,s,,,A12+18+5	!左面を選択
		cm,a_cont,area	!a_contという名をつける
		asel,s,,,A8+(PARA-1-mm)*16+6	!Cu表面を選択
		cm,a_targ,area	!a_targという名をつける  TARGがくっつける相手の（通常大きいほうの）面
		allsel
		r,CNUM
		rmodif,CNUM,14,1e6		!14は接触コンダクタンスのこと CONTA174の リアルコンスタントのことらしい
		real,CNUM
		type,3		!要素ナンバー3のこと 3ということはtarge170
		cmsel,s,a_targ	!Cuの表面選択
		nsla,s,1	!選択されたエリアに関する節点の選択
		esurf		!既存の要素の自由表面に重ねて要素を生成とのこと
		type,5	!評価しない接触
		cmsel,s,a_cont	!はんだ下面の選択
		nsla,s,1	!選択されたエリアに関する節点の選択
		esurf
		allsel

		CNUM=CNUM+1
		allsel
		!Create Contact Pair
		asel,s,,,A12+18+5	!左面を選択
		cm,a_cont,area	!a_contという名をつける
		asel,s,,,A9+(PARA-1-mm)*6+3	!Cu表面を選択
		cm,a_targ,area	!a_targという名をつける  TARGがくっつける相手の（通常大きいほうの）面
		allsel
		r,CNUM
		rmodif,CNUM,14,1e6		!14は接触コンダクタンスのこと CONTA174の リアルコンスタントのことらしい
		real,CNUM
		type,3		!要素ナンバー3のこと 3ということはtarge170
		cmsel,s,a_targ	!Cuの表面選択
		nsla,s,1	!選択されたエリアに関する節点の選択
		esurf		!既存の要素の自由表面に重ねて要素を生成とのこと
		type,5	!評価しない接触
		cmsel,s,a_cont	!はんだ下面の選択
		nsla,s,1	!選択されたエリアに関する節点の選択
		esurf
		allsel

!P側の下中央
*DO,ii,1,2,1
		CNUM=CNUM+1
		allsel
		!Create Contact Pair
		asel,s,,,A12+24+1	!左面を選択
		cm,a_cont,area	!a_contという名をつける
		asel,s,,,24+(ii-1)*6	!Cu表面を選択
		cm,a_targ,area	!a_targという名をつける  TARGがくっつける相手の（通常大きいほうの）面
		allsel
		r,CNUM
		rmodif,CNUM,14,1e6		!14は接触コンダクタンスのこと CONTA174の リアルコンスタントのことらしい
		real,CNUM
		type,3		!要素ナンバー3のこと 3ということはtarge170
		cmsel,s,a_targ	!Cuの表面選択
		nsla,s,1	!選択されたエリアに関する節点の選択
		esurf		!既存の要素の自由表面に重ねて要素を生成とのこと
		type,8		!粗い樹脂と銅の接触
		cmsel,s,a_cont	!はんだ下面の選択
		nsla,s,1	!選択されたエリアに関する節点の選択
		esurf
		allsel
*ENDDO

*DO,ii,1,2,1
		CNUM=CNUM+1
		allsel
		!Create Contact Pair
		asel,s,,,A12+24+1	!左面を選択
		cm,a_cont,area	!a_contという名をつける
		asel,s,,,108+(ii-1)*24	!Cu表面を選択
		cm,a_targ,area	!a_targという名をつける  TARGがくっつける相手の（通常大きいほうの）面
		allsel
		r,CNUM
		rmodif,CNUM,14,1e6		!14は接触コンダクタンスのこと CONTA174の リアルコンスタントのことらしい
		real,CNUM
		type,3		!要素ナンバー3のこと 3ということはtarge170
		cmsel,s,a_targ	!Cuの表面選択
		nsla,s,1	!選択されたエリアに関する節点の選択
		esurf		!既存の要素の自由表面に重ねて要素を生成とのこと
		type,5		!評価しない接触
		cmsel,s,a_cont	!はんだ下面の選択
		nsla,s,1	!選択されたエリアに関する節点の選択
		esurf
		allsel
*ENDDO

*DO,ii,1,3,1
		CNUM=CNUM+1
		allsel
		!Create Contact Pair
		asel,s,,,A12+24+6	!左面を選択
		cm,a_cont,area	!a_contという名をつける
		asel,s,,,201+(ii-1)*6	!Cu表面を選択
		cm,a_targ,area	!a_targという名をつける  TARGがくっつける相手の（通常大きいほうの）面
		allsel
		r,CNUM
		rmodif,CNUM,14,1e6		!14は接触コンダクタンスのこと CONTA174の リアルコンスタントのことらしい
		real,CNUM
		type,3		!要素ナンバー3のこと 3ということはtarge170
		cmsel,s,a_targ	!Cuの表面選択
		nsla,s,1	!選択されたエリアに関する節点の選択
		esurf		!既存の要素の自由表面に重ねて要素を生成とのこと
		type,8		!粗い樹脂と銅の接触
		cmsel,s,a_cont	!はんだ下面の選択
		nsla,s,1	!選択されたエリアに関する節点の選択
		esurf
		allsel
*ENDDO

*DO,ii,1,2,1
		CNUM=CNUM+1
		allsel
		!Create Contact Pair
		asel,s,,,A12+24+6	!左面を選択
		cm,a_cont,area	!a_contという名をつける
		asel,s,,,249+(ii-1)*6	!Cu表面を選択
		cm,a_targ,area	!a_targという名をつける  TARGがくっつける相手の（通常大きいほうの）面
		allsel
		r,CNUM
		rmodif,CNUM,14,1e6		!14は接触コンダクタンスのこと CONTA174の リアルコンスタントのことらしい
		real,CNUM
		type,3		!要素ナンバー3のこと 3ということはtarge170
		cmsel,s,a_targ	!Cuの表面選択
		nsla,s,1	!選択されたエリアに関する節点の選択
		esurf		!既存の要素の自由表面に重ねて要素を生成とのこと
		type,5		!評価しない接触
		cmsel,s,a_cont	!はんだ下面の選択
		nsla,s,1	!選択されたエリアに関する節点の選択
		esurf
		allsel
*ENDDO

		CNUM=CNUM+1
		allsel
		!Create Contact Pair
		asel,s,,,A12+24+3	!左面を選択
		cm,a_cont,area	!a_contという名をつける
		asel,s,,,A1+PARA*20+19	!Cu表面を選択
		cm,a_targ,area	!a_targという名をつける  TARGがくっつける相手の（通常大きいほうの）面
		allsel
		r,CNUM
		rmodif,CNUM,14,1e6		!14は接触コンダクタンスのこと CONTA174の リアルコンスタントのことらしい
		real,CNUM
		type,3		!要素ナンバー3のこと 3ということはtarge170
		cmsel,s,a_targ	!Cuの表面選択
		nsla,s,1	!選択されたエリアに関する節点の選択
		esurf		!既存の要素の自由表面に重ねて要素を生成とのこと
		type,5		!評価しない接触
		cmsel,s,a_cont	!はんだ下面の選択
		nsla,s,1	!選択されたエリアに関する節点の選択
		esurf
		allsel

		CNUM=CNUM+1
		allsel
		!Create Contact Pair
		asel,s,,,A12+24+3	!左面を選択
		cm,a_cont,area	!a_contという名をつける
		asel,s,,,A2+PARA*16+16	!Cu表面を選択
		cm,a_targ,area	!a_targという名をつける  TARGがくっつける相手の（通常大きいほうの）面
		allsel
		r,CNUM
		rmodif,CNUM,14,1e6		!14は接触コンダクタンスのこと CONTA174の リアルコンスタントのことらしい
		real,CNUM
		type,3		!要素ナンバー3のこと 3ということはtarge170
		cmsel,s,a_targ	!Cuの表面選択
		nsla,s,1	!選択されたエリアに関する節点の選択
		esurf		!既存の要素の自由表面に重ねて要素を生成とのこと
		type,5		!評価しない接触
		cmsel,s,a_cont	!はんだ下面の選択
		nsla,s,1	!選択されたエリアに関する節点の選択
		esurf
		allsel

		CNUM=CNUM+1
		allsel
		!Create Contact Pair
		asel,s,,,A12+24+3	!左面を選択
		cm,a_cont,area	!a_contという名をつける
		asel,s,,,A3+PARA*30+29	!Cu表面を選択
		cm,a_targ,area	!a_targという名をつける  TARGがくっつける相手の（通常大きいほうの）面
		allsel
		r,CNUM
		rmodif,CNUM,14,1e6		!14は接触コンダクタンスのこと CONTA174の リアルコンスタントのことらしい
		real,CNUM
		type,3		!要素ナンバー3のこと 3ということはtarge170
		cmsel,s,a_targ	!Cuの表面選択
		nsla,s,1	!選択されたエリアに関する節点の選択
		esurf		!既存の要素の自由表面に重ねて要素を生成とのこと
		type,5		!評価しない接触
		cmsel,s,a_cont	!はんだ下面の選択
		nsla,s,1	!選択されたエリアに関する節点の選択
		esurf
		allsel

		CNUM=CNUM+1
		allsel
		!Create Contact Pair
		asel,s,,,A12+24+3	!左面を選択
		cm,a_cont,area	!a_contという名をつける
		asel,s,,,A5+PARA*27+24	!Cu表面を選択
		cm,a_targ,area	!a_targという名をつける  TARGがくっつける相手の（通常大きいほうの）面
		allsel
		r,CNUM
		rmodif,CNUM,14,1e6		!14は接触コンダクタンスのこと CONTA174の リアルコンスタントのことらしい
		real,CNUM
		type,3		!要素ナンバー3のこと 3ということはtarge170
		cmsel,s,a_targ	!Cuの表面選択
		nsla,s,1	!選択されたエリアに関する節点の選択
		esurf		!既存の要素の自由表面に重ねて要素を生成とのこと
		type,5		!評価しない接触
		cmsel,s,a_cont	!はんだ下面の選択
		nsla,s,1	!選択されたエリアに関する節点の選択
		esurf
		allsel

		CNUM=CNUM+1
		allsel
		!Create Contact Pair
		asel,s,,,A12+24+3	!左面を選択
		cm,a_cont,area	!a_contという名をつける
		asel,s,,,A6+PARA*20+19	!Cu表面を選択
		cm,a_targ,area	!a_targという名をつける  TARGがくっつける相手の（通常大きいほうの）面
		allsel
		r,CNUM
		rmodif,CNUM,14,1e6		!14は接触コンダクタンスのこと CONTA174の リアルコンスタントのことらしい
		real,CNUM
		type,3		!要素ナンバー3のこと 3ということはtarge170
		cmsel,s,a_targ	!Cuの表面選択
		nsla,s,1	!選択されたエリアに関する節点の選択
		esurf		!既存の要素の自由表面に重ねて要素を生成とのこと
		type,5		!評価しない接触
		cmsel,s,a_cont	!はんだ下面の選択
		nsla,s,1	!選択されたエリアに関する節点の選択
		esurf
		allsel

		CNUM=CNUM+1
		allsel
		!Create Contact Pair
		asel,s,,,A12+24+3	!左面を選択
		cm,a_cont,area	!a_contという名をつける
		asel,s,,,A7+PARA*16+16	!Cu表面を選択
		cm,a_targ,area	!a_targという名をつける  TARGがくっつける相手の（通常大きいほうの）面
		allsel
		r,CNUM
		rmodif,CNUM,14,1e6		!14は接触コンダクタンスのこと CONTA174の リアルコンスタントのことらしい
		real,CNUM
		type,3		!要素ナンバー3のこと 3ということはtarge170
		cmsel,s,a_targ	!Cuの表面選択
		nsla,s,1	!選択されたエリアに関する節点の選択
		esurf		!既存の要素の自由表面に重ねて要素を生成とのこと
		type,5		!評価しない接触
		cmsel,s,a_cont	!はんだ下面の選択
		nsla,s,1	!選択されたエリアに関する節点の選択
		esurf
		allsel

		CNUM=CNUM+1
		allsel
		!Create Contact Pair
		asel,s,,,A12+24+3	!左面を選択
		cm,a_cont,area	!a_contという名をつける
		asel,s,,,A8+PARA*16+15	!Cu表面を選択
		cm,a_targ,area	!a_targという名をつける  TARGがくっつける相手の（通常大きいほうの）面
		allsel
		r,CNUM
		rmodif,CNUM,14,1e6		!14は接触コンダクタンスのこと CONTA174の リアルコンスタントのことらしい
		real,CNUM
		type,3		!要素ナンバー3のこと 3ということはtarge170
		cmsel,s,a_targ	!Cuの表面選択
		nsla,s,1	!選択されたエリアに関する節点の選択
		esurf		!既存の要素の自由表面に重ねて要素を生成とのこと
		type,5		!評価しない接触
		cmsel,s,a_cont	!はんだ下面の選択
		nsla,s,1	!選択されたエリアに関する節点の選択
		esurf
		allsel

		CNUM=CNUM+1
		allsel
		!Create Contact Pair
		asel,s,,,A12+24+3	!左面を選択
		cm,a_cont,area	!a_contという名をつける
		asel,s,,,A9+PARA*6+5	!Cu表面を選択
		cm,a_targ,area	!a_targという名をつける  TARGがくっつける相手の（通常大きいほうの）面
		allsel
		r,CNUM
		rmodif,CNUM,14,1e6		!14は接触コンダクタンスのこと CONTA174の リアルコンスタントのことらしい
		real,CNUM
		type,3		!要素ナンバー3のこと 3ということはtarge170
		cmsel,s,a_targ	!Cuの表面選択
		nsla,s,1	!選択されたエリアに関する節点の選択
		esurf		!既存の要素の自由表面に重ねて要素を生成とのこと
		type,5		!評価しない接触
		cmsel,s,a_cont	!はんだ下面の選択
		nsla,s,1	!選択されたエリアに関する節点の選択
		esurf
		allsel

		CNUM=CNUM+1
		allsel
		!Create Contact Pair
		asel,s,,,A12+24+4	!左面を選択
		cm,a_cont,area	!a_contという名をつける
		asel,s,,,A11+6+2	!Cu表面を選択
		cm,a_targ,area	!a_targという名をつける  TARGがくっつける相手の（通常大きいほうの）面
		allsel
		r,CNUM
		rmodif,CNUM,14,1e6		!14は接触コンダクタンスのこと CONTA174の リアルコンスタントのことらしい
		real,CNUM
		type,3		!要素ナンバー3のこと 3ということはtarge170
		cmsel,s,a_targ	!Cuの表面選択
		nsla,s,1	!選択されたエリアに関する節点の選択
		esurf		!既存の要素の自由表面に重ねて要素を生成とのこと
		type,5		!評価しない接触
		cmsel,s,a_cont	!はんだ下面の選択
		nsla,s,1	!選択されたエリアに関する節点の選択
		esurf
		allsel

		CNUM=CNUM+1
		allsel
		!Create Contact Pair
		asel,s,,,A12+24+5	!左面を選択
		cm,a_cont,area	!a_contという名をつける
		asel,s,,,ABASE-32+3	!Cu表面を選択
		cm,a_targ,area	!a_targという名をつける  TARGがくっつける相手の（通常大きいほうの）面
		allsel
		r,CNUM
		rmodif,CNUM,14,1e6		!14は接触コンダクタンスのこと CONTA174の リアルコンスタントのことらしい
		real,CNUM
		type,3		!要素ナンバー3のこと 3ということはtarge170
		cmsel,s,a_targ	!Cuの表面選択
		nsla,s,1	!選択されたエリアに関する節点の選択
		esurf		!既存の要素の自由表面に重ねて要素を生成とのこと
		TYPE,5		!樹脂とはんだ接触
		cmsel,s,a_cont	!はんだ下面の選択
		nsla,s,1	!選択されたエリアに関する節点の選択
		esurf
		allsel

		CNUM=CNUM+1
		allsel
		!Create Contact Pair
		asel,s,,,A12+24+5	!左面を選択
		cm,a_cont,area	!a_contという名をつける
		asel,s,,,ABASE-32+9	!Cu表面を選択
		cm,a_targ,area	!a_targという名をつける  TARGがくっつける相手の（通常大きいほうの）面
		allsel
		r,CNUM
		rmodif,CNUM,14,1e6		!14は接触コンダクタンスのこと CONTA174の リアルコンスタントのことらしい
		real,CNUM
		type,3		!要素ナンバー3のこと 3ということはtarge170
		cmsel,s,a_targ	!Cuの表面選択
		nsla,s,1	!選択されたエリアに関する節点の選択
		esurf		!既存の要素の自由表面に重ねて要素を生成とのこと
		type,8		!粗い樹脂と銅の接触
		cmsel,s,a_cont	!はんだ下面の選択
		nsla,s,1	!選択されたエリアに関する節点の選択
		esurf
		allsel

		CNUM=CNUM+1
		allsel
		!Create Contact Pair
		asel,s,,,A12+24+5	!左面を選択
		cm,a_cont,area	!a_contという名をつける
		asel,s,,,ABASE-32+14	!Cu表面を選択
		cm,a_targ,area	!a_targという名をつける  TARGがくっつける相手の（通常大きいほうの）面
		allsel
		r,CNUM
		rmodif,CNUM,14,1e6		!14は接触コンダクタンスのこと CONTA174の リアルコンスタントのことらしい
		real,CNUM
		type,3		!要素ナンバー3のこと 3ということはtarge170
		cmsel,s,a_targ	!Cuの表面選択
		nsla,s,1	!選択されたエリアに関する節点の選択
		esurf		!既存の要素の自由表面に重ねて要素を生成とのこと
		TYPE,5		!樹脂とはんだ接触
		cmsel,s,a_cont	!はんだ下面の選択
		nsla,s,1	!選択されたエリアに関する節点の選択
		esurf
		allsel

!P側中央の上の樹脂
*DO,ii,1,2,1
		CNUM=CNUM+1
		allsel
		!Create Contact Pair
		asel,s,,,A12+30+1	!左面を選択
		cm,a_cont,area	!a_contという名をつける
		asel,s,,,24+(ii-1)*6	!Cu表面を選択
		cm,a_targ,area	!a_targという名をつける  TARGがくっつける相手の（通常大きいほうの）面
		allsel
		r,CNUM
		rmodif,CNUM,14,1e6		!14は接触コンダクタンスのこと CONTA174の リアルコンスタントのことらしい
		real,CNUM
		type,3		!要素ナンバー3のこと 3ということはtarge170
		cmsel,s,a_targ	!Cuの表面選択
		nsla,s,1	!選択されたエリアに関する節点の選択
		esurf		!既存の要素の自由表面に重ねて要素を生成とのこと
		type,8		!粗い樹脂と銅の接触
		cmsel,s,a_cont	!はんだ下面の選択
		nsla,s,1	!選択されたエリアに関する節点の選択
		esurf
		allsel
*ENDDO

		CNUM=CNUM+1
		allsel
		!Create Contact Pair
		asel,s,,,A12+30+1	!左面を選択
		cm,a_cont,area	!a_contという名をつける
		asel,s,,,42	!Cu表面を選択
		cm,a_targ,area	!a_targという名をつける  TARGがくっつける相手の（通常大きいほうの）面
		allsel
		r,CNUM
		rmodif,CNUM,14,1e6		!14は接触コンダクタンスのこと CONTA174の リアルコンスタントのことらしい
		real,CNUM
		type,3		!要素ナンバー3のこと 3ということはtarge170
		cmsel,s,a_targ	!Cuの表面選択
		nsla,s,1	!選択されたエリアに関する節点の選択
		esurf		!既存の要素の自由表面に重ねて要素を生成とのこと
		type,8		!粗い樹脂と銅の接触
		cmsel,s,a_cont	!はんだ下面の選択
		nsla,s,1	!選択されたエリアに関する節点の選択
		esurf
		allsel

*DO,ii,1,2,1
		CNUM=CNUM+1
		allsel
		!Create Contact Pair
		asel,s,,,A12+30+1	!左面を選択
		cm,a_cont,area	!a_contという名をつける
		asel,s,,,108+(ii-1)*24	!Cu表面を選択
		cm,a_targ,area	!a_targという名をつける  TARGがくっつける相手の（通常大きいほうの）面
		allsel
		r,CNUM
		rmodif,CNUM,14,1e6		!14は接触コンダクタンスのこと CONTA174の リアルコンスタントのことらしい
		real,CNUM
		type,3		!要素ナンバー3のこと 3ということはtarge170
		cmsel,s,a_targ	!Cuの表面選択
		nsla,s,1	!選択されたエリアに関する節点の選択
		esurf		!既存の要素の自由表面に重ねて要素を生成とのこと
		type,5		!評価しない接触
		cmsel,s,a_cont	!はんだ下面の選択
		nsla,s,1	!選択されたエリアに関する節点の選択
		esurf
		allsel
*ENDDO

*DO,ii,1,3,1
		CNUM=CNUM+1
		allsel
		!Create Contact Pair
		asel,s,,,A12+30+6	!上面を選択
		cm,a_cont,area	!a_contという名をつける
		asel,s,,,201+(ii-1)*6	!Cu表面を選択
		cm,a_targ,area	!a_targという名をつける  TARGがくっつける相手の（通常大きいほうの）面
		allsel
		r,CNUM
		rmodif,CNUM,14,1e6		!14は接触コンダクタンスのこと CONTA174の リアルコンスタントのことらしい
		real,CNUM
		type,3		!要素ナンバー3のこと 3ということはtarge170
		cmsel,s,a_targ	!Cuの表面選択
		nsla,s,1	!選択されたエリアに関する節点の選択
		esurf		!既存の要素の自由表面に重ねて要素を生成とのこと
		type,8		!粗い樹脂と銅の接触
		cmsel,s,a_cont	!はんだ下面の選択
		nsla,s,1	!選択されたエリアに関する節点の選択
		esurf
		allsel
*ENDDO
*DO,ii,1,2,1

		CNUM=CNUM+1
		allsel
		!Create Contact Pair
		asel,s,,,A12+30+6	!上面を選択
		cm,a_cont,area	!a_contという名をつける
		asel,s,,,249+(ii-1)*6	!Cu表面を選択
		cm,a_targ,area	!a_targという名をつける  TARGがくっつける相手の（通常大きいほうの）面
		allsel
		r,CNUM
		rmodif,CNUM,14,1e6		!14は接触コンダクタンスのこと CONTA174の リアルコンスタントのことらしい
		real,CNUM
		type,3		!要素ナンバー3のこと 3ということはtarge170
		cmsel,s,a_targ	!Cuの表面選択
		nsla,s,1	!選択されたエリアに関する節点の選択
		esurf		!既存の要素の自由表面に重ねて要素を生成とのこと
		type,5		!評価しない接触
		cmsel,s,a_cont	!はんだ下面の選択
		nsla,s,1	!選択されたエリアに関する節点の選択
		esurf
		allsel
*ENDDO
		CNUM=CNUM+1
		allsel
		!Create Contact Pair
		asel,s,,,A12+30+2	!上面を選択
		cm,a_cont,area	!a_contという名をつける
		asel,s,,,A11+6+4		!Cu表面を選択
		cm,a_targ,area	!a_targという名をつける  TARGがくっつける相手の（通常大きいほうの）面
		allsel
		r,CNUM
		rmodif,CNUM,14,1e6		!14は接触コンダクタンスのこと CONTA174の リアルコンスタントのことらしい
		real,CNUM
		type,3		!要素ナンバー3のこと 3ということはtarge170
		cmsel,s,a_targ	!Cuの表面選択
		nsla,s,1	!選択されたエリアに関する節点の選択
		esurf		!既存の要素の自由表面に重ねて要素を生成とのこと
		type,5		!はんだと樹脂の接触
		cmsel,s,a_cont	!はんだ下面の選択
		nsla,s,1	!選択されたエリアに関する節点の選択
		esurf
		allsel

		CNUM=CNUM+1
		allsel
		!Create Contact Pair
		asel,s,,,A12+30+3	!左面を選択
		cm,a_cont,area	!a_contという名をつける
		asel,s,,,A1+(PARA+1)*20+19	!Cu表面を選択
		cm,a_targ,area	!a_targという名をつける  TARGがくっつける相手の（通常大きいほうの）面
		allsel
		r,CNUM
		rmodif,CNUM,14,1e6		!14は接触コンダクタンスのこと CONTA174の リアルコンスタントのことらしい
		real,CNUM
		type,3		!要素ナンバー3のこと 3ということはtarge170
		cmsel,s,a_targ	!Cuの表面選択
		nsla,s,1	!選択されたエリアに関する節点の選択
		esurf		!既存の要素の自由表面に重ねて要素を生成とのこと
		type,5		!はんだと樹脂の接触
		cmsel,s,a_cont	!はんだ下面の選択
		nsla,s,1	!選択されたエリアに関する節点の選択
		esurf
		allsel

		CNUM=CNUM+1
		allsel
		!Create Contact Pair
		asel,s,,,A12+30+3	!左面を選択
		cm,a_cont,area	!a_contという名をつける
		asel,s,,,A2+(PARA+1)*16+16	!Cu表面を選択
		cm,a_targ,area	!a_targという名をつける  TARGがくっつける相手の（通常大きいほうの）面
		allsel
		r,CNUM
		rmodif,CNUM,14,1e6		!14は接触コンダクタンスのこと CONTA174の リアルコンスタントのことらしい
		real,CNUM
		type,3		!要素ナンバー3のこと 3ということはtarge170
		cmsel,s,a_targ	!Cuの表面選択
		nsla,s,1	!選択されたエリアに関する節点の選択
		esurf		!既存の要素の自由表面に重ねて要素を生成とのこと
		type,5		!はんだと樹脂の接触
		cmsel,s,a_cont	!はんだ下面の選択
		nsla,s,1	!選択されたエリアに関する節点の選択
		esurf
		allsel

		CNUM=CNUM+1
		allsel
		!Create Contact Pair
		asel,s,,,A12+30+3	!左面を選択
		cm,a_cont,area	!a_contという名をつける
		asel,s,,,A3+(PARA+1)*30+29	!Cu表面を選択
		cm,a_targ,area	!a_targという名をつける  TARGがくっつける相手の（通常大きいほうの）面
		allsel
		r,CNUM
		rmodif,CNUM,14,1e6		!14は接触コンダクタンスのこと CONTA174の リアルコンスタントのことらしい
		real,CNUM
		type,3		!要素ナンバー3のこと 3ということはtarge170
		cmsel,s,a_targ	!Cuの表面選択
		nsla,s,1	!選択されたエリアに関する節点の選択
		esurf		!既存の要素の自由表面に重ねて要素を生成とのこと
		type,5		!はんだと樹脂の接触
		cmsel,s,a_cont	!はんだ下面の選択
		nsla,s,1	!選択されたエリアに関する節点の選択
		esurf
		allsel

		CNUM=CNUM+1
		allsel
		!Create Contact Pair
		asel,s,,,A12+30+3	!左面を選択
		cm,a_cont,area	!a_contという名をつける
		asel,s,,,A5+(PARA+1)*27+24	!Cu表面を選択
		cm,a_targ,area	!a_targという名をつける  TARGがくっつける相手の（通常大きいほうの）面
		allsel
		r,CNUM
		rmodif,CNUM,14,1e6		!14は接触コンダクタンスのこと CONTA174の リアルコンスタントのことらしい
		real,CNUM
		type,3		!要素ナンバー3のこと 3ということはtarge170
		cmsel,s,a_targ	!Cuの表面選択
		nsla,s,1	!選択されたエリアに関する節点の選択
		esurf		!既存の要素の自由表面に重ねて要素を生成とのこと
		type,5		!はんだと樹脂の接触
		cmsel,s,a_cont	!はんだ下面の選択
		nsla,s,1	!選択されたエリアに関する節点の選択
		esurf
		allsel

		CNUM=CNUM+1
		allsel
		!Create Contact Pair
		asel,s,,,A12+30+3	!左面を選択
		cm,a_cont,area	!a_contという名をつける
		asel,s,,,A6+(PARA+1)*20+19	!Cu表面を選択
		cm,a_targ,area	!a_targという名をつける  TARGがくっつける相手の（通常大きいほうの）面
		allsel
		r,CNUM
		rmodif,CNUM,14,1e6		!14は接触コンダクタンスのこと CONTA174の リアルコンスタントのことらしい
		real,CNUM
		type,3		!要素ナンバー3のこと 3ということはtarge170
		cmsel,s,a_targ	!Cuの表面選択
		nsla,s,1	!選択されたエリアに関する節点の選択
		esurf		!既存の要素の自由表面に重ねて要素を生成とのこと
		type,5		!はんだと樹脂の接触
		cmsel,s,a_cont	!はんだ下面の選択
		nsla,s,1	!選択されたエリアに関する節点の選択
		esurf
		allsel

		CNUM=CNUM+1
		allsel
		!Create Contact Pair
		asel,s,,,A12+30+3	!左面を選択
		cm,a_cont,area	!a_contという名をつける
		asel,s,,,A7+(PARA+1)*16+16	!Cu表面を選択
		cm,a_targ,area	!a_targという名をつける  TARGがくっつける相手の（通常大きいほうの）面
		allsel
		r,CNUM
		rmodif,CNUM,14,1e6		!14は接触コンダクタンスのこと CONTA174の リアルコンスタントのことらしい
		real,CNUM
		type,3		!要素ナンバー3のこと 3ということはtarge170
		cmsel,s,a_targ	!Cuの表面選択
		nsla,s,1	!選択されたエリアに関する節点の選択
		esurf		!既存の要素の自由表面に重ねて要素を生成とのこと
		type,5		!はんだと樹脂の接触
		cmsel,s,a_cont	!はんだ下面の選択
		nsla,s,1	!選択されたエリアに関する節点の選択
		esurf
		allsel

		CNUM=CNUM+1
		allsel
		!Create Contact Pair
		asel,s,,,A12+30+3	!左面を選択
		cm,a_cont,area	!a_contという名をつける
		asel,s,,,A8+(PARA+1)*16+15	!Cu表面を選択
		cm,a_targ,area	!a_targという名をつける  TARGがくっつける相手の（通常大きいほうの）面
		allsel
		r,CNUM
		rmodif,CNUM,14,1e6		!14は接触コンダクタンスのこと CONTA174の リアルコンスタントのことらしい
		real,CNUM
		type,3		!要素ナンバー3のこと 3ということはtarge170
		cmsel,s,a_targ	!Cuの表面選択
		nsla,s,1	!選択されたエリアに関する節点の選択
		esurf		!既存の要素の自由表面に重ねて要素を生成とのこと
		type,5		!はんだと樹脂の接触
		cmsel,s,a_cont	!はんだ下面の選択
		nsla,s,1	!選択されたエリアに関する節点の選択
		esurf
		allsel

		CNUM=CNUM+1
		allsel
		!Create Contact Pair
		asel,s,,,A12+30+3	!左面を選択
		cm,a_cont,area	!a_contという名をつける
		asel,s,,,A9+(PARA+1)*6+5	!Cu表面を選択
		cm,a_targ,area	!a_targという名をつける  TARGがくっつける相手の（通常大きいほうの）面
		allsel
		r,CNUM
		rmodif,CNUM,14,1e6		!14は接触コンダクタンスのこと CONTA174の リアルコンスタントのことらしい
		real,CNUM
		type,3		!要素ナンバー3のこと 3ということはtarge170
		cmsel,s,a_targ	!Cuの表面選択
		nsla,s,1	!選択されたエリアに関する節点の選択
		esurf		!既存の要素の自由表面に重ねて要素を生成とのこと
		type,5		!はんだと樹脂の接触
		cmsel,s,a_cont	!はんだ下面の選択
		nsla,s,1	!選択されたエリアに関する節点の選択
		esurf
		allsel


		CNUM=CNUM+1
		allsel
		!Create Contact Pair
		asel,s,,,A12+30+5	!上面を選択
		cm,a_cont,area	!a_contという名をつける
		asel,s,,,ABASE-32+16+3		!Cu表面を選択
		cm,a_targ,area	!a_targという名をつける  TARGがくっつける相手の（通常大きいほうの）面
		allsel
		r,CNUM
		rmodif,CNUM,14,1e6		!14は接触コンダクタンスのこと CONTA174の リアルコンスタントのことらしい
		real,CNUM
		type,3		!要素ナンバー3のこと 3ということはtarge170
		cmsel,s,a_targ	!Cuの表面選択
		nsla,s,1	!選択されたエリアに関する節点の選択
		esurf		!既存の要素の自由表面に重ねて要素を生成とのこと
		TYPE,5		!はんだと樹脂の接触
		cmsel,s,a_cont	!はんだ下面の選択
		nsla,s,1	!選択されたエリアに関する節点の選択
		esurf
		allsel

		CNUM=CNUM+1
		allsel
		!Create Contact Pair
		asel,s,,,A12+30+5	!上面を選択
		cm,a_cont,area	!a_contという名をつける
		asel,s,,,ABASE-32+16+9		!Cu表面を選択
		cm,a_targ,area	!a_targという名をつける  TARGがくっつける相手の（通常大きいほうの）面
		allsel
		r,CNUM
		rmodif,CNUM,14,1e6		!14は接触コンダクタンスのこと CONTA174の リアルコンスタントのことらしい
		real,CNUM
		type,3		!要素ナンバー3のこと 3ということはtarge170
		cmsel,s,a_targ	!Cuの表面選択
		nsla,s,1	!選択されたエリアに関する節点の選択
		esurf		!既存の要素の自由表面に重ねて要素を生成とのこと
		type,8		!粗い樹脂と銅の接触
		cmsel,s,a_cont	!はんだ下面の選択
		nsla,s,1	!選択されたエリアに関する節点の選択
		esurf
		allsel

		CNUM=CNUM+1
		allsel
		!Create Contact Pair
		asel,s,,,A12+30+5	!上面を選択
		cm,a_cont,area	!a_contという名をつける
		asel,s,,,ABASE-32+16+14		!Cu表面を選択
		cm,a_targ,area	!a_targという名をつける  TARGがくっつける相手の（通常大きいほうの）面
		allsel
		r,CNUM
		rmodif,CNUM,14,1e6		!14は接触コンダクタンスのこと CONTA174の リアルコンスタントのことらしい
		real,CNUM
		type,3		!要素ナンバー3のこと 3ということはtarge170
		cmsel,s,a_targ	!Cuの表面選択
		nsla,s,1	!選択されたエリアに関する節点の選択
		esurf		!既存の要素の自由表面に重ねて要素を生成とのこと
		TYPE,5		!はんだと樹脂の接触
		cmsel,s,a_cont	!はんだ下面の選択
		nsla,s,1	!選択されたエリアに関する節点の選択
		esurf
		allsel

!P側の行　端の下
		CNUM=CNUM+1
		allsel
		!Create Contact Pair
		asel,s,,,A12+36+1	!下面を選択
		cm,a_cont,area	!a_contという名をつける
		asel,s,,,30	!Cu表面を選択
		cm,a_targ,area	!a_targという名をつける  TARGがくっつける相手の（通常大きいほうの）面
		allsel
		r,CNUM
		rmodif,CNUM,14,1e6		!14は接触コンダクタンスのこと CONTA174の リアルコンスタントのことらしい
		real,CNUM
		type,3		!要素ナンバー3のこと 3ということはtarge170
		cmsel,s,a_targ	!Cuの表面選択
		nsla,s,1	!選択されたエリアに関する節点の選択
		esurf		!既存の要素の自由表面に重ねて要素を生成とのこと
		type,8		!粗い樹脂と銅の接触
		cmsel,s,a_cont	!はんだ下面の選択
		nsla,s,1	!選択されたエリアに関する節点の選択
		esurf
		allsel

		CNUM=CNUM+1
		allsel
		!Create Contact Pair
		asel,s,,,A12+36+6	!上面を選択
		cm,a_cont,area	!a_contという名をつける
		asel,s,,,213	!Cu表面を選択
		cm,a_targ,area	!a_targという名をつける  TARGがくっつける相手の（通常大きいほうの）面
		allsel
		r,CNUM
		rmodif,CNUM,14,1e6		!14は接触コンダクタンスのこと CONTA174の リアルコンスタントのことらしい
		real,CNUM
		type,3		!要素ナンバー3のこと 3ということはtarge170
		cmsel,s,a_targ	!Cuの表面選択
		nsla,s,1	!選択されたエリアに関する節点の選択
		esurf		!既存の要素の自由表面に重ねて要素を生成とのこと
		type,8		!粗い樹脂と銅の接触
		cmsel,s,a_cont	!はんだ下面の選択
		nsla,s,1	!選択されたエリアに関する節点の選択
		esurf
		allsel


		CNUM=CNUM+1
		allsel
		!Create Contact Pair
		asel,s,,,A12+36+4	!上面を選択
		cm,a_cont,area	!a_contという名をつける
		asel,s,,,A11+6+2	!Cu表面を選択
		cm,a_targ,area	!a_targという名をつける  TARGがくっつける相手の（通常大きいほうの）面
		allsel
		r,CNUM
		rmodif,CNUM,14,1e6		!14は接触コンダクタンスのこと CONTA174の リアルコンスタントのことらしい
		real,CNUM
		type,3		!要素ナンバー3のこと 3ということはtarge170
		cmsel,s,a_targ	!Cuの表面選択
		nsla,s,1	!選択されたエリアに関する節点の選択
		esurf		!既存の要素の自由表面に重ねて要素を生成とのこと
		type,5		!評価しない接触
		cmsel,s,a_cont	!はんだ下面の選択
		nsla,s,1	!選択されたエリアに関する節点の選択
		esurf
		allsel

		CNUM=CNUM+1
		allsel
		!Create Contact Pair
		asel,s,,,A12+36+5	!上面を選択
		cm,a_cont,area	!a_contという名をつける
		asel,s,,,A1+PARA*20+(PARA-1-kk)*20+8	!Cu表面を選択
		cm,a_targ,area	!a_targという名をつける  TARGがくっつける相手の（通常大きいほうの）面
		allsel
		r,CNUM
		rmodif,CNUM,14,1e6		!14は接触コンダクタンスのこと CONTA174の リアルコンスタントのことらしい
		real,CNUM
		type,3		!要素ナンバー3のこと 3ということはtarge170
		cmsel,s,a_targ	!Cuの表面選択
		nsla,s,1	!選択されたエリアに関する節点の選択
		esurf		!既存の要素の自由表面に重ねて要素を生成とのこと
		type,5		!評価しない接触
		cmsel,s,a_cont	!はんだ下面の選択
		nsla,s,1	!選択されたエリアに関する節点の選択
		esurf
		allsel

		CNUM=CNUM+1
		allsel
		!Create Contact Pair
		asel,s,,,A12+36+5	!上面を選択
		cm,a_cont,area	!a_contという名をつける
		asel,s,,,A2+PARA*16+(PARA-1-kk)*16+7	!Cu表面を選択
		cm,a_targ,area	!a_targという名をつける  TARGがくっつける相手の（通常大きいほうの）面
		allsel
		r,CNUM
		rmodif,CNUM,14,1e6		!14は接触コンダクタンスのこと CONTA174の リアルコンスタントのことらしい
		real,CNUM
		type,3		!要素ナンバー3のこと 3ということはtarge170
		cmsel,s,a_targ	!Cuの表面選択
		nsla,s,1	!選択されたエリアに関する節点の選択
		esurf		!既存の要素の自由表面に重ねて要素を生成とのこと
		type,5		!評価しない接触
		cmsel,s,a_cont	!はんだ下面の選択
		nsla,s,1	!選択されたエリアに関する節点の選択
		esurf
		allsel

		CNUM=CNUM+1
		allsel
		!Create Contact Pair
		asel,s,,,A12+36+5	!上面を選択
		cm,a_cont,area	!a_contという名をつける
		asel,s,,,A3+PARA*30+(PARA-1-kk)*30+18	!Cu表面を選択
		cm,a_targ,area	!a_targという名をつける  TARGがくっつける相手の（通常大きいほうの）面
		allsel
		r,CNUM
		rmodif,CNUM,14,1e6		!14は接触コンダクタンスのこと CONTA174の リアルコンスタントのことらしい
		real,CNUM
		type,3		!要素ナンバー3のこと 3ということはtarge170
		cmsel,s,a_targ	!Cuの表面選択
		nsla,s,1	!選択されたエリアに関する節点の選択
		esurf		!既存の要素の自由表面に重ねて要素を生成とのこと
		type,5		!評価しない接触
		cmsel,s,a_cont	!はんだ下面の選択
		nsla,s,1	!選択されたエリアに関する節点の選択
		esurf
		allsel

		CNUM=CNUM+1
		allsel
		!Create Contact Pair
		asel,s,,,A12+36+5	!上面を選択
		cm,a_cont,area	!a_contという名をつける
		asel,s,,,A4+PARA*4+(PARA-1-kk)*4+3	!Cu表面を選択
		cm,a_targ,area	!a_targという名をつける  TARGがくっつける相手の（通常大きいほうの）面
		allsel
		r,CNUM
		rmodif,CNUM,14,1e6		!14は接触コンダクタンスのこと CONTA174の リアルコンスタントのことらしい
		real,CNUM
		type,3		!要素ナンバー3のこと 3ということはtarge170
		cmsel,s,a_targ	!Cuの表面選択
		nsla,s,1	!選択されたエリアに関する節点の選択
		esurf		!既存の要素の自由表面に重ねて要素を生成とのこと
		type,5		!評価しない接触
		cmsel,s,a_cont	!はんだ下面の選択
		nsla,s,1	!選択されたエリアに関する節点の選択
		esurf
		allsel

		CNUM=CNUM+1
		allsel
		!Create Contact Pair
		asel,s,,,A12+36+5	!上面を選択
		cm,a_cont,area	!a_contという名をつける
		asel,s,,,A5+PARA*27+(PARA-1-kk)*27+15	!Cu表面を選択
		cm,a_targ,area	!a_targという名をつける  TARGがくっつける相手の（通常大きいほうの）面
		allsel
		r,CNUM
		rmodif,CNUM,14,1e6		!14は接触コンダクタンスのこと CONTA174の リアルコンスタントのことらしい
		real,CNUM
		type,3		!要素ナンバー3のこと 3ということはtarge170
		cmsel,s,a_targ	!Cuの表面選択
		nsla,s,1	!選択されたエリアに関する節点の選択
		esurf		!既存の要素の自由表面に重ねて要素を生成とのこと
		type,5		!評価しない接触
		cmsel,s,a_cont	!はんだ下面の選択
		nsla,s,1	!選択されたエリアに関する節点の選択
		esurf
		allsel

		CNUM=CNUM+1
		allsel
		!Create Contact Pair
		asel,s,,,A12+36+5	!上面を選択
		cm,a_cont,area	!a_contという名をつける
		asel,s,,,A5+PARA*27+(PARA-1-kk)*27+27	!Cu表面を選択
		cm,a_targ,area	!a_targという名をつける  TARGがくっつける相手の（通常大きいほうの）面
		allsel
		r,CNUM
		rmodif,CNUM,14,1e6		!14は接触コンダクタンスのこと CONTA174の リアルコンスタントのことらしい
		real,CNUM
		type,3		!要素ナンバー3のこと 3ということはtarge170
		cmsel,s,a_targ	!Cuの表面選択
		nsla,s,1	!選択されたエリアに関する節点の選択
		esurf		!既存の要素の自由表面に重ねて要素を生成とのこと
		type,5		!評価しない接触
		cmsel,s,a_cont	!はんだ下面の選択
		nsla,s,1	!選択されたエリアに関する節点の選択
		esurf
		allsel

		CNUM=CNUM+1
		allsel
		!Create Contact Pair
		asel,s,,,A12+36+5	!上面を選択
		cm,a_cont,area	!a_contという名をつける
		asel,s,,,A6+PARA*20+(PARA-1-kk)*20+8	!Cu表面を選択
		cm,a_targ,area	!a_targという名をつける  TARGがくっつける相手の（通常大きいほうの）面
		allsel
		r,CNUM
		rmodif,CNUM,14,1e6		!14は接触コンダクタンスのこと CONTA174の リアルコンスタントのことらしい
		real,CNUM
		type,3		!要素ナンバー3のこと 3ということはtarge170
		cmsel,s,a_targ	!Cuの表面選択
		nsla,s,1	!選択されたエリアに関する節点の選択
		esurf		!既存の要素の自由表面に重ねて要素を生成とのこと
		type,5		!評価しない接触
		cmsel,s,a_cont	!はんだ下面の選択
		nsla,s,1	!選択されたエリアに関する節点の選択
		esurf
		allsel

		CNUM=CNUM+1
		allsel
		!Create Contact Pair
		asel,s,,,A12+36+5	!上面を選択
		cm,a_cont,area	!a_contという名をつける
		asel,s,,,A7+PARA*16+(PARA-1-kk)*16+7	!Cu表面を選択
		cm,a_targ,area	!a_targという名をつける  TARGがくっつける相手の（通常大きいほうの）面
		allsel
		r,CNUM
		rmodif,CNUM,14,1e6		!14は接触コンダクタンスのこと CONTA174の リアルコンスタントのことらしい
		real,CNUM
		type,3		!要素ナンバー3のこと 3ということはtarge170
		cmsel,s,a_targ	!Cuの表面選択
		nsla,s,1	!選択されたエリアに関する節点の選択
		esurf		!既存の要素の自由表面に重ねて要素を生成とのこと
		type,5		!評価しない接触
		cmsel,s,a_cont	!はんだ下面の選択
		nsla,s,1	!選択されたエリアに関する節点の選択
		esurf
		allsel

		CNUM=CNUM+1
		allsel
		!Create Contact Pair
		asel,s,,,A12+36+5	!上面を選択
		cm,a_cont,area	!a_contという名をつける
		asel,s,,,A8+PARA*16+(PARA-1-kk)*16+6	!Cu表面を選択
		cm,a_targ,area	!a_targという名をつける  TARGがくっつける相手の（通常大きいほうの）面
		allsel
		r,CNUM
		rmodif,CNUM,14,1e6		!14は接触コンダクタンスのこと CONTA174の リアルコンスタントのことらしい
		real,CNUM
		type,3		!要素ナンバー3のこと 3ということはtarge170
		cmsel,s,a_targ	!Cuの表面選択
		nsla,s,1	!選択されたエリアに関する節点の選択
		esurf		!既存の要素の自由表面に重ねて要素を生成とのこと
		type,5		!評価しない接触
		cmsel,s,a_cont	!はんだ下面の選択
		nsla,s,1	!選択されたエリアに関する節点の選択
		esurf
		allsel

		CNUM=CNUM+1
		allsel
		!Create Contact Pair
		asel,s,,,A12+36+5	!上面を選択
		cm,a_cont,area	!a_contという名をつける
		asel,s,,,A9+PARA*6+(PARA-1-kk)*6+3	!Cu表面を選択
		cm,a_targ,area	!a_targという名をつける  TARGがくっつける相手の（通常大きいほうの）面
		allsel
		r,CNUM
		rmodif,CNUM,14,1e6		!14は接触コンダクタンスのこと CONTA174の リアルコンスタントのことらしい
		real,CNUM
		type,3		!要素ナンバー3のこと 3ということはtarge170
		cmsel,s,a_targ	!Cuの表面選択
		nsla,s,1	!選択されたエリアに関する節点の選択
		esurf		!既存の要素の自由表面に重ねて要素を生成とのこと
		type,5		!評価しない接触
		cmsel,s,a_cont	!はんだ下面の選択
		nsla,s,1	!選択されたエリアに関する節点の選択
		esurf
		allsel


!8つめ　P列端　上
		CNUM=CNUM+1
		allsel
		!Create Contact Pair
		asel,s,,,A12+42+1	!上面を選択
		cm,a_cont,area	!a_contという名をつける
		asel,s,,,30	!Cu表面を選択
		cm,a_targ,area	!a_targという名をつける  TARGがくっつける相手の（通常大きいほうの）面
		allsel
		r,CNUM
		rmodif,CNUM,14,1e6		!14は接触コンダクタンスのこと CONTA174の リアルコンスタントのことらしい
		real,CNUM
		type,3		!要素ナンバー3のこと 3ということはtarge170
		cmsel,s,a_targ	!Cuの表面選択
		nsla,s,1	!選択されたエリアに関する節点の選択
		esurf		!既存の要素の自由表面に重ねて要素を生成とのこと
		type,8		!評価しない接触
		cmsel,s,a_cont	!はんだ下面の選択
		nsla,s,1	!選択されたエリアに関する節点の選択
		esurf
		allsel

		CNUM=CNUM+1
		allsel
		!Create Contact Pair
		asel,s,,,A12+42+6	!上面を選択
		cm,a_cont,area	!a_contという名をつける
		asel,s,,,213	!Cu表面を選択
		cm,a_targ,area	!a_targという名をつける  TARGがくっつける相手の（通常大きいほうの）面
		allsel
		r,CNUM
		rmodif,CNUM,14,1e6		!14は接触コンダクタンスのこと CONTA174の リアルコンスタントのことらしい
		real,CNUM
		type,3		!要素ナンバー3のこと 3ということはtarge170
		cmsel,s,a_targ	!Cuの表面選択
		nsla,s,1	!選択されたエリアに関する節点の選択
		esurf		!既存の要素の自由表面に重ねて要素を生成とのこと
		type,8		!粗い樹脂と銅の接触
		cmsel,s,a_cont	!はんだ下面の選択
		nsla,s,1	!選択されたエリアに関する節点の選択
		esurf
		allsel

		CNUM=CNUM+1
		allsel
		!Create Contact Pair
		asel,s,,,A12+42+2	!前面を選択
		cm,a_cont,area	!a_contという名をつける
		asel,s,,,A11+6+4	!Cu表面を選択
		cm,a_targ,area	!a_targという名をつける  TARGがくっつける相手の（通常大きいほうの）面
		allsel
		r,CNUM
		rmodif,CNUM,14,1e6		!14は接触コンダクタンスのこと CONTA174の リアルコンスタントのことらしい
		real,CNUM
		type,3		!要素ナンバー3のこと 3ということはtarge170
		cmsel,s,a_targ	!Cuの表面選択
		nsla,s,1	!選択されたエリアに関する節点の選択
		esurf		!既存の要素の自由表面に重ねて要素を生成とのこと
		type,5		!評価しない接触
		cmsel,s,a_cont	!はんだ下面の選択
		nsla,s,1	!選択されたエリアに関する節点の選択
		esurf
		allsel

		CNUM=CNUM+1
		allsel
		!Create Contact Pair
		asel,s,,,A12+42+5	!左面を選択
		cm,a_cont,area	!a_contという名をつける
		asel,s,,,A1+PARA*20+(PARA-1-mm)*20+8	!Cu表面を選択
		cm,a_targ,area	!a_targという名をつける  TARGがくっつける相手の（通常大きいほうの）面
		allsel
		r,CNUM
		rmodif,CNUM,14,1e6		!14は接触コンダクタンスのこと CONTA174の リアルコンスタントのことらしい
		real,CNUM
		type,3		!要素ナンバー3のこと 3ということはtarge170
		cmsel,s,a_targ	!Cuの表面選択
		nsla,s,1	!選択されたエリアに関する節点の選択
		esurf		!既存の要素の自由表面に重ねて要素を生成とのこと
		type,5		!評価しない接触
		cmsel,s,a_cont	!はんだ下面の選択
		nsla,s,1	!選択されたエリアに関する節点の選択
		esurf
		allsel

		CNUM=CNUM+1
		allsel
		!Create Contact Pair
		asel,s,,,A12+42+5	!左面を選択
		cm,a_cont,area	!a_contという名をつける
		asel,s,,,A2+PARA*16+(PARA-1-mm)*16+7	!Cu表面を選択
		cm,a_targ,area	!a_targという名をつける  TARGがくっつける相手の（通常大きいほうの）面
		allsel
		r,CNUM
		rmodif,CNUM,14,1e6		!14は接触コンダクタンスのこと CONTA174の リアルコンスタントのことらしい
		real,CNUM
		type,3		!要素ナンバー3のこと 3ということはtarge170
		cmsel,s,a_targ	!Cuの表面選択
		nsla,s,1	!選択されたエリアに関する節点の選択
		esurf		!既存の要素の自由表面に重ねて要素を生成とのこと
		type,5		!評価しない接触
		cmsel,s,a_cont	!はんだ下面の選択
		nsla,s,1	!選択されたエリアに関する節点の選択
		esurf
		allsel

		CNUM=CNUM+1
		allsel
		!Create Contact Pair
		asel,s,,,A12+42+5	!左面を選択
		cm,a_cont,area	!a_contという名をつける
		asel,s,,,A3+PARA*30+(PARA-1-mm)*30+18	!Cu表面を選択
		cm,a_targ,area	!a_targという名をつける  TARGがくっつける相手の（通常大きいほうの）面
		allsel
		r,CNUM
		rmodif,CNUM,14,1e6		!14は接触コンダクタンスのこと CONTA174の リアルコンスタントのことらしい
		real,CNUM
		type,3		!要素ナンバー3のこと 3ということはtarge170
		cmsel,s,a_targ	!Cuの表面選択
		nsla,s,1	!選択されたエリアに関する節点の選択
		esurf		!既存の要素の自由表面に重ねて要素を生成とのこと
		type,5		!評価しない接触
		cmsel,s,a_cont	!はんだ下面の選択
		nsla,s,1	!選択されたエリアに関する節点の選択
		esurf
		allsel

		CNUM=CNUM+1
		allsel
		!Create Contact Pair
		asel,s,,,A12+42+5	!左面を選択
		cm,a_cont,area	!a_contという名をつける
		asel,s,,,A4+PARA*4+(PARA-1-mm)*4+3	!Cu表面を選択
		cm,a_targ,area	!a_targという名をつける  TARGがくっつける相手の（通常大きいほうの）面
		allsel
		r,CNUM
		rmodif,CNUM,14,1e6		!14は接触コンダクタンスのこと CONTA174の リアルコンスタントのことらしい
		real,CNUM
		type,3		!要素ナンバー3のこと 3ということはtarge170
		cmsel,s,a_targ	!Cuの表面選択
		nsla,s,1	!選択されたエリアに関する節点の選択
		esurf		!既存の要素の自由表面に重ねて要素を生成とのこと
		type,5		!評価しない接触
		cmsel,s,a_cont	!はんだ下面の選択
		nsla,s,1	!選択されたエリアに関する節点の選択
		esurf
		allsel

		CNUM=CNUM+1
		allsel
		!Create Contact Pair
		asel,s,,,A12+42+5	!左面を選択
		cm,a_cont,area	!a_contという名をつける
		asel,s,,,A5+PARA*27+(PARA-1-mm)*27+15	!Cu表面を選択
		cm,a_targ,area	!a_targという名をつける  TARGがくっつける相手の（通常大きいほうの）面
		allsel
		r,CNUM
		rmodif,CNUM,14,1e6		!14は接触コンダクタンスのこと CONTA174の リアルコンスタントのことらしい
		real,CNUM
		type,3		!要素ナンバー3のこと 3ということはtarge170
		cmsel,s,a_targ	!Cuの表面選択
		nsla,s,1	!選択されたエリアに関する節点の選択
		esurf		!既存の要素の自由表面に重ねて要素を生成とのこと
		type,5		!評価しない接触
		cmsel,s,a_cont	!はんだ下面の選択
		nsla,s,1	!選択されたエリアに関する節点の選択
		esurf
		allsel

		CNUM=CNUM+1
		allsel
		!Create Contact Pair
		asel,s,,,A12+42+5	!左面を選択
		cm,a_cont,area	!a_contという名をつける
		asel,s,,,A5+PARA*27+(PARA-1-mm)*27+27	!Cu表面を選択
		cm,a_targ,area	!a_targという名をつける  TARGがくっつける相手の（通常大きいほうの）面
		allsel
		r,CNUM
		rmodif,CNUM,14,1e6		!14は接触コンダクタンスのこと CONTA174の リアルコンスタントのことらしい
		real,CNUM
		type,3		!要素ナンバー3のこと 3ということはtarge170
		cmsel,s,a_targ	!Cuの表面選択
		nsla,s,1	!選択されたエリアに関する節点の選択
		esurf		!既存の要素の自由表面に重ねて要素を生成とのこと
		type,5		!評価しない接触
		cmsel,s,a_cont	!はんだ下面の選択
		nsla,s,1	!選択されたエリアに関する節点の選択
		esurf
		allsel

		CNUM=CNUM+1
		allsel
		!Create Contact Pair
		asel,s,,,A12+42+5	!左面を選択
		cm,a_cont,area	!a_contという名をつける
		asel,s,,,A6+PARA*20+(PARA-1-mm)*20+8	!Cu表面を選択
		cm,a_targ,area	!a_targという名をつける  TARGがくっつける相手の（通常大きいほうの）面
		allsel
		r,CNUM
		rmodif,CNUM,14,1e6		!14は接触コンダクタンスのこと CONTA174の リアルコンスタントのことらしい
		real,CNUM
		type,3		!要素ナンバー3のこと 3ということはtarge170
		cmsel,s,a_targ	!Cuの表面選択
		nsla,s,1	!選択されたエリアに関する節点の選択
		esurf		!既存の要素の自由表面に重ねて要素を生成とのこと
		type,5		!評価しない接触
		cmsel,s,a_cont	!はんだ下面の選択
		nsla,s,1	!選択されたエリアに関する節点の選択
		esurf
		allsel

		CNUM=CNUM+1
		allsel
		!Create Contact Pair
		asel,s,,,A12+42+5	!左面を選択
		cm,a_cont,area	!a_contという名をつける
		asel,s,,,A7+PARA*16+(PARA-1-mm)*16+7	!Cu表面を選択
		cm,a_targ,area	!a_targという名をつける  TARGがくっつける相手の（通常大きいほうの）面
		allsel
		r,CNUM
		rmodif,CNUM,14,1e6		!14は接触コンダクタンスのこと CONTA174の リアルコンスタントのことらしい
		real,CNUM
		type,3		!要素ナンバー3のこと 3ということはtarge170
		cmsel,s,a_targ	!Cuの表面選択
		nsla,s,1	!選択されたエリアに関する節点の選択
		esurf		!既存の要素の自由表面に重ねて要素を生成とのこと
		type,5		!評価しない接触
		cmsel,s,a_cont	!はんだ下面の選択
		nsla,s,1	!選択されたエリアに関する節点の選択
		esurf
		allsel

		CNUM=CNUM+1
		allsel
		!Create Contact Pair
		asel,s,,,A12+42+5	!左面を選択
		cm,a_cont,area	!a_contという名をつける
		asel,s,,,A8+PARA*16+(PARA-1-mm)*16+6	!Cu表面を選択
		cm,a_targ,area	!a_targという名をつける  TARGがくっつける相手の（通常大きいほうの）面
		allsel
		r,CNUM
		rmodif,CNUM,14,1e6		!14は接触コンダクタンスのこと CONTA174の リアルコンスタントのことらしい
		real,CNUM
		type,3		!要素ナンバー3のこと 3ということはtarge170
		cmsel,s,a_targ	!Cuの表面選択
		nsla,s,1	!選択されたエリアに関する節点の選択
		esurf		!既存の要素の自由表面に重ねて要素を生成とのこと
		type,5		!評価しない接触
		cmsel,s,a_cont	!はんだ下面の選択
		nsla,s,1	!選択されたエリアに関する節点の選択
		esurf
		allsel

		CNUM=CNUM+1
		allsel
		!Create Contact Pair
		asel,s,,,A12+42+5	!左面を選択
		cm,a_cont,area	!a_contという名をつける
		asel,s,,,A9+PARA*6+(PARA-1-mm)*6+3	!Cu表面を選択
		cm,a_targ,area	!a_targという名をつける  TARGがくっつける相手の（通常大きいほうの）面
		allsel
		r,CNUM
		rmodif,CNUM,14,1e6		!14は接触コンダクタンスのこと CONTA174の リアルコンスタントのことらしい
		real,CNUM
		type,3		!要素ナンバー3のこと 3ということはtarge170
		cmsel,s,a_targ	!Cuの表面選択
		nsla,s,1	!選択されたエリアに関する節点の選択
		esurf		!既存の要素の自由表面に重ねて要素を生成とのこと
		type,5		!評価しない接触
		cmsel,s,a_cont	!はんだ下面の選択
		nsla,s,1	!選択されたエリアに関する節点の選択
		esurf
		allsel

!チップサイドの樹脂作成で、
!点 8*8新規発生
!線 12*8新規発生
!面 6*8新規発生
!VOL 8新規発生
!X1=KBASE+2*PARA*8*10
!X1=X1+2*PARA*32+2*PARA*8
!X1=X1+2*PARA*26+13*PARA*2
!X1=X1+16*PARA*2+8*PARA*2
!X1=X1+8*PARA*2+8*PARA*2		!チップ周辺最後の樹脂
!X1=X1+8*(PARA-2)*2
!X1=X1+16
X1=X1+8*8
!X2=LBASE+2*PARA*12*10
!X2=X2+2*PARA*(32+20)		!チップ側面樹脂まで
!X2=X2+2*PARA*53+33*PARA*2	!53EMIはんだ側面樹脂
!X2=X2+32*PARA*2+20*PARA*2	!
!X2=X2+20*PARA*2+12*PARA*2
!X2=X2+12*(PARA-2)*2
!X2=X2+24
X2=X2+12*8
!X3=ABASE+2*PARA*6*10	!樹脂なしの各PARA要素まで
!X3=X3+2*PARA*(20+16)	!チップ周りの樹脂
!X3=X3+2*PARA*(30+4)+2*PARA*27			!EMIはんだまわりの樹脂+SPC周辺
!X3=X3+20*PARA*2+16*PARA*2
!X3=X3+16*PARA*2+6*PARA*2
!X3=X3+6*(PARA-2)*2
!X3=X3+12
X3=X3+6*8
!X4=VBASE+2*PARA*10+2*PARA*8
!X4=X4+2*PARA*7+2*PARA*7
!X4=X4+4*PARA*2+4*PARA*2
!X4=X4+4*PARA*2+PARA*2
!X4=X4+(PARA-2)*2
!X4=X4+2
X4=X4+8

*DO,ii,1,8,1			!8つすべて
	*DO,jj,1,2,1		!上下
		*DO,kk,1,4,1	!4方向
				nn=X1+(ii-1)*8+(jj-1)*4+kk
				k,nn,RESINBUSSIDE(ii,jj,kk,1),RESINBUSSIDE(ii,jj,kk,2),RESINBUSSIDE(ii,jj,kk,3)
		*ENDDO
	*ENDDO
*ENDDO
*DO,ii,1,8,1
			kk=X1+(ii-1)*8
			V,kk+1,kk+2,kk+3,kk+4,kk+5,kk+6,kk+7,kk+8
*ENDDO
D_PLTZ=NINT((BSOLT*2+OPOLEZ)/M_RESINZ)
*IF,D_PLTZ,LT,3,THEN
	D_PLTZ=3
*ENDIF
*DO,ii,1,8,1
		D_PLTX=NINT((RESINBUSSIDE(ii,1,2,1)-RESINBUSSIDE(ii,1,1,1))/M_RESINX)
		D_PLTY=NINT((RESINBUSSIDE(ii,1,3,2)-RESINBUSSIDE(ii,1,2,2))/M_RESINY)
		lsel,s,,,X2+(ii-1)*12+1
		lesiz,all,,,D_PLTX		!z分割
		lsel,all			!最後にこのALLがないと、次にLをSELできなくなってしまいエラーが発生します。これはMUST
		lsel,s,,,X2+(ii-1)*12+2
		lesiz,all,,,D_PLTY		!z分割
		lsel,all			!最後にこのALLがないと、次にLをSELできなくなってしまいエラーが発生します。これはMUST
		lsel,s,,,X2+(ii-1)*12+5
		lesiz,all,,,D_PLTZ		!z分割
		lsel,all			!最後にこのALLがないと、次にLをSELできなくなってしまいエラーが発生します。これはMUST
		VMESH,X4+ii
*ENDDO

!-----------------次にこれら中央柱前後樹脂とチップ行前後横長樹脂の接触-----------------------------
!改めて面の基準どり
A1=ABASE+PARA*2*6*10	! ←樹脂の手前まで 上のDBC下はんだまで
A2=A1+20*PARA*2	! ダイ半田横の樹脂まで
A3=A2+16*PARA*2					! チップ横の樹脂まで
A4=A3+30*PARA*2					!EMIはんだ周辺樹脂まで
A5=A4+4*PARA*2					!EMIはんだまわり全部
A6=A5+27*PARA*2			!SPC下部分周辺樹脂まで
A7=A6+20*PARA*2			!面取り周辺樹脂まで
A8=A7+16*PARA*2			!上SPC周辺樹脂まで
A9=A8+16*PARA*2			!SPC上はんだ周辺樹脂まで
A10=A9+6*PARA*2			!EMI上の最後の樹脂まで
A11=A10+6*(PARA-2)*2			!PARA間の樹脂まで
A12=A11+6*2				!中央の樹脂まで
A13=A12+6*8				!チップ横の樹脂まで

!中央の4個　信号側から
		CNUM=CNUM+1
		allsel
		!Create Contact Pair
		asel,s,,,A13+1	!左面を選択
		cm,a_cont,area	!a_contという名をつける
		asel,s,,,24	!Cu表面を選択
		cm,a_targ,area	!a_targという名をつける  TARGがくっつける相手の（通常大きいほうの）面
		allsel
		r,CNUM
		rmodif,CNUM,14,1e6		!14は接触コンダクタンスのこと CONTA174の リアルコンスタントのことらしい
		real,CNUM
		type,3		!要素ナンバー3のこと 3ということはtarge170
		cmsel,s,a_targ	!Cuの表面選択
		nsla,s,1	!選択されたエリアに関する節点の選択
		esurf		!既存の要素の自由表面に重ねて要素を生成とのこと
		type,8		!粗い樹脂と銅の接触
		cmsel,s,a_cont	!はんだ下面の選択
		nsla,s,1	!選択されたエリアに関する節点の選択
		esurf
		allsel

		CNUM=CNUM+1
		allsel
		!Create Contact Pair
		asel,s,,,A13+6	!上面を選択
		cm,a_cont,area	!a_contという名をつける
		asel,s,,,207	!Cu表面を選択
		cm,a_targ,area	!a_targという名をつける  TARGがくっつける相手の（通常大きいほうの）面
		allsel
		r,CNUM
		rmodif,CNUM,14,1e6		!14は接触コンダクタンスのこと CONTA174の リアルコンスタントのことらしい
		real,CNUM
		type,3		!要素ナンバー3のこと 3ということはtarge170
		cmsel,s,a_targ	!Cuの表面選択
		nsla,s,1	!選択されたエリアに関する節点の選択
		esurf		!既存の要素の自由表面に重ねて要素を生成とのこと
		type,8		!粗い樹脂と銅の接触
		cmsel,s,a_cont	!はんだ下面の選択
		nsla,s,1	!選択されたエリアに関する節点の選択
		esurf
		allsel

		CNUM=CNUM+1
		allsel
		!Create Contact Pair
		asel,s,,,A13+6	!左面を選択
		cm,a_cont,area	!a_contという名をつける
		asel,s,,,219	!Cu表面を選択
		cm,a_targ,area	!a_targという名をつける  TARGがくっつける相手の（通常大きいほうの）面
		allsel
		r,CNUM
		rmodif,CNUM,14,1e6		!14は接触コンダクタンスのこと CONTA174の リアルコンスタントのことらしい
		real,CNUM
		type,3		!要素ナンバー3のこと 3ということはtarge170
		cmsel,s,a_targ	!Cuの表面選択
		nsla,s,1	!選択されたエリアに関する節点の選択
		esurf		!既存の要素の自由表面に重ねて要素を生成とのこと
		type,5		!評価しない接触
		cmsel,s,a_cont	!はんだ下面の選択
		nsla,s,1	!選択されたエリアに関する節点の選択
		esurf
		allsel

		CNUM=CNUM+1
		allsel
		!Create Contact Pair
		asel,s,,,A13+2	!前面を選択
		cm,a_cont,area	!a_contという名をつける
		asel,s,,,314	!Cu表面を選択
		cm,a_targ,area	!a_targという名をつける  TARGがくっつける相手の（通常大きいほうの）面
		allsel
		r,CNUM
		rmodif,CNUM,14,1e6		!14は接触コンダクタンスのこと CONTA174の リアルコンスタントのことらしい
		real,CNUM
		type,3		!要素ナンバー3のこと 3ということはtarge170
		cmsel,s,a_targ	!Cuの表面選択
		nsla,s,1	!選択されたエリアに関する節点の選択
		esurf		!既存の要素の自由表面に重ねて要素を生成とのこと
		TYPE,5		!樹脂とはんだの接触
		cmsel,s,a_cont	!はんだ下面の選択
		nsla,s,1	!選択されたエリアに関する節点の選択
		esurf
		allsel

		CNUM=CNUM+1
		allsel
		!Create Contact Pair
		asel,s,,,A13+2	!前面を選択
		cm,a_cont,area	!a_contという名をつける
		asel,s,,,335	!Cu表面を選択
		cm,a_targ,area	!a_targという名をつける  TARGがくっつける相手の（通常大きいほうの）面
		allsel
		r,CNUM
		rmodif,CNUM,14,1e6		!14は接触コンダクタンスのこと CONTA174の リアルコンスタントのことらしい
		real,CNUM
		type,3		!要素ナンバー3のこと 3ということはtarge170
		cmsel,s,a_targ	!Cuの表面選択
		nsla,s,1	!選択されたエリアに関する節点の選択
		esurf		!既存の要素の自由表面に重ねて要素を生成とのこと
		type,8		!粗い樹脂と銅の接触
		cmsel,s,a_cont	!はんだ下面の選択
		nsla,s,1	!選択されたエリアに関する節点の選択
		esurf
		allsel

		CNUM=CNUM+1
		allsel
		!Create Contact Pair
		asel,s,,,A13+3	!右面を選択
		cm,a_cont,area	!a_contという名をつける
		asel,s,,,A13+6*6+5	!Cu表面を選択
		cm,a_targ,area	!a_targという名をつける  TARGがくっつける相手の（通常大きいほうの）面
		allsel
		r,CNUM
		rmodif,CNUM,14,1e6		!14は接触コンダクタンスのこと CONTA174の リアルコンスタントのことらしい
		real,CNUM
		type,3		!要素ナンバー3のこと 3ということはtarge170
		cmsel,s,a_targ	!Cuの表面選択
		nsla,s,1	!選択されたエリアに関する節点の選択
		esurf		!既存の要素の自由表面に重ねて要素を生成とのこと
		type,5		!評価しない接触
		cmsel,s,a_cont	!はんだ下面の選択
		nsla,s,1	!選択されたエリアに関する節点の選択
		esurf
		allsel

		CNUM=CNUM+1
		allsel
		!Create Contact Pair
		asel,s,,,A13+3	!右面を選択
		cm,a_cont,area	!a_contという名をつける
		asel,s,,,A12+6*4+5	!Cu表面を選択
		cm,a_targ,area	!a_targという名をつける  TARGがくっつける相手の（通常大きいほうの）面
		allsel
		r,CNUM
		rmodif,CNUM,14,1e6		!14は接触コンダクタンスのこと CONTA174の リアルコンスタントのことらしい
		real,CNUM
		type,3		!要素ナンバー3のこと 3ということはtarge170
		cmsel,s,a_targ	!Cuの表面選択
		nsla,s,1	!選択されたエリアに関する節点の選択
		esurf		!既存の要素の自由表面に重ねて要素を生成とのこと
		type,5		!評価しない接触
		cmsel,s,a_cont	!はんだ下面の選択
		nsla,s,1	!選択されたエリアに関する節点の選択
		esurf
		allsel

		CNUM=CNUM+1
		allsel
		!Create Contact Pair
		asel,s,,,A13+3	!右面を選択
		cm,a_cont,area	!a_contという名をつける
		asel,s,,,A11+6+5	!Cu表面を選択
		cm,a_targ,area	!a_targという名をつける  TARGがくっつける相手の（通常大きいほうの）面
		allsel
		r,CNUM
		rmodif,CNUM,14,1e6		!14は接触コンダクタンスのこと CONTA174の リアルコンスタントのことらしい
		real,CNUM
		type,3		!要素ナンバー3のこと 3ということはtarge170
		cmsel,s,a_targ	!Cuの表面選択
		nsla,s,1	!選択されたエリアに関する節点の選択
		esurf		!既存の要素の自由表面に重ねて要素を生成とのこと
		type,5		!評価しない接触
		cmsel,s,a_cont	!はんだ下面の選択
		nsla,s,1	!選択されたエリアに関する節点の選択
		esurf
		allsel

		CNUM=CNUM+1
		allsel
		!Create Contact Pair
		asel,s,,,A13+4	!後ろ面を選択
		cm,a_cont,area	!a_contという名をつける
		asel,s,,,ABASE-32+2	!Cu表面を選択
		cm,a_targ,area	!a_targという名をつける  TARGがくっつける相手の（通常大きいほうの）面
		allsel
		r,CNUM
		rmodif,CNUM,14,1e6		!14は接触コンダクタンスのこと CONTA174の リアルコンスタントのことらしい
		real,CNUM
		type,3		!要素ナンバー3のこと 3ということはtarge170
		cmsel,s,a_targ	!Cuの表面選択
		nsla,s,1	!選択されたエリアに関する節点の選択
		esurf		!既存の要素の自由表面に重ねて要素を生成とのこと
		TYPE,5		!はんだと樹脂の接触
		cmsel,s,a_cont	!はんだ下面の選択
		nsla,s,1	!選択されたエリアに関する節点の選択
		esurf
		allsel

		CNUM=CNUM+1
		allsel
		!Create Contact Pair
		asel,s,,,A13+4	!後ろ面を選択
		cm,a_cont,area	!a_contという名をつける
		asel,s,,,ABASE-32+8	!Cu表面を選択
		cm,a_targ,area	!a_targという名をつける  TARGがくっつける相手の（通常大きいほうの）面
		allsel
		r,CNUM
		rmodif,CNUM,14,1e6		!14は接触コンダクタンスのこと CONTA174の リアルコンスタントのことらしい
		real,CNUM
		type,3		!要素ナンバー3のこと 3ということはtarge170
		cmsel,s,a_targ	!Cuの表面選択
		nsla,s,1	!選択されたエリアに関する節点の選択
		esurf		!既存の要素の自由表面に重ねて要素を生成とのこと
		type,8		!粗い樹脂と銅の接触
		cmsel,s,a_cont	!はんだ下面の選択
		nsla,s,1	!選択されたエリアに関する節点の選択
		esurf
		allsel

		CNUM=CNUM+1
		allsel
		!Create Contact Pair
		asel,s,,,A13+4	!後ろ面を選択
		cm,a_cont,area	!a_contという名をつける
		asel,s,,,ABASE-32+13	!Cu表面を選択
		cm,a_targ,area	!a_targという名をつける  TARGがくっつける相手の（通常大きいほうの）面
		allsel
		r,CNUM
		rmodif,CNUM,14,1e6		!14は接触コンダクタンスのこと CONTA174の リアルコンスタントのことらしい
		real,CNUM
		type,3		!要素ナンバー3のこと 3ということはtarge170
		cmsel,s,a_targ	!Cuの表面選択
		nsla,s,1	!選択されたエリアに関する節点の選択
		esurf		!既存の要素の自由表面に重ねて要素を生成とのこと
		TYPE,5		!はんだと樹脂の接触
		cmsel,s,a_cont	!はんだ下面の選択
		nsla,s,1	!選択されたエリアに関する節点の選択
		esurf
		allsel

		CNUM=CNUM+1
		allsel
		!Create Contact Pair
		asel,s,,,A13+5	!左面を選択
		cm,a_cont,area	!a_contという名をつける
		asel,s,,,A13+6*4+3	!Cu表面を選択
		cm,a_targ,area	!a_targという名をつける  TARGがくっつける相手の（通常大きいほうの）面
		allsel
		r,CNUM
		rmodif,CNUM,14,1e6		!14は接触コンダクタンスのこと CONTA174の リアルコンスタントのことらしい
		real,CNUM
		type,3		!要素ナンバー3のこと 3ということはtarge170
		cmsel,s,a_targ	!Cuの表面選択
		nsla,s,1	!選択されたエリアに関する節点の選択
		esurf		!既存の要素の自由表面に重ねて要素を生成とのこと
		type,5		!評価しない接触
		cmsel,s,a_cont	!はんだ下面の選択
		nsla,s,1	!選択されたエリアに関する節点の選択
		esurf
		allsel

		CNUM=CNUM+1
		allsel
		!Create Contact Pair
		asel,s,,,A13+5	!左面を選択
		cm,a_cont,area	!a_contという名をつける
		asel,s,,,A12+6*2+3	!Cu表面を選択
		cm,a_targ,area	!a_targという名をつける  TARGがくっつける相手の（通常大きいほうの）面
		allsel
		r,CNUM
		rmodif,CNUM,14,1e6		!14は接触コンダクタンスのこと CONTA174の リアルコンスタントのことらしい
		real,CNUM
		type,3		!要素ナンバー3のこと 3ということはtarge170
		cmsel,s,a_targ	!Cuの表面選択
		nsla,s,1	!選択されたエリアに関する節点の選択
		esurf		!既存の要素の自由表面に重ねて要素を生成とのこと
		type,5		!評価しない接触
		cmsel,s,a_cont	!はんだ下面の選択
		nsla,s,1	!選択されたエリアに関する節点の選択
		esurf
		allsel

		CNUM=CNUM+1
		allsel
		!Create Contact Pair
		asel,s,,,A13+5	!左面を選択
		cm,a_cont,area	!a_contという名をつける
		asel,s,,,A11+3	!Cu表面を選択
		cm,a_targ,area	!a_targという名をつける  TARGがくっつける相手の（通常大きいほうの）面
		allsel
		r,CNUM
		rmodif,CNUM,14,1e6		!14は接触コンダクタンスのこと CONTA174の リアルコンスタントのことらしい
		real,CNUM
		type,3		!要素ナンバー3のこと 3ということはtarge170
		cmsel,s,a_targ	!Cuの表面選択
		nsla,s,1	!選択されたエリアに関する節点の選択
		esurf		!既存の要素の自由表面に重ねて要素を生成とのこと
		type,5		!評価しない接触
		cmsel,s,a_cont	!はんだ下面の選択
		nsla,s,1	!選択されたエリアに関する節点の選択
		esurf
		allsel

!中央2個目の樹脂の接合 OPOLEの後ろ
		CNUM=CNUM+1
		allsel
		!Create Contact Pair
		asel,s,,,A13+6+1	!左面を選択
		cm,a_cont,area	!a_contという名をつける
		asel,s,,,108	!Cu表面を選択
		cm,a_targ,area	!a_targという名をつける  TARGがくっつける相手の（通常大きいほうの）面
		allsel
		r,CNUM
		rmodif,CNUM,14,1e6		!14は接触コンダクタンスのこと CONTA174の リアルコンスタントのことらしい
		real,CNUM
		type,3		!要素ナンバー3のこと 3ということはtarge170
		cmsel,s,a_targ	!Cuの表面選択
		nsla,s,1	!選択されたエリアに関する節点の選択
		esurf		!既存の要素の自由表面に重ねて要素を生成とのこと
		type,5		!評価しない接触
		cmsel,s,a_cont	!はんだ下面の選択
		nsla,s,1	!選択されたエリアに関する節点の選択
		esurf
		allsel

*DO,ii,1,2,1
		CNUM=CNUM+1
		allsel
		!Create Contact Pair
		asel,s,,,A13+6+1	!左面を選択
		cm,a_cont,area	!a_contという名をつける
		asel,s,,,24+(ii-1)*18	!Cu表面を選択
		cm,a_targ,area	!a_targという名をつける  TARGがくっつける相手の（通常大きいほうの）面
		allsel
		r,CNUM
		rmodif,CNUM,14,1e6		!14は接触コンダクタンスのこと CONTA174の リアルコンスタントのことらしい
		real,CNUM
		type,3		!要素ナンバー3のこと 3ということはtarge170
		cmsel,s,a_targ	!Cuの表面選択
		nsla,s,1	!選択されたエリアに関する節点の選択
		esurf		!既存の要素の自由表面に重ねて要素を生成とのこと
		type,8		!粗い樹脂と銅の接触
		cmsel,s,a_cont	!はんだ下面の選択
		nsla,s,1	!選択されたエリアに関する節点の選択
		esurf
		allsel
*ENDDO


*DO,ii,1,2,1
		CNUM=CNUM+1
		allsel
		!Create Contact Pair
		asel,s,,,A13+6+6	!左面を選択
		cm,a_cont,area	!a_contという名をつける
		asel,s,,,249+(ii-1)*6	!Cu表面を選択
		cm,a_targ,area	!a_targという名をつける  TARGがくっつける相手の（通常大きいほうの）面
		allsel
		r,CNUM
		rmodif,CNUM,14,1e6		!14は接触コンダクタンスのこと CONTA174の リアルコンスタントのことらしい
		real,CNUM
		type,3		!要素ナンバー3のこと 3ということはtarge170
		cmsel,s,a_targ	!Cuの表面選択
		nsla,s,1	!選択されたエリアに関する節点の選択
		esurf		!既存の要素の自由表面に重ねて要素を生成とのこと
		type,5		!評価しない接触
		cmsel,s,a_cont	!はんだ下面の選択
		nsla,s,1	!選択されたエリアに関する節点の選択
		esurf
		allsel
*ENDDO

*DO,ii,1,2,1
		CNUM=CNUM+1
		allsel
		!Create Contact Pair
		asel,s,,,A13+6+6	!左面を選択
		cm,a_cont,area	!a_contという名をつける
		asel,s,,,201+(ii-1)*6	!Cu表面を選択
		cm,a_targ,area	!a_targという名をつける  TARGがくっつける相手の（通常大きいほうの）面
		allsel
		r,CNUM
		rmodif,CNUM,14,1e6		!14は接触コンダクタンスのこと CONTA174の リアルコンスタントのことらしい
		real,CNUM
		type,3		!要素ナンバー3のこと 3ということはtarge170
		cmsel,s,a_targ	!Cuの表面選択
		nsla,s,1	!選択されたエリアに関する節点の選択
		esurf		!既存の要素の自由表面に重ねて要素を生成とのこと
		type,8		!粗い樹脂と銅の接触
		cmsel,s,a_cont	!はんだ下面の選択
		nsla,s,1	!選択されたエリアに関する節点の選択
		esurf
		allsel
*ENDDO

		CNUM=CNUM+1
		allsel
		!Create Contact Pair
		asel,s,,,A13+6+2	!前面を選択
		cm,a_cont,area	!a_contという名をつける
		asel,s,,,ABASE-32+4	!Cu表面を選択
		cm,a_targ,area	!a_targという名をつける  TARGがくっつける相手の（通常大きいほうの）面
		allsel
		r,CNUM
		rmodif,CNUM,14,1e6		!14は接触コンダクタンスのこと CONTA174の リアルコンスタントのことらしい
		real,CNUM
		type,3		!要素ナンバー3のこと 3ということはtarge170
		cmsel,s,a_targ	!Cuの表面選択
		nsla,s,1	!選択されたエリアに関する節点の選択
		esurf		!既存の要素の自由表面に重ねて要素を生成とのこと
		TYPE,5		!はんだと樹脂の接触
		cmsel,s,a_cont	!はんだ下面の選択
		nsla,s,1	!選択されたエリアに関する節点の選択
		esurf
		allsel

		CNUM=CNUM+1
		allsel
		!Create Contact Pair
		asel,s,,,A13+6+2	!前面を選択
		cm,a_cont,area	!a_contという名をつける
		asel,s,,,ABASE-32+10	!Cu表面を選択
		cm,a_targ,area	!a_targという名をつける  TARGがくっつける相手の（通常大きいほうの）面
		allsel
		r,CNUM
		rmodif,CNUM,14,1e6		!14は接触コンダクタンスのこと CONTA174の リアルコンスタントのことらしい
		real,CNUM
		type,3		!要素ナンバー3のこと 3ということはtarge170
		cmsel,s,a_targ	!Cuの表面選択
		nsla,s,1	!選択されたエリアに関する節点の選択
		esurf		!既存の要素の自由表面に重ねて要素を生成とのこと
		type,8		!粗い樹脂と銅の接触
		cmsel,s,a_cont	!はんだ下面の選択
		nsla,s,1	!選択されたエリアに関する節点の選択
		esurf
		allsel

		CNUM=CNUM+1
		allsel
		!Create Contact Pair
		asel,s,,,A13+6+2	!前面を選択
		cm,a_cont,area	!a_contという名をつける
		asel,s,,,ABASE-32+15	!Cu表面を選択
		cm,a_targ,area	!a_targという名をつける  TARGがくっつける相手の（通常大きいほうの）面
		allsel
		r,CNUM
		rmodif,CNUM,14,1e6		!14は接触コンダクタンスのこと CONTA174の リアルコンスタントのことらしい
		real,CNUM
		type,3		!要素ナンバー3のこと 3ということはtarge170
		cmsel,s,a_targ	!Cuの表面選択
		nsla,s,1	!選択されたエリアに関する節点の選択
		esurf		!既存の要素の自由表面に重ねて要素を生成とのこと
		TYPE,5		!はんだと樹脂の接触
		cmsel,s,a_cont	!はんだ下面の選択
		nsla,s,1	!選択されたエリアに関する節点の選択
		esurf
		allsel

		CNUM=CNUM+1
		allsel
		!Create Contact Pair
		asel,s,,,A13+6+3	!右面を選択
		cm,a_cont,area	!a_contという名をつける
		asel,s,,,A12+6*4+5	!Cu表面を選択
		cm,a_targ,area	!a_targという名をつける  TARGがくっつける相手の（通常大きいほうの）面
		allsel
		r,CNUM
		rmodif,CNUM,14,1e6		!14は接触コンダクタンスのこと CONTA174の リアルコンスタントのことらしい
		real,CNUM
		type,3		!要素ナンバー3のこと 3ということはtarge170
		cmsel,s,a_targ	!Cuの表面選択
		nsla,s,1	!選択されたエリアに関する節点の選択
		esurf		!既存の要素の自由表面に重ねて要素を生成とのこと
		type,5		!評価しない接触
		cmsel,s,a_cont	!はんだ下面の選択
		nsla,s,1	!選択されたエリアに関する節点の選択
		esurf
		allsel

		CNUM=CNUM+1
		allsel
		!Create Contact Pair
		asel,s,,,A13+6+3	!右面を選択
		cm,a_cont,area	!a_contという名をつける
		asel,s,,,A11+6+5	!Cu表面を選択
		cm,a_targ,area	!a_targという名をつける  TARGがくっつける相手の（通常大きいほうの）面
		allsel
		r,CNUM
		rmodif,CNUM,14,1e6		!14は接触コンダクタンスのこと CONTA174の リアルコンスタントのことらしい
		real,CNUM
		type,3		!要素ナンバー3のこと 3ということはtarge170
		cmsel,s,a_targ	!Cuの表面選択
		nsla,s,1	!選択されたエリアに関する節点の選択
		esurf		!既存の要素の自由表面に重ねて要素を生成とのこと
		type,5		!評価しない接触
		cmsel,s,a_cont	!はんだ下面の選択
		nsla,s,1	!選択されたエリアに関する節点の選択
		esurf
		allsel

		CNUM=CNUM+1
		allsel
		!Create Contact Pair
		asel,s,,,A13+6+3	!右面を選択
		cm,a_cont,area	!a_contという名をつける
		asel,s,,,A11+6+5	!Cu表面を選択
		cm,a_targ,area	!a_targという名をつける  TARGがくっつける相手の（通常大きいほうの）面
		allsel
		r,CNUM
		rmodif,CNUM,14,1e6		!14は接触コンダクタンスのこと CONTA174の リアルコンスタントのことらしい
		real,CNUM
		type,3		!要素ナンバー3のこと 3ということはtarge170
		cmsel,s,a_targ	!Cuの表面選択
		nsla,s,1	!選択されたエリアに関する節点の選択
		esurf		!既存の要素の自由表面に重ねて要素を生成とのこと
		type,5		!評価しない接触
		cmsel,s,a_cont	!はんだ下面の選択
		nsla,s,1	!選択されたエリアに関する節点の選択
		esurf
		allsel

		CNUM=CNUM+1
		allsel
		!Create Contact Pair
		asel,s,,,A13+6+3	!右面を選択
		cm,a_cont,area	!a_contという名をつける
		asel,s,,,A13+6*6+5	!Cu表面を選択
		cm,a_targ,area	!a_targという名をつける  TARGがくっつける相手の（通常大きいほうの）面
		allsel
		r,CNUM
		rmodif,CNUM,14,1e6		!14は接触コンダクタンスのこと CONTA174の リアルコンスタントのことらしい
		real,CNUM
		type,3		!要素ナンバー3のこと 3ということはtarge170
		cmsel,s,a_targ	!Cuの表面選択
		nsla,s,1	!選択されたエリアに関する節点の選択
		esurf		!既存の要素の自由表面に重ねて要素を生成とのこと
		type,5		!評価しない接触
		cmsel,s,a_cont	!はんだ下面の選択
		nsla,s,1	!選択されたエリアに関する節点の選択
		esurf
		allsel
		CNUM=CNUM+1
		allsel
		!Create Contact Pair
		asel,s,,,A13+6+4	!後ろ面を選択
		cm,a_cont,area	!a_contという名をつける
		asel,s,,,A13+6*2+2	!Cu表面を選択
		cm,a_targ,area	!a_targという名をつける  TARGがくっつける相手の（通常大きいほうの）面
		allsel
		r,CNUM
		rmodif,CNUM,14,1e6		!14は接触コンダクタンスのこと CONTA174の リアルコンスタントのことらしい
		real,CNUM
		type,3		!要素ナンバー3のこと 3ということはtarge170
		cmsel,s,a_targ	!Cuの表面選択
		nsla,s,1	!選択されたエリアに関する節点の選択
		esurf		!既存の要素の自由表面に重ねて要素を生成とのこと
		type,5		!評価しない接触
		cmsel,s,a_cont	!はんだ下面の選択
		nsla,s,1	!選択されたエリアに関する節点の選択
		esurf
		allsel

		CNUM=CNUM+1
		allsel
		!Create Contact Pair
		asel,s,,,A13+6+4	!後ろ面を選択
		cm,a_cont,area	!a_contという名をつける
		asel,s,,,A12+30+2	!Cu表面を選択
		cm,a_targ,area	!a_targという名をつける  TARGがくっつける相手の（通常大きいほうの）面
		allsel
		r,CNUM
		rmodif,CNUM,14,1e6		!14は接触コンダクタンスのこと CONTA174の リアルコンスタントのことらしい
		real,CNUM
		type,3		!要素ナンバー3のこと 3ということはtarge170
		cmsel,s,a_targ	!Cuの表面選択
		nsla,s,1	!選択されたエリアに関する節点の選択
		esurf		!既存の要素の自由表面に重ねて要素を生成とのこと
		type,5		!評価しない接触
		cmsel,s,a_cont	!はんだ下面の選択
		nsla,s,1	!選択されたエリアに関する節点の選択
		esurf
		allsel

		CNUM=CNUM+1
		allsel
		!Create Contact Pair
		asel,s,,,A13+6+4	!後ろ面を選択
		cm,a_cont,area	!a_contという名をつける
		asel,s,,,A12+18+2	!Cu表面を選択
		cm,a_targ,area	!a_targという名をつける  TARGがくっつける相手の（通常大きいほうの）面
		allsel
		r,CNUM
		rmodif,CNUM,14,1e6		!14は接触コンダクタンスのこと CONTA174の リアルコンスタントのことらしい
		real,CNUM
		type,3		!要素ナンバー3のこと 3ということはtarge170
		cmsel,s,a_targ	!Cuの表面選択
		nsla,s,1	!選択されたエリアに関する節点の選択
		esurf		!既存の要素の自由表面に重ねて要素を生成とのこと
		type,5		!評価しない接触
		cmsel,s,a_cont	!はんだ下面の選択
		nsla,s,1	!選択されたエリアに関する節点の選択
		esurf
		allsel

		CNUM=CNUM+1
		allsel
		!Create Contact Pair
		asel,s,,,A13+6+5	!後ろ面を選択
		cm,a_cont,area	!a_contという名をつける
		asel,s,,,A11+3	!Cu表面を選択
		cm,a_targ,area	!a_targという名をつける  TARGがくっつける相手の（通常大きいほうの）面
		allsel
		r,CNUM
		rmodif,CNUM,14,1e6		!14は接触コンダクタンスのこと CONTA174の リアルコンスタントのことらしい
		real,CNUM
		type,3		!要素ナンバー3のこと 3ということはtarge170
		cmsel,s,a_targ	!Cuの表面選択
		nsla,s,1	!選択されたエリアに関する節点の選択
		esurf		!既存の要素の自由表面に重ねて要素を生成とのこと
		type,5		!評価しない接触
		cmsel,s,a_cont	!はんだ下面の選択
		nsla,s,1	!選択されたエリアに関する節点の選択
		esurf
		allsel

		CNUM=CNUM+1
		allsel
		!Create Contact Pair
		asel,s,,,A13+6+5	!後ろ面を選択
		cm,a_cont,area	!a_contという名をつける
		asel,s,,,A12+12+3	!Cu表面を選択
		cm,a_targ,area	!a_targという名をつける  TARGがくっつける相手の（通常大きいほうの）面
		allsel
		r,CNUM
		rmodif,CNUM,14,1e6		!14は接触コンダクタンスのこと CONTA174の リアルコンスタントのことらしい
		real,CNUM
		type,3		!要素ナンバー3のこと 3ということはtarge170
		cmsel,s,a_targ	!Cuの表面選択
		nsla,s,1	!選択されたエリアに関する節点の選択
		esurf		!既存の要素の自由表面に重ねて要素を生成とのこと
		type,5		!評価しない接触
		cmsel,s,a_cont	!はんだ下面の選択
		nsla,s,1	!選択されたエリアに関する節点の選択
		esurf
		allsel

		CNUM=CNUM+1
		allsel
		!Create Contact Pair
		asel,s,,,A13+6+5	!後ろ面を選択
		cm,a_cont,area	!a_contという名をつける
		asel,s,,,A13+6*4+3	!Cu表面を選択
		cm,a_targ,area	!a_targという名をつける  TARGがくっつける相手の（通常大きいほうの）面
		allsel
		r,CNUM
		rmodif,CNUM,14,1e6		!14は接触コンダクタンスのこと CONTA174の リアルコンスタントのことらしい
		real,CNUM
		type,3		!要素ナンバー3のこと 3ということはtarge170
		cmsel,s,a_targ	!Cuの表面選択
		nsla,s,1	!選択されたエリアに関する節点の選択
		esurf		!既存の要素の自由表面に重ねて要素を生成とのこと
		type,5		!評価しない接触
		cmsel,s,a_cont	!はんだ下面の選択
		nsla,s,1	!選択されたエリアに関する節点の選択
		esurf
		allsel

!中央3つめの樹脂

		CNUM=CNUM+1
		allsel
		!Create Contact Pair
		asel,s,,,A13+12+1	!後ろ面を選択
		cm,a_cont,area	!a_contという名をつける
		asel,s,,,108	!Cu表面を選択
		cm,a_targ,area	!a_targという名をつける  TARGがくっつける相手の（通常大きいほうの）面
		allsel
		r,CNUM
		rmodif,CNUM,14,1e6		!14は接触コンダクタンスのこと CONTA174の リアルコンスタントのことらしい
		real,CNUM
		type,3		!要素ナンバー3のこと 3ということはtarge170
		cmsel,s,a_targ	!Cuの表面選択
		nsla,s,1	!選択されたエリアに関する節点の選択
		esurf		!既存の要素の自由表面に重ねて要素を生成とのこと
		type,5		!評価しない接触
		cmsel,s,a_cont	!はんだ下面の選択
		nsla,s,1	!選択されたエリアに関する節点の選択
		esurf
		allsel


*DO,ii,1,2,1
		CNUM=CNUM+1
		allsel
		!Create Contact Pair
		asel,s,,,A13+12+1	!後ろ面を選択
		cm,a_cont,area	!a_contという名をつける
		asel,s,,,24+(ii-1)*18	!Cu表面を選択
		cm,a_targ,area	!a_targという名をつける  TARGがくっつける相手の（通常大きいほうの）面
		allsel
		r,CNUM
		rmodif,CNUM,14,1e6		!14は接触コンダクタンスのこと CONTA174の リアルコンスタントのことらしい
		real,CNUM
		type,3		!要素ナンバー3のこと 3ということはtarge170
		cmsel,s,a_targ	!Cuの表面選択
		nsla,s,1	!選択されたエリアに関する節点の選択
		esurf		!既存の要素の自由表面に重ねて要素を生成とのこと
		type,8		!粗い樹脂と銅の接触
		cmsel,s,a_cont	!はんだ下面の選択
		nsla,s,1	!選択されたエリアに関する節点の選択
		esurf
		allsel
*ENDDO

*DO,ii,1,2,1
		CNUM=CNUM+1
		allsel
		!Create Contact Pair
		asel,s,,,A13+12+6	!上を選択
		cm,a_cont,area	!a_contという名をつける
		asel,s,,,201+(ii-1)*6	!Cu表面を選択
		cm,a_targ,area	!a_targという名をつける  TARGがくっつける相手の（通常大きいほうの）面
		allsel
		r,CNUM
		rmodif,CNUM,14,1e6		!14は接触コンダクタンスのこと CONTA174の リアルコンスタントのことらしい
		real,CNUM
		type,3		!要素ナンバー3のこと 3ということはtarge170
		cmsel,s,a_targ	!Cuの表面選択
		nsla,s,1	!選択されたエリアに関する節点の選択
		esurf		!既存の要素の自由表面に重ねて要素を生成とのこと
		type,8		!粗い樹脂と銅の接触
		cmsel,s,a_cont	!はんだ下面の選択
		nsla,s,1	!選択されたエリアに関する節点の選択
		esurf
		allsel
*ENDDO

*DO,ii,1,2,1
		CNUM=CNUM+1
		allsel
		!Create Contact Pair
		asel,s,,,A13+12+6	!上面を選択
		cm,a_cont,area	!a_contという名をつける
		asel,s,,,231+(ii-1)*18	!Cu表面を選択
		cm,a_targ,area	!a_targという名をつける  TARGがくっつける相手の（通常大きいほうの）面
		allsel
		r,CNUM
		rmodif,CNUM,14,1e6		!14は接触コンダクタンスのこと CONTA174の リアルコンスタントのことらしい
		real,CNUM
		type,3		!要素ナンバー3のこと 3ということはtarge170
		cmsel,s,a_targ	!Cuの表面選択
		nsla,s,1	!選択されたエリアに関する節点の選択
		esurf		!既存の要素の自由表面に重ねて要素を生成とのこと
		type,5		!評価しない接触
		cmsel,s,a_cont	!はんだ下面の選択
		nsla,s,1	!選択されたエリアに関する節点の選択
		esurf
		allsel
*ENDDO

*DO,ii,1,2,1
		CNUM=CNUM+1
		allsel
		!Create Contact Pair
		asel,s,,,A13+12+2	!前面を選択
		cm,a_cont,area	!a_contという名をつける
		asel,s,,,A11+4+(ii-1)*6	!Cu表面を選択
		cm,a_targ,area	!a_targという名をつける  TARGがくっつける相手の（通常大きいほうの）面
		allsel
		r,CNUM
		rmodif,CNUM,14,1e6		!14は接触コンダクタンスのこと CONTA174の リアルコンスタントのことらしい
		real,CNUM
		type,3		!要素ナンバー3のこと 3ということはtarge170
		cmsel,s,a_targ	!Cuの表面選択
		nsla,s,1	!選択されたエリアに関する節点の選択
		esurf		!既存の要素の自由表面に重ねて要素を生成とのこと
		type,5		!評価しない接触
		cmsel,s,a_cont	!はんだ下面の選択
		nsla,s,1	!選択されたエリアに関する節点の選択
		esurf
		allsel
*ENDDO

		CNUM=CNUM+1
		allsel
		!Create Contact Pair
		asel,s,,,A13+12+2	!前面を選択
		cm,a_cont,area	!a_contという名をつける
		asel,s,,,A13+6+4	!Cu表面を選択
		cm,a_targ,area	!a_targという名をつける  TARGがくっつける相手の（通常大きいほうの）面
		allsel
		r,CNUM
		rmodif,CNUM,14,1e6		!14は接触コンダクタンスのこと CONTA174の リアルコンスタントのことらしい
		real,CNUM
		type,3		!要素ナンバー3のこと 3ということはtarge170
		cmsel,s,a_targ	!Cuの表面選択
		nsla,s,1	!選択されたエリアに関する節点の選択
		esurf		!既存の要素の自由表面に重ねて要素を生成とのこと
		type,5		!評価しない接触
		cmsel,s,a_cont	!はんだ下面の選択
		nsla,s,1	!選択されたエリアに関する節点の選択
		esurf
		allsel

		CNUM=CNUM+1
		allsel
		!Create Contact Pair
		asel,s,,,A13+12+3	!前面を選択
		cm,a_cont,area	!a_contという名をつける
		asel,s,,,A12+30+5	!Cu表面を選択
		cm,a_targ,area	!a_targという名をつける  TARGがくっつける相手の（通常大きいほうの）面
		allsel
		r,CNUM
		rmodif,CNUM,14,1e6		!14は接触コンダクタンスのこと CONTA174の リアルコンスタントのことらしい
		real,CNUM
		type,3		!要素ナンバー3のこと 3ということはtarge170
		cmsel,s,a_targ	!Cuの表面選択
		nsla,s,1	!選択されたエリアに関する節点の選択
		esurf		!既存の要素の自由表面に重ねて要素を生成とのこと
		type,5		!評価しない接触
		cmsel,s,a_cont	!はんだ下面の選択
		nsla,s,1	!選択されたエリアに関する節点の選択
		esurf
		allsel

		CNUM=CNUM+1
		allsel
		!Create Contact Pair
		asel,s,,,A13+12+3	!前面を選択
		cm,a_cont,area	!a_contという名をつける
		asel,s,,,A13+6*7+5	!Cu表面を選択
		cm,a_targ,area	!a_targという名をつける  TARGがくっつける相手の（通常大きいほうの）面
		allsel
		r,CNUM
		rmodif,CNUM,14,1e6		!14は接触コンダクタンスのこと CONTA174の リアルコンスタントのことらしい
		real,CNUM
		type,3		!要素ナンバー3のこと 3ということはtarge170
		cmsel,s,a_targ	!Cuの表面選択
		nsla,s,1	!選択されたエリアに関する節点の選択
		esurf		!既存の要素の自由表面に重ねて要素を生成とのこと
		type,5		!評価しない接触
		cmsel,s,a_cont	!はんだ下面の選択
		nsla,s,1	!選択されたエリアに関する節点の選択
		esurf
		allsel

		CNUM=CNUM+1
		allsel
		!Create Contact Pair
		asel,s,,,A13+12+4	!前面を選択
		cm,a_cont,area	!a_contという名をつける
		asel,s,,,ABASE-32+16+2	!Cu表面を選択
		cm,a_targ,area	!a_targという名をつける  TARGがくっつける相手の（通常大きいほうの）面
		allsel
		r,CNUM
		rmodif,CNUM,14,1e6		!14は接触コンダクタンスのこと CONTA174の リアルコンスタントのことらしい
		real,CNUM
		type,3		!要素ナンバー3のこと 3ということはtarge170
		cmsel,s,a_targ	!Cuの表面選択
		nsla,s,1	!選択されたエリアに関する節点の選択
		esurf		!既存の要素の自由表面に重ねて要素を生成とのこと
		TYPE,5		!はんだと樹脂の接触
		cmsel,s,a_cont	!はんだ下面の選択
		nsla,s,1	!選択されたエリアに関する節点の選択
		esurf
		allsel

		CNUM=CNUM+1
		allsel
		!Create Contact Pair
		asel,s,,,A13+12+4	!前面を選択
		cm,a_cont,area	!a_contという名をつける
		asel,s,,,ABASE-32+16+8	!Cu表面を選択
		cm,a_targ,area	!a_targという名をつける  TARGがくっつける相手の（通常大きいほうの）面
		allsel
		r,CNUM
		rmodif,CNUM,14,1e6		!14は接触コンダクタンスのこと CONTA174の リアルコンスタントのことらしい
		real,CNUM
		type,3		!要素ナンバー3のこと 3ということはtarge170
		cmsel,s,a_targ	!Cuの表面選択
		nsla,s,1	!選択されたエリアに関する節点の選択
		esurf		!既存の要素の自由表面に重ねて要素を生成とのこと
		type,8		!粗い樹脂と銅の接触
		cmsel,s,a_cont	!はんだ下面の選択
		nsla,s,1	!選択されたエリアに関する節点の選択
		esurf
		allsel

		CNUM=CNUM+1
		allsel
		!Create Contact Pair
		asel,s,,,A13+12+4	!前面を選択
		cm,a_cont,area	!a_contという名をつける
		asel,s,,,ABASE-32+16+13	!Cu表面を選択
		cm,a_targ,area	!a_targという名をつける  TARGがくっつける相手の（通常大きいほうの）面
		allsel
		r,CNUM
		rmodif,CNUM,14,1e6		!14は接触コンダクタンスのこと CONTA174の リアルコンスタントのことらしい
		real,CNUM
		type,3		!要素ナンバー3のこと 3ということはtarge170
		cmsel,s,a_targ	!Cuの表面選択
		nsla,s,1	!選択されたエリアに関する節点の選択
		esurf		!既存の要素の自由表面に重ねて要素を生成とのこと
		TYPE,5		!はんだと樹脂の接触
		cmsel,s,a_cont	!はんだ下面の選択
		nsla,s,1	!選択されたエリアに関する節点の選択
		esurf
		allsel

		CNUM=CNUM+1
		allsel
		!Create Contact Pair
		asel,s,,,A13+12+5	!前面を選択
		cm,a_cont,area	!a_contという名をつける
		asel,s,,,A12+18+3	!Cu表面を選択
		cm,a_targ,area	!a_targという名をつける  TARGがくっつける相手の（通常大きいほうの）面
		allsel
		r,CNUM
		rmodif,CNUM,14,1e6		!14は接触コンダクタンスのこと CONTA174の リアルコンスタントのことらしい
		real,CNUM
		type,3		!要素ナンバー3のこと 3ということはtarge170
		cmsel,s,a_targ	!Cuの表面選択
		nsla,s,1	!選択されたエリアに関する節点の選択
		esurf		!既存の要素の自由表面に重ねて要素を生成とのこと
		type,5		!評価しない接触
		cmsel,s,a_cont	!はんだ下面の選択
		nsla,s,1	!選択されたエリアに関する節点の選択
		esurf
		allsel

		CNUM=CNUM+1
		allsel
		!Create Contact Pair
		asel,s,,,A13+12+5	!前面を選択
		cm,a_cont,area	!a_contという名をつける
		asel,s,,,A13+6*5+3	!Cu表面を選択
		cm,a_targ,area	!a_targという名をつける  TARGがくっつける相手の（通常大きいほうの）面
		allsel
		r,CNUM
		rmodif,CNUM,14,1e6		!14は接触コンダクタンスのこと CONTA174の リアルコンスタントのことらしい
		real,CNUM
		type,3		!要素ナンバー3のこと 3ということはtarge170
		cmsel,s,a_targ	!Cuの表面選択
		nsla,s,1	!選択されたエリアに関する節点の選択
		esurf		!既存の要素の自由表面に重ねて要素を生成とのこと
		type,5		!評価しない接触
		cmsel,s,a_cont	!はんだ下面の選択
		nsla,s,1	!選択されたエリアに関する節点の選択
		esurf
		allsel

!中央の一番上の樹脂
		CNUM=CNUM+1
		allsel
		!Create Contact Pair
		asel,s,,,A13+18+1	!前面を選択
		cm,a_cont,area	!a_contという名をつける
		asel,s,,,42	!Cu表面を選択
		cm,a_targ,area	!a_targという名をつける  TARGがくっつける相手の（通常大きいほうの）面
		allsel
		r,CNUM
		rmodif,CNUM,14,1e6		!14は接触コンダクタンスのこと CONTA174の リアルコンスタントのことらしい
		real,CNUM
		type,3		!要素ナンバー3のこと 3ということはtarge170
		cmsel,s,a_targ	!Cuの表面選択
		nsla,s,1	!選択されたエリアに関する節点の選択
		esurf		!既存の要素の自由表面に重ねて要素を生成とのこと
		type,8		!粗い樹脂と銅の接触
		cmsel,s,a_cont	!はんだ下面の選択
		nsla,s,1	!選択されたエリアに関する節点の選択
		esurf
		allsel

		CNUM=CNUM+1
		allsel
		!Create Contact Pair
		asel,s,,,A13+18+6	!上面を選択
		cm,a_cont,area	!a_contという名をつける
		asel,s,,,201	!Cu表面を選択
		cm,a_targ,area	!a_targという名をつける  TARGがくっつける相手の（通常大きいほうの）面
		allsel
		r,CNUM
		rmodif,CNUM,14,1e6		!14は接触コンダクタンスのこと CONTA174の リアルコンスタントのことらしい
		real,CNUM
		type,3		!要素ナンバー3のこと 3ということはtarge170
		cmsel,s,a_targ	!Cuの表面選択
		nsla,s,1	!選択されたエリアに関する節点の選択
		esurf		!既存の要素の自由表面に重ねて要素を生成とのこと
		type,8		!粗い樹脂と銅の接触
		cmsel,s,a_cont	!はんだ下面の選択
		nsla,s,1	!選択されたエリアに関する節点の選択
		esurf
		allsel

		CNUM=CNUM+1
		allsel
		!Create Contact Pair
		asel,s,,,A13+18+6	!上面を選択
		cm,a_cont,area	!a_contという名をつける
		asel,s,,,231	!Cu表面を選択
		cm,a_targ,area	!a_targという名をつける  TARGがくっつける相手の（通常大きいほうの）面
		allsel
		r,CNUM
		rmodif,CNUM,14,1e6		!14は接触コンダクタンスのこと CONTA174の リアルコンスタントのことらしい
		real,CNUM
		type,3		!要素ナンバー3のこと 3ということはtarge170
		cmsel,s,a_targ	!Cuの表面選択
		nsla,s,1	!選択されたエリアに関する節点の選択
		esurf		!既存の要素の自由表面に重ねて要素を生成とのこと
		type,5		!評価しない接触
		cmsel,s,a_cont	!はんだ下面の選択
		nsla,s,1	!選択されたエリアに関する節点の選択
		esurf
		allsel

		CNUM=CNUM+1
		allsel
		!Create Contact Pair
		asel,s,,,A13+18+2	!前面を選択
		cm,a_cont,area	!a_contという名をつける
		asel,s,,,ABASE-32+16+4	!Cu表面を選択
		cm,a_targ,area	!a_targという名をつける  TARGがくっつける相手の（通常大きいほうの）面
		allsel
		r,CNUM
		rmodif,CNUM,14,1e6		!14は接触コンダクタンスのこと CONTA174の リアルコンスタントのことらしい
		real,CNUM
		type,3		!要素ナンバー3のこと 3ということはtarge170
		cmsel,s,a_targ	!Cuの表面選択
		nsla,s,1	!選択されたエリアに関する節点の選択
		esurf		!既存の要素の自由表面に重ねて要素を生成とのこと
		TYPE,5		!はんだと樹脂の接触
		cmsel,s,a_cont	!はんだ下面の選択
		nsla,s,1	!選択されたエリアに関する節点の選択
		esurf
		allsel

		CNUM=CNUM+1
		allsel
		!Create Contact Pair
		asel,s,,,A13+18+2	!前面を選択
		cm,a_cont,area	!a_contという名をつける
		asel,s,,,ABASE-32+16+10	!Cu表面を選択
		cm,a_targ,area	!a_targという名をつける  TARGがくっつける相手の（通常大きいほうの）面
		allsel
		r,CNUM
		rmodif,CNUM,14,1e6		!14は接触コンダクタンスのこと CONTA174の リアルコンスタントのことらしい
		real,CNUM
		type,3		!要素ナンバー3のこと 3ということはtarge170
		cmsel,s,a_targ	!Cuの表面選択
		nsla,s,1	!選択されたエリアに関する節点の選択
		esurf		!既存の要素の自由表面に重ねて要素を生成とのこと
		type,8		!粗い樹脂と銅の接触
		cmsel,s,a_cont	!はんだ下面の選択
		nsla,s,1	!選択されたエリアに関する節点の選択
		esurf
		allsel

		CNUM=CNUM+1
		allsel
		!Create Contact Pair
		asel,s,,,A13+18+2	!前面を選択
		cm,a_cont,area	!a_contという名をつける
		asel,s,,,ABASE-32+16+15	!Cu表面を選択
		cm,a_targ,area	!a_targという名をつける  TARGがくっつける相手の（通常大きいほうの）面
		allsel
		r,CNUM
		rmodif,CNUM,14,1e6		!14は接触コンダクタンスのこと CONTA174の リアルコンスタントのことらしい
		real,CNUM
		type,3		!要素ナンバー3のこと 3ということはtarge170
		cmsel,s,a_targ	!Cuの表面選択
		nsla,s,1	!選択されたエリアに関する節点の選択
		esurf		!既存の要素の自由表面に重ねて要素を生成とのこと
		TYPE,5		!はんだと樹脂の接触
		cmsel,s,a_cont	!はんだ下面の選択
		nsla,s,1	!選択されたエリアに関する節点の選択
		esurf
		allsel

		CNUM=CNUM+1
		allsel
		!Create Contact Pair
		asel,s,,,A13+18+3	!前面を選択
		cm,a_cont,area	!a_contという名をつける
		asel,s,,,A13+42+5	!Cu表面を選択
		cm,a_targ,area	!a_targという名をつける  TARGがくっつける相手の（通常大きいほうの）面
		allsel
		r,CNUM
		rmodif,CNUM,14,1e6		!14は接触コンダクタンスのこと CONTA174の リアルコンスタントのことらしい
		real,CNUM
		type,3		!要素ナンバー3のこと 3ということはtarge170
		cmsel,s,a_targ	!Cuの表面選択
		nsla,s,1	!選択されたエリアに関する節点の選択
		esurf		!既存の要素の自由表面に重ねて要素を生成とのこと
		type,5		!評価しない接触
		cmsel,s,a_cont	!はんだ下面の選択
		nsla,s,1	!選択されたエリアに関する節点の選択
		esurf
		allsel

		CNUM=CNUM+1
		allsel
		!Create Contact Pair
		asel,s,,,A13+18+3	!前面を選択
		cm,a_cont,area	!a_contという名をつける
		asel,s,,,A12+6*5+5	!Cu表面を選択
		cm,a_targ,area	!a_targという名をつける  TARGがくっつける相手の（通常大きいほうの）面
		allsel
		r,CNUM
		rmodif,CNUM,14,1e6		!14は接触コンダクタンスのこと CONTA174の リアルコンスタントのことらしい
		real,CNUM
		type,3		!要素ナンバー3のこと 3ということはtarge170
		cmsel,s,a_targ	!Cuの表面選択
		nsla,s,1	!選択されたエリアに関する節点の選択
		esurf		!既存の要素の自由表面に重ねて要素を生成とのこと
		type,5		!評価しない接触
		cmsel,s,a_cont	!はんだ下面の選択
		nsla,s,1	!選択されたエリアに関する節点の選択
		esurf
		allsel

		CNUM=CNUM+1
		allsel
		!Create Contact Pair
		asel,s,,,A13+18+4	!前面を選択
		cm,a_cont,area	!a_contという名をつける
		asel,s,,,323	!Cu表面を選択
		cm,a_targ,area	!a_targという名をつける  TARGがくっつける相手の（通常大きいほうの）面
		allsel
		r,CNUM
		rmodif,CNUM,14,1e6		!14は接触コンダクタンスのこと CONTA174の リアルコンスタントのことらしい
		real,CNUM
		type,3		!要素ナンバー3のこと 3ということはtarge170
		cmsel,s,a_targ	!Cuの表面選択
		nsla,s,1	!選択されたエリアに関する節点の選択
		esurf		!既存の要素の自由表面に重ねて要素を生成とのこと
		type,8		!粗い樹脂と銅の接触
		cmsel,s,a_cont	!はんだ下面の選択
		nsla,s,1	!選択されたエリアに関する節点の選択
		esurf
		allsel

		CNUM=CNUM+1
		allsel
		!Create Contact Pair
		asel,s,,,A13+18+4	!前面を選択
		cm,a_cont,area	!a_contという名をつける
		asel,s,,,300	!Cu表面を選択
		cm,a_targ,area	!a_targという名をつける  TARGがくっつける相手の（通常大きいほうの）面
		allsel
		r,CNUM
		rmodif,CNUM,14,1e6		!14は接触コンダクタンスのこと CONTA174の リアルコンスタントのことらしい
		real,CNUM
		type,3		!要素ナンバー3のこと 3ということはtarge170
		cmsel,s,a_targ	!Cuの表面選択
		nsla,s,1	!選択されたエリアに関する節点の選択
		esurf		!既存の要素の自由表面に重ねて要素を生成とのこと
		TYPE,5		!はんだと樹脂の接触
		cmsel,s,a_cont	!はんだ下面の選択
		nsla,s,1	!選択されたエリアに関する節点の選択
		esurf
		allsel

		CNUM=CNUM+1
		allsel
		!Create Contact Pair
		asel,s,,,A13+18+5	!前面を選択
		cm,a_cont,area	!a_contという名をつける
		asel,s,,,A13+30+3	!Cu表面を選択
		cm,a_targ,area	!a_targという名をつける  TARGがくっつける相手の（通常大きいほうの）面
		allsel
		r,CNUM
		rmodif,CNUM,14,1e6		!14は接触コンダクタンスのこと CONTA174の リアルコンスタントのことらしい
		real,CNUM
		type,3		!要素ナンバー3のこと 3ということはtarge170
		cmsel,s,a_targ	!Cuの表面選択
		nsla,s,1	!選択されたエリアに関する節点の選択
		esurf		!既存の要素の自由表面に重ねて要素を生成とのこと
		type,5		!評価しない接触
		cmsel,s,a_cont	!はんだ下面の選択
		nsla,s,1	!選択されたエリアに関する節点の選択
		esurf
		allsel

		CNUM=CNUM+1
		allsel
		!Create Contact Pair
		asel,s,,,A13+18+5	!前面を選択
		cm,a_cont,area	!a_contという名をつける
		asel,s,,,A12+6*3+3	!Cu表面を選択
		cm,a_targ,area	!a_targという名をつける  TARGがくっつける相手の（通常大きいほうの）面
		allsel
		r,CNUM
		rmodif,CNUM,14,1e6		!14は接触コンダクタンスのこと CONTA174の リアルコンスタントのことらしい
		real,CNUM
		type,3		!要素ナンバー3のこと 3ということはtarge170
		cmsel,s,a_targ	!Cuの表面選択
		nsla,s,1	!選択されたエリアに関する節点の選択
		esurf		!既存の要素の自由表面に重ねて要素を生成とのこと
		type,5		!評価しない接触
		cmsel,s,a_cont	!はんだ下面の選択
		nsla,s,1	!選択されたエリアに関する節点の選択
		esurf
		allsel


!O側下の横長樹脂 信号側
*DO,ii,1,3,1
		CNUM=CNUM+1
		allsel
		!Create Contact Pair
		asel,s,,,A13+24+1	!前面を選択
		cm,a_cont,area	!a_contという名をつける
		asel,s,,,12+(ii-1)*6	!Cu表面を選択
		cm,a_targ,area	!a_targという名をつける  TARGがくっつける相手の（通常大きいほうの）面
		allsel
		r,CNUM
		rmodif,CNUM,14,1e6		!14は接触コンダクタンスのこと CONTA174の リアルコンスタントのことらしい
		real,CNUM
		type,3		!要素ナンバー3のこと 3ということはtarge170
		cmsel,s,a_targ	!Cuの表面選択
		nsla,s,1	!選択されたエリアに関する節点の選択
		esurf		!既存の要素の自由表面に重ねて要素を生成とのこと
		type,8		!粗い樹脂と銅の接触
		cmsel,s,a_cont	!はんだ下面の選択
		nsla,s,1	!選択されたエリアに関する節点の選択
		esurf
		allsel
*ENDDO

*DO,ii,1,3,1
		CNUM=CNUM+1
		allsel
		!Create Contact Pair
		asel,s,,,A13+24+1	!前面を選択
		cm,a_cont,area	!a_contという名をつける
		asel,s,,,48+(ii-1)*6	!Cu表面を選択
		cm,a_targ,area	!a_targという名をつける  TARGがくっつける相手の（通常大きいほうの）面
		allsel
		r,CNUM
		rmodif,CNUM,14,1e6		!14は接触コンダクタンスのこと CONTA174の リアルコンスタントのことらしい
		real,CNUM
		type,3		!要素ナンバー3のこと 3ということはtarge170
		cmsel,s,a_targ	!Cuの表面選択
		nsla,s,1	!選択されたエリアに関する節点の選択
		esurf		!既存の要素の自由表面に重ねて要素を生成とのこと
		type,8		!粗い樹脂と銅の接触
		cmsel,s,a_cont	!はんだ下面の選択
		nsla,s,1	!選択されたエリアに関する節点の選択
		esurf
		allsel
*ENDDO
*DO,ii,1,2,1
		CNUM=CNUM+1
		allsel
		!Create Contact Pair
		asel,s,,,A13+24+1	!前面を選択
		cm,a_cont,area	!a_contという名をつける
		asel,s,,,84+(ii-1)*12	!Cu表面を選択
		cm,a_targ,area	!a_targという名をつける  TARGがくっつける相手の（通常大きいほうの）面
		allsel
		r,CNUM
		rmodif,CNUM,14,1e6		!14は接触コンダクタンスのこと CONTA174の リアルコンスタントのことらしい
		real,CNUM
		type,3		!要素ナンバー3のこと 3ということはtarge170
		cmsel,s,a_targ	!Cuの表面選択
		nsla,s,1	!選択されたエリアに関する節点の選択
		esurf		!既存の要素の自由表面に重ねて要素を生成とのこと
		type,5		!評価しない接触
		cmsel,s,a_cont	!はんだ下面の選択
		nsla,s,1	!選択されたエリアに関する節点の選択
		esurf
		allsel
*ENDDO
*DO,ii,1,2,1
		CNUM=CNUM+1
		allsel
		!Create Contact Pair
		asel,s,,,A13+24+1	!前面を選択
		cm,a_cont,area	!a_contという名をつける
		asel,s,,,114+(ii-1)*6	!Cu表面を選択
		cm,a_targ,area	!a_targという名をつける  TARGがくっつける相手の（通常大きいほうの）面
		allsel
		r,CNUM
		rmodif,CNUM,14,1e6		!14は接触コンダクタンスのこと CONTA174の リアルコンスタントのことらしい
		real,CNUM
		type,3		!要素ナンバー3のこと 3ということはtarge170
		cmsel,s,a_targ	!Cuの表面選択
		nsla,s,1	!選択されたエリアに関する節点の選択
		esurf		!既存の要素の自由表面に重ねて要素を生成とのこと
		type,5		!評価しない接触
		cmsel,s,a_cont	!はんだ下面の選択
		nsla,s,1	!選択されたエリアに関する節点の選択
		esurf
		allsel
*ENDDO

*DO,ii,1,2,1
		CNUM=CNUM+1
		allsel
		!Create Contact Pair
		asel,s,,,A13+24+6	!上面を選択
		cm,a_cont,area	!a_contという名をつける
		asel,s,,,195+(ii-1)*12	!Cu表面を選択
		cm,a_targ,area	!a_targという名をつける  TARGがくっつける相手の（通常大きいほうの）面
		allsel
		r,CNUM
		rmodif,CNUM,14,1e6		!14は接触コンダクタンスのこと CONTA174の リアルコンスタントのことらしい
		real,CNUM
		type,3		!要素ナンバー3のこと 3ということはtarge170
		cmsel,s,a_targ	!Cuの表面選択
		nsla,s,1	!選択されたエリアに関する節点の選択
		esurf		!既存の要素の自由表面に重ねて要素を生成とのこと
		type,8		!粗い樹脂と銅の接触
		cmsel,s,a_cont	!はんだ下面の選択
		nsla,s,1	!選択されたエリアに関する節点の選択
		esurf
		allsel
*ENDDO

		CNUM=CNUM+1
		allsel
		!Create Contact Pair
		asel,s,,,A13+24+6	!上面を選択
		cm,a_cont,area	!a_contという名をつける
		asel,s,,,243	!Cu表面を選択
		cm,a_targ,area	!a_targという名をつける  TARGがくっつける相手の（通常大きいほうの）面
		allsel
		r,CNUM
		rmodif,CNUM,14,1e6		!14は接触コンダクタンスのこと CONTA174の リアルコンスタントのことらしい
		real,CNUM
		type,3		!要素ナンバー3のこと 3ということはtarge170
		cmsel,s,a_targ	!Cuの表面選択
		nsla,s,1	!選択されたエリアに関する節点の選択
		esurf		!既存の要素の自由表面に重ねて要素を生成とのこと
		type,8		!粗い樹脂と銅の接触
		cmsel,s,a_cont	!はんだ下面の選択
		nsla,s,1	!選択されたエリアに関する節点の選択
		esurf
		allsel

		CNUM=CNUM+1
		allsel
		!Create Contact Pair
		asel,s,,,A13+24+6	!上面を選択
		cm,a_cont,area	!a_contという名をつける
		asel,s,,,219	!Cu表面を選択
		cm,a_targ,area	!a_targという名をつける  TARGがくっつける相手の（通常大きいほうの）面
		allsel
		r,CNUM
		rmodif,CNUM,14,1e6		!14は接触コンダクタンスのこと CONTA174の リアルコンスタントのことらしい
		real,CNUM
		type,3		!要素ナンバー3のこと 3ということはtarge170
		cmsel,s,a_targ	!Cuの表面選択
		nsla,s,1	!選択されたエリアに関する節点の選択
		esurf		!既存の要素の自由表面に重ねて要素を生成とのこと
		type,8		!粗い樹脂と銅の接触
		cmsel,s,a_cont	!はんだ下面の選択
		nsla,s,1	!選択されたエリアに関する節点の選択
		esurf
		allsel

		CNUM=CNUM+1
		allsel
		!Create Contact Pair
		asel,s,,,A13+24+2	!前面を選択
		cm,a_cont,area	!a_contという名をつける
		asel,s,,,335	!Cu表面を選択
		cm,a_targ,area	!a_targという名をつける  TARGがくっつける相手の（通常大きいほうの）面
		allsel
		r,CNUM
		rmodif,CNUM,14,1e6		!14は接触コンダクタンスのこと CONTA174の リアルコンスタントのことらしい
		real,CNUM
		type,3		!要素ナンバー3のこと 3ということはtarge170
		cmsel,s,a_targ	!Cuの表面選択
		nsla,s,1	!選択されたエリアに関する節点の選択
		esurf		!既存の要素の自由表面に重ねて要素を生成とのこと
		type,8		!粗い樹脂と銅の接触
		cmsel,s,a_cont	!はんだ下面の選択
		nsla,s,1	!選択されたエリアに関する節点の選択
		esurf
		allsel

		CNUM=CNUM+1
		allsel
		!Create Contact Pair
		asel,s,,,A13+24+2	!前面を選択
		cm,a_cont,area	!a_contという名をつける
		asel,s,,,314	!Cu表面を選択
		cm,a_targ,area	!a_targという名をつける  TARGがくっつける相手の（通常大きいほうの）面
		allsel
		r,CNUM
		rmodif,CNUM,14,1e6		!14は接触コンダクタンスのこと CONTA174の リアルコンスタントのことらしい
		real,CNUM
		type,3		!要素ナンバー3のこと 3ということはtarge170
		cmsel,s,a_targ	!Cuの表面選択
		nsla,s,1	!選択されたエリアに関する節点の選択
		esurf		!既存の要素の自由表面に重ねて要素を生成とのこと
		type,5		!はんだと樹脂の接触
		cmsel,s,a_cont	!はんだ下面の選択
		nsla,s,1	!選択されたエリアに関する節点の選択
		esurf
		allsel

		CNUM=CNUM+1
		allsel
		!Create Contact Pair
		asel,s,,,A13+24+3	!前面を選択
		cm,a_cont,area	!a_contという名をつける
		asel,s,,,ABASE-32+5	!Cu表面を選択
		cm,a_targ,area	!a_targという名をつける  TARGがくっつける相手の（通常大きいほうの）面
		allsel
		r,CNUM
		rmodif,CNUM,14,1e6		!14は接触コンダクタンスのこと CONTA174の リアルコンスタントのことらしい
		real,CNUM
		type,3		!要素ナンバー3のこと 3ということはtarge170
		cmsel,s,a_targ	!Cuの表面選択
		nsla,s,1	!選択されたエリアに関する節点の選択
		esurf		!既存の要素の自由表面に重ねて要素を生成とのこと
		type,5		!はんだと樹脂の接触
		cmsel,s,a_cont	!はんだ下面の選択
		nsla,s,1	!選択されたエリアに関する節点の選択
		esurf
		allsel


		CNUM=CNUM+1
		allsel
		!Create Contact Pair
		asel,s,,,A13+24+3	!前面を選択
		cm,a_cont,area	!a_contという名をつける
		asel,s,,,ABASE-32+11	!Cu表面を選択
		cm,a_targ,area	!a_targという名をつける  TARGがくっつける相手の（通常大きいほうの）面
		allsel
		r,CNUM
		rmodif,CNUM,14,1e6		!14は接触コンダクタンスのこと CONTA174の リアルコンスタントのことらしい
		real,CNUM
		type,3		!要素ナンバー3のこと 3ということはtarge170
		cmsel,s,a_targ	!Cuの表面選択
		nsla,s,1	!選択されたエリアに関する節点の選択
		esurf		!既存の要素の自由表面に重ねて要素を生成とのこと
		type,8		!粗い樹脂と銅の接触
		cmsel,s,a_cont	!はんだ下面の選択
		nsla,s,1	!選択されたエリアに関する節点の選択
		esurf
		allsel

		CNUM=CNUM+1
		allsel
		!Create Contact Pair
		asel,s,,,A13+24+3	!前面を選択
		cm,a_cont,area	!a_contという名をつける
		asel,s,,,ABASE-32+16	!Cu表面を選択
		cm,a_targ,area	!a_targという名をつける  TARGがくっつける相手の（通常大きいほうの）面
		allsel
		r,CNUM
		rmodif,CNUM,14,1e6		!14は接触コンダクタンスのこと CONTA174の リアルコンスタントのことらしい
		real,CNUM
		type,3		!要素ナンバー3のこと 3ということはtarge170
		cmsel,s,a_targ	!Cuの表面選択
		nsla,s,1	!選択されたエリアに関する節点の選択
		esurf		!既存の要素の自由表面に重ねて要素を生成とのこと
		type,5		!はんだと樹脂の接触
		cmsel,s,a_cont	!はんだ下面の選択
		nsla,s,1	!選択されたエリアに関する節点の選択
		esurf
		allsel

*DO,ii,1,2,1
		CNUM=CNUM+1
		allsel
		!Create Contact Pair
		asel,s,,,A13+24+4	!前面を選択
		cm,a_cont,area	!a_contという名をつける
		asel,s,,,A12+2+(ii-1)*12	!Cu表面を選択
		cm,a_targ,area	!a_targという名をつける  TARGがくっつける相手の（通常大きいほうの）面
		allsel
		r,CNUM
		rmodif,CNUM,14,1e6		!14は接触コンダクタンスのこと CONTA174の リアルコンスタントのことらしい
		real,CNUM
		type,3		!要素ナンバー3のこと 3ということはtarge170
		cmsel,s,a_targ	!Cuの表面選択
		nsla,s,1	!選択されたエリアに関する節点の選択
		esurf		!既存の要素の自由表面に重ねて要素を生成とのこと
		type,5		!評価しない接触
		cmsel,s,a_cont	!はんだ下面の選択
		nsla,s,1	!選択されたエリアに関する節点の選択
		esurf
		allsel
*ENDDO

*DO,ii,1,PARA1ST,1
		CNUM=CNUM+1
		allsel
		!Create Contact Pair
		asel,s,,,A13+24+4	!前面を選択
		cm,a_cont,area	!a_contという名をつける
		asel,s,,,A1+2+(ii-1)*20*2	!Cu表面を選択
		cm,a_targ,area	!a_targという名をつける  TARGがくっつける相手の（通常大きいほうの）面
		allsel
		r,CNUM
		rmodif,CNUM,14,1e6		!14は接触コンダクタンスのこと CONTA174の リアルコンスタントのことらしい
		real,CNUM
		type,3		!要素ナンバー3のこと 3ということはtarge170
		cmsel,s,a_targ	!Cuの表面選択
		nsla,s,1	!選択されたエリアに関する節点の選択
		esurf		!既存の要素の自由表面に重ねて要素を生成とのこと
		type,5		!評価しない接触
		cmsel,s,a_cont	!はんだ下面の選択
		nsla,s,1	!選択されたエリアに関する節点の選択
		esurf
		allsel

		CNUM=CNUM+1
		allsel
		!Create Contact Pair
		asel,s,,,A13+24+4	!前面を選択
		cm,a_cont,area	!a_contという名をつける
		asel,s,,,A2+2+(ii-1)*16*2	!Cu表面を選択
		cm,a_targ,area	!a_targという名をつける  TARGがくっつける相手の（通常大きいほうの）面
		allsel
		r,CNUM
		rmodif,CNUM,14,1e6		!14は接触コンダクタンスのこと CONTA174の リアルコンスタントのことらしい
		real,CNUM
		type,3		!要素ナンバー3のこと 3ということはtarge170
		cmsel,s,a_targ	!Cuの表面選択
		nsla,s,1	!選択されたエリアに関する節点の選択
		esurf		!既存の要素の自由表面に重ねて要素を生成とのこと
		type,5		!評価しない接触
		cmsel,s,a_cont	!はんだ下面の選択
		nsla,s,1	!選択されたエリアに関する節点の選択
		esurf
		allsel

		CNUM=CNUM+1
		allsel
		!Create Contact Pair
		asel,s,,,A13+24+4	!前面を選択
		cm,a_cont,area	!a_contという名をつける
		asel,s,,,A9+2+(ii-1)*6*2	!Cu表面を選択
		cm,a_targ,area	!a_targという名をつける  TARGがくっつける相手の（通常大きいほうの）面
		allsel
		r,CNUM
		rmodif,CNUM,14,1e6		!14は接触コンダクタンスのこと CONTA174の リアルコンスタントのことらしい
		real,CNUM
		type,3		!要素ナンバー3のこと 3ということはtarge170
		cmsel,s,a_targ	!Cuの表面選択
		nsla,s,1	!選択されたエリアに関する節点の選択
		esurf		!既存の要素の自由表面に重ねて要素を生成とのこと
		type,5		!評価しない接触
		cmsel,s,a_cont	!はんだ下面の選択
		nsla,s,1	!選択されたエリアに関する節点の選択
		esurf
		allsel
*ENDDO

*DO,ii,1,PARA1ST-1,1
		CNUM=CNUM+1
		allsel
		!Create Contact Pair
		asel,s,,,A13+24+4	!前面を選択
		cm,a_cont,area	!a_contという名をつける
		asel,s,,,A10+2+(ii-1)*6*2	!Cu表面を選択
		cm,a_targ,area	!a_targという名をつける  TARGがくっつける相手の（通常大きいほうの）面
		allsel
		r,CNUM
		rmodif,CNUM,14,1e6		!14は接触コンダクタンスのこと CONTA174の リアルコンスタントのことらしい
		real,CNUM
		type,3		!要素ナンバー3のこと 3ということはtarge170
		cmsel,s,a_targ	!Cuの表面選択
		nsla,s,1	!選択されたエリアに関する節点の選択
		esurf		!既存の要素の自由表面に重ねて要素を生成とのこと
		type,5		!評価しない接触
		cmsel,s,a_cont	!はんだ下面の選択
		nsla,s,1	!選択されたエリアに関する節点の選択
		esurf
		allsel
*ENDDO


!*GO,:OWARI
!O側上の細長樹脂
*DO,ii,1,2,1
		CNUM=CNUM+1
		allsel
		!Create Contact Pair
		asel,s,,,A13+30+1	!前面を選択
		cm,a_cont,area	!a_contという名をつける
		asel,s,,,150-(ii-1)*24	!Cu表面を選択
		cm,a_targ,area	!a_targという名をつける  TARGがくっつける相手の（通常大きいほうの）面
		allsel
		r,CNUM
		rmodif,CNUM,14,1e6		!14は接触コンダクタンスのこと CONTA174の リアルコンスタントのことらしい
		real,CNUM
		type,3		!要素ナンバー3のこと 3ということはtarge170
		cmsel,s,a_targ	!Cuの表面選択
		nsla,s,1	!選択されたエリアに関する節点の選択
		esurf		!既存の要素の自由表面に重ねて要素を生成とのこと
		type,5		!評価しない接触
		cmsel,s,a_cont	!はんだ下面の選択
		nsla,s,1	!選択されたエリアに関する節点の選択
		esurf
		allsel
*ENDDO
*DO,ii,1,2,1
		CNUM=CNUM+1
		allsel
		!Create Contact Pair
		asel,s,,,A13+30+1	!前面を選択
		cm,a_cont,area	!a_contという名をつける
		asel,s,,,12+(ii-1)*30	!Cu表面を選択
		cm,a_targ,area	!a_targという名をつける  TARGがくっつける相手の（通常大きいほうの）面
		allsel
		r,CNUM
		rmodif,CNUM,14,1e6		!14は接触コンダクタンスのこと CONTA174の リアルコンスタントのことらしい
		real,CNUM
		type,3		!要素ナンバー3のこと 3ということはtarge170
		cmsel,s,a_targ	!Cuの表面選択
		nsla,s,1	!選択されたエリアに関する節点の選択
		esurf		!既存の要素の自由表面に重ねて要素を生成とのこと
		type,8		!評価しない接触
		cmsel,s,a_cont	!はんだ下面の選択
		nsla,s,1	!選択されたエリアに関する節点の選択
		esurf
		allsel
*ENDDO

		CNUM=CNUM+1
		allsel
		!Create Contact Pair
		asel,s,,,A13+30+6	!上面を選択
		cm,a_cont,area	!a_contという名をつける
		asel,s,,,231	!Cu表面を選択
		cm,a_targ,area	!a_targという名をつける  TARGがくっつける相手の（通常大きいほうの）面
		allsel
		r,CNUM
		rmodif,CNUM,14,1e6		!14は接触コンダクタンスのこと CONTA174の リアルコンスタントのことらしい
		real,CNUM
		type,3		!要素ナンバー3のこと 3ということはtarge170
		cmsel,s,a_targ	!Cuの表面選択
		nsla,s,1	!選択されたエリアに関する節点の選択
		esurf		!既存の要素の自由表面に重ねて要素を生成とのこと
		type,5		!評価しない接触
		cmsel,s,a_cont	!はんだ下面の選択
		nsla,s,1	!選択されたエリアに関する節点の選択
		esurf
		allsel

*DO,ii,1,2,1
		CNUM=CNUM+1
		allsel
		!Create Contact Pair
		asel,s,,,A13+30+6	!上面を選択
		cm,a_cont,area	!a_contという名をつける
		asel,s,,,195+(ii-1)*6	!Cu表面を選択
		cm,a_targ,area	!a_targという名をつける  TARGがくっつける相手の（通常大きいほうの）面
		allsel
		r,CNUM
		rmodif,CNUM,14,1e6		!14は接触コンダクタンスのこと CONTA174の リアルコンスタントのことらしい
		real,CNUM
		type,3		!要素ナンバー3のこと 3ということはtarge170
		cmsel,s,a_targ	!Cuの表面選択
		nsla,s,1	!選択されたエリアに関する節点の選択
		esurf		!既存の要素の自由表面に重ねて要素を生成とのこと
		type,8		!粗い樹脂と銅の接触
		cmsel,s,a_cont	!はんだ下面の選択
		nsla,s,1	!選択されたエリアに関する節点の選択
		esurf
		allsel
*ENDDO

*DO,ii,1,2,1
		CNUM=CNUM+1
		allsel
		!Create Contact Pair
		asel,s,,,A13+30+2	!前面を選択
		cm,a_cont,area	!a_contという名をつける
		asel,s,,,A12+12*(ii-1)+4+6	!Cu表面を選択
		cm,a_targ,area	!a_targという名をつける  TARGがくっつける相手の（通常大きいほうの）面
		allsel
		r,CNUM
		rmodif,CNUM,14,1e6		!14は接触コンダクタンスのこと CONTA174の リアルコンスタントのことらしい
		real,CNUM
		type,3		!要素ナンバー3のこと 3ということはtarge170
		cmsel,s,a_targ	!Cuの表面選択
		nsla,s,1	!選択されたエリアに関する節点の選択
		esurf		!既存の要素の自由表面に重ねて要素を生成とのこと
		type,5		!評価しない接触
		cmsel,s,a_cont	!はんだ下面の選択
		nsla,s,1	!選択されたエリアに関する節点の選択
		esurf
		allsel
*ENDDO

*DO,ii,1,PARA2ND,1
		CNUM=CNUM+1
		allsel
		!Create Contact Pair
		asel,s,,,A13+30+2	!前面を選択
		cm,a_cont,area	!a_contという名をつける
		asel,s,,,A1+20*2*(ii-1)+20+14	!Cu表面を選択
		cm,a_targ,area	!a_targという名をつける  TARGがくっつける相手の（通常大きいほうの）面
		allsel
		r,CNUM
		rmodif,CNUM,14,1e6		!14は接触コンダクタンスのこと CONTA174の リアルコンスタントのことらしい
		real,CNUM
		type,3		!要素ナンバー3のこと 3ということはtarge170
		cmsel,s,a_targ	!Cuの表面選択
		nsla,s,1	!選択されたエリアに関する節点の選択
		esurf		!既存の要素の自由表面に重ねて要素を生成とのこと
		type,5		!評価しない接触
		cmsel,s,a_cont	!はんだ下面の選択
		nsla,s,1	!選択されたエリアに関する節点の選択
		esurf
		allsel

		CNUM=CNUM+1
		allsel
		!Create Contact Pair
		asel,s,,,A13+30+2	!前面を選択
		cm,a_cont,area	!a_contという名をつける
		asel,s,,,A2+16*2*(ii-1)+16+12	!Cu表面を選択
		cm,a_targ,area	!a_targという名をつける  TARGがくっつける相手の（通常大きいほうの）面
		allsel
		r,CNUM
		rmodif,CNUM,14,1e6		!14は接触コンダクタンスのこと CONTA174の リアルコンスタントのことらしい
		real,CNUM
		type,3		!要素ナンバー3のこと 3ということはtarge170
		cmsel,s,a_targ	!Cuの表面選択
		nsla,s,1	!選択されたエリアに関する節点の選択
		esurf		!既存の要素の自由表面に重ねて要素を生成とのこと
		type,5		!評価しない接触
		cmsel,s,a_cont	!はんだ下面の選択
		nsla,s,1	!選択されたエリアに関する節点の選択
		esurf
		allsel

		CNUM=CNUM+1
		allsel
		!Create Contact Pair
		asel,s,,,A13+30+2	!前面を選択
		cm,a_cont,area	!a_contという名をつける
		asel,s,,,A3+30*2*(ii-1)+30+24	!Cu表面を選択
		cm,a_targ,area	!a_targという名をつける  TARGがくっつける相手の（通常大きいほうの）面
		allsel
		r,CNUM
		rmodif,CNUM,14,1e6		!14は接触コンダクタンスのこと CONTA174の リアルコンスタントのことらしい
		real,CNUM
		type,3		!要素ナンバー3のこと 3ということはtarge170
		cmsel,s,a_targ	!Cuの表面選択
		nsla,s,1	!選択されたエリアに関する節点の選択
		esurf		!既存の要素の自由表面に重ねて要素を生成とのこと
		type,5		!評価しない接触
		cmsel,s,a_cont	!はんだ下面の選択
		nsla,s,1	!選択されたエリアに関する節点の選択
		esurf
		allsel

		CNUM=CNUM+1
		allsel
		!Create Contact Pair
		asel,s,,,A13+30+2	!前面を選択
		cm,a_cont,area	!a_contという名をつける
		asel,s,,,A5+27*2*(ii-1)+27+20	!Cu表面を選択
		cm,a_targ,area	!a_targという名をつける  TARGがくっつける相手の（通常大きいほうの）面
		allsel
		r,CNUM
		rmodif,CNUM,14,1e6		!14は接触コンダクタンスのこと CONTA174の リアルコンスタントのことらしい
		real,CNUM
		type,3		!要素ナンバー3のこと 3ということはtarge170
		cmsel,s,a_targ	!Cuの表面選択
		nsla,s,1	!選択されたエリアに関する節点の選択
		esurf		!既存の要素の自由表面に重ねて要素を生成とのこと
		type,5		!評価しない接触
		cmsel,s,a_cont	!はんだ下面の選択
		nsla,s,1	!選択されたエリアに関する節点の選択
		esurf
		allsel

		CNUM=CNUM+1
		allsel
		!Create Contact Pair
		asel,s,,,A13+30+2	!前面を選択
		cm,a_cont,area	!a_contという名をつける
		asel,s,,,A6+20*2*(ii-1)+20+14	!Cu表面を選択
		cm,a_targ,area	!a_targという名をつける  TARGがくっつける相手の（通常大きいほうの）面
		allsel
		r,CNUM
		rmodif,CNUM,14,1e6		!14は接触コンダクタンスのこと CONTA174の リアルコンスタントのことらしい
		real,CNUM
		type,3		!要素ナンバー3のこと 3ということはtarge170
		cmsel,s,a_targ	!Cuの表面選択
		nsla,s,1	!選択されたエリアに関する節点の選択
		esurf		!既存の要素の自由表面に重ねて要素を生成とのこと
		type,5		!評価しない接触
		cmsel,s,a_cont	!はんだ下面の選択
		nsla,s,1	!選択されたエリアに関する節点の選択
		esurf
		allsel

		CNUM=CNUM+1
		allsel
		!Create Contact Pair
		asel,s,,,A13+30+2	!前面を選択
		cm,a_cont,area	!a_contという名をつける
		asel,s,,,A7+16*2*(ii-1)+16+12	!Cu表面を選択
		cm,a_targ,area	!a_targという名をつける  TARGがくっつける相手の（通常大きいほうの）面
		allsel
		r,CNUM
		rmodif,CNUM,14,1e6		!14は接触コンダクタンスのこと CONTA174の リアルコンスタントのことらしい
		real,CNUM
		type,3		!要素ナンバー3のこと 3ということはtarge170
		cmsel,s,a_targ	!Cuの表面選択
		nsla,s,1	!選択されたエリアに関する節点の選択
		esurf		!既存の要素の自由表面に重ねて要素を生成とのこと
		type,5		!評価しない接触
		cmsel,s,a_cont	!はんだ下面の選択
		nsla,s,1	!選択されたエリアに関する節点の選択
		esurf
		allsel

		CNUM=CNUM+1
		allsel
		!Create Contact Pair
		asel,s,,,A13+30+2	!前面を選択
		cm,a_cont,area	!a_contという名をつける
		asel,s,,,A8+16*2*(ii-1)+16+11	!Cu表面を選択
		cm,a_targ,area	!a_targという名をつける  TARGがくっつける相手の（通常大きいほうの）面
		allsel
		r,CNUM
		rmodif,CNUM,14,1e6		!14は接触コンダクタンスのこと CONTA174の リアルコンスタントのことらしい
		real,CNUM
		type,3		!要素ナンバー3のこと 3ということはtarge170
		cmsel,s,a_targ	!Cuの表面選択
		nsla,s,1	!選択されたエリアに関する節点の選択
		esurf		!既存の要素の自由表面に重ねて要素を生成とのこと
		type,5		!評価しない接触
		cmsel,s,a_cont	!はんだ下面の選択
		nsla,s,1	!選択されたエリアに関する節点の選択
		esurf
		allsel

*ENDDO

*DO,ii,1,PARA2ND-1,1
		CNUM=CNUM+1
		allsel
		!Create Contact Pair
		asel,s,,,A13+30+2	!前面を選択
		cm,a_cont,area	!a_contという名をつける
		asel,s,,,A10+6*2*(ii-1)+6+4	!Cu表面を選択
		cm,a_targ,area	!a_targという名をつける  TARGがくっつける相手の（通常大きいほうの）面
		allsel
		r,CNUM
		rmodif,CNUM,14,1e6		!14は接触コンダクタンスのこと CONTA174の リアルコンスタントのことらしい
		real,CNUM
		type,3		!要素ナンバー3のこと 3ということはtarge170
		cmsel,s,a_targ	!Cuの表面選択
		nsla,s,1	!選択されたエリアに関する節点の選択
		esurf		!既存の要素の自由表面に重ねて要素を生成とのこと
		type,5		!評価しない接触
		cmsel,s,a_cont	!はんだ下面の選択
		nsla,s,1	!選択されたエリアに関する節点の選択
		esurf
		allsel
*ENDDO

		CNUM=CNUM+1
		allsel
		!Create Contact Pair
		asel,s,,,A13+30+3	!前面を選択
		cm,a_cont,area	!a_contという名をつける
		asel,s,,,ABASE-32+16+5	!Cu表面を選択
		cm,a_targ,area	!a_targという名をつける  TARGがくっつける相手の（通常大きいほうの）面
		allsel
		r,CNUM
		rmodif,CNUM,14,1e6		!14は接触コンダクタンスのこと CONTA174の リアルコンスタントのことらしい
		real,CNUM
		type,3		!要素ナンバー3のこと 3ということはtarge170
		cmsel,s,a_targ	!Cuの表面選択
		nsla,s,1	!選択されたエリアに関する節点の選択
		esurf		!既存の要素の自由表面に重ねて要素を生成とのこと
		type,5		!評価しない接触
		cmsel,s,a_cont	!はんだ下面の選択
		nsla,s,1	!選択されたエリアに関する節点の選択
		esurf
		allsel

		CNUM=CNUM+1
		allsel
		!Create Contact Pair
		asel,s,,,A13+30+3	!前面を選択
		cm,a_cont,area	!a_contという名をつける
		asel,s,,,ABASE-32+16+11	!Cu表面を選択
		cm,a_targ,area	!a_targという名をつける  TARGがくっつける相手の（通常大きいほうの）面
		allsel
		r,CNUM
		rmodif,CNUM,14,1e6		!14は接触コンダクタンスのこと CONTA174の リアルコンスタントのことらしい
		real,CNUM
		type,3		!要素ナンバー3のこと 3ということはtarge170
		cmsel,s,a_targ	!Cuの表面選択
		nsla,s,1	!選択されたエリアに関する節点の選択
		esurf		!既存の要素の自由表面に重ねて要素を生成とのこと
		type,8		!評価しない接触
		cmsel,s,a_cont	!はんだ下面の選択
		nsla,s,1	!選択されたエリアに関する節点の選択
		esurf
		allsel

		CNUM=CNUM+1
		allsel
		!Create Contact Pair
		asel,s,,,A13+30+3	!前面を選択
		cm,a_cont,area	!a_contという名をつける
		asel,s,,,ABASE-32+16+16	!Cu表面を選択
		cm,a_targ,area	!a_targという名をつける  TARGがくっつける相手の（通常大きいほうの）面
		allsel
		r,CNUM
		rmodif,CNUM,14,1e6		!14は接触コンダクタンスのこと CONTA174の リアルコンスタントのことらしい
		real,CNUM
		type,3		!要素ナンバー3のこと 3ということはtarge170
		cmsel,s,a_targ	!Cuの表面選択
		nsla,s,1	!選択されたエリアに関する節点の選択
		esurf		!既存の要素の自由表面に重ねて要素を生成とのこと
		type,5		!評価しない接触
		cmsel,s,a_cont	!はんだ下面の選択
		nsla,s,1	!選択されたエリアに関する節点の選択
		esurf
		allsel

*DO,ii,1,2,1
		CNUM=CNUM+1
		allsel
		!Create Contact Pair
		asel,s,,,A13+30+4	!前面を選択
		cm,a_cont,area	!a_contという名をつける
		asel,s,,,294+(ii-1)*6	!Cu表面を選択
		cm,a_targ,area	!a_targという名をつける  TARGがくっつける相手の（通常大きいほうの）面
		allsel
		r,CNUM
		rmodif,CNUM,14,1e6		!14は接触コンダクタンスのこと CONTA174の リアルコンスタントのことらしい
		real,CNUM
		type,3		!要素ナンバー3のこと 3ということはtarge170
		cmsel,s,a_targ	!Cuの表面選択
		nsla,s,1	!選択されたエリアに関する節点の選択
		esurf		!既存の要素の自由表面に重ねて要素を生成とのこと
		type,5		!はんだと樹脂の接触
		cmsel,s,a_cont	!はんだ下面の選択
		nsla,s,1	!選択されたエリアに関する節点の選択
		esurf
		allsel
*ENDDO

*DO,ii,1,2,1
		CNUM=CNUM+1
		allsel
		!Create Contact Pair
		asel,s,,,A13+30+4	!前面を選択
		cm,a_cont,area	!a_contという名をつける
		asel,s,,,318+(ii-1)*5	!Cu表面を選択
		cm,a_targ,area	!a_targという名をつける  TARGがくっつける相手の（通常大きいほうの）面
		allsel
		r,CNUM
		rmodif,CNUM,14,1e6		!14は接触コンダクタンスのこと CONTA174の リアルコンスタントのことらしい
		real,CNUM
		type,3		!要素ナンバー3のこと 3ということはtarge170
		cmsel,s,a_targ	!Cuの表面選択
		nsla,s,1	!選択されたエリアに関する節点の選択
		esurf		!既存の要素の自由表面に重ねて要素を生成とのこと
		type,8		!粗い樹脂と銅の接触
		cmsel,s,a_cont	!はんだ下面の選択
		nsla,s,1	!選択されたエリアに関する節点の選択
		esurf
		allsel
*ENDDO

!P側下の樹脂 信号側
*DO,ii,1,2,1
		CNUM=CNUM+1
		allsel
		!Create Contact Pair
		asel,s,,,A13+36+1	!下面を選択
		cm,a_cont,area	!a_contという名をつける
		asel,s,,,90+12*(ii-1)	!Cu表面を選択
		cm,a_targ,area	!a_targという名をつける  TARGがくっつける相手の（通常大きいほうの）面
		allsel
		r,CNUM
		rmodif,CNUM,14,1e6		!14は接触コンダクタンスのこと CONTA174の リアルコンスタントのことらしい
		real,CNUM
		type,3		!要素ナンバー3のこと 3ということはtarge170
		cmsel,s,a_targ	!Cuの表面選択
		nsla,s,1	!選択されたエリアに関する節点の選択
		esurf		!既存の要素の自由表面に重ねて要素を生成とのこと
		type,5		!評価しない接触
		cmsel,s,a_cont	!はんだ下面の選択
		nsla,s,1	!選択されたエリアに関する節点の選択
		esurf
		allsel
*ENDDO
*DO,ii,1,2,1
		CNUM=CNUM+1
		allsel
		!Create Contact Pair
		asel,s,,,A13+36+1	!下面を選択
		cm,a_cont,area	!a_contという名をつける
		asel,s,,,132+(ii-1)*6	!Cu表面を選択
		cm,a_targ,area	!a_targという名をつける  TARGがくっつける相手の（通常大きいほうの）面
		allsel
		r,CNUM
		rmodif,CNUM,14,1e6		!14は接触コンダクタンスのこと CONTA174の リアルコンスタントのことらしい
		real,CNUM
		type,3		!要素ナンバー3のこと 3ということはtarge170
		cmsel,s,a_targ	!Cuの表面選択
		nsla,s,1	!選択されたエリアに関する節点の選択
		esurf		!既存の要素の自由表面に重ねて要素を生成とのこと
		type,5		!評価しない接触
		cmsel,s,a_cont	!はんだ下面の選択
		nsla,s,1	!選択されたエリアに関する節点の選択
		esurf
		allsel
*ENDDO

*DO,ii,1,3,1
		CNUM=CNUM+1
		allsel
		!Create Contact Pair
		asel,s,,,A13+36+1	!下面を選択
		cm,a_cont,area	!a_contという名をつける
		asel,s,,,24+(ii-1)*6	!Cu表面を選択
		cm,a_targ,area	!a_targという名をつける  TARGがくっつける相手の（通常大きいほうの）面
		allsel
		r,CNUM
		rmodif,CNUM,14,1e6		!14は接触コンダクタンスのこと CONTA174の リアルコンスタントのことらしい
		real,CNUM
		type,3		!要素ナンバー3のこと 3ということはtarge170
		cmsel,s,a_targ	!Cuの表面選択
		nsla,s,1	!選択されたエリアに関する節点の選択
		esurf		!既存の要素の自由表面に重ねて要素を生成とのこと
		type,8		!粗い樹脂と銅の接触
		cmsel,s,a_cont	!はんだ下面の選択
		nsla,s,1	!選択されたエリアに関する節点の選択
		esurf
		allsel
*ENDDO

*DO,ii,1,2,1
		CNUM=CNUM+1
		allsel
		!Create Contact Pair
		asel,s,,,A13+36+1	!下面を選択
		cm,a_cont,area	!a_contという名をつける
		asel,s,,,66+(ii-1)*6	!Cu表面を選択
		cm,a_targ,area	!a_targという名をつける  TARGがくっつける相手の（通常大きいほうの）面
		allsel
		r,CNUM
		rmodif,CNUM,14,1e6		!14は接触コンダクタンスのこと CONTA174の リアルコンスタントのことらしい
		real,CNUM
		type,3		!要素ナンバー3のこと 3ということはtarge170
		cmsel,s,a_targ	!Cuの表面選択
		nsla,s,1	!選択されたエリアに関する節点の選択
		esurf		!既存の要素の自由表面に重ねて要素を生成とのこと
		type,8		!粗い樹脂と銅の接触
		cmsel,s,a_cont	!はんだ下面の選択
		nsla,s,1	!選択されたエリアに関する節点の選択
		esurf
		allsel
*ENDDO

*DO,ii,1,2,1
		CNUM=CNUM+1
		allsel
		!Create Contact Pair
		asel,s,,,A13+36+6	!下面を選択
		cm,a_cont,area	!a_contという名をつける
		asel,s,,,207+(ii-1)*6	!Cu表面を選択
		cm,a_targ,area	!a_targという名をつける  TARGがくっつける相手の（通常大きいほうの）面
		allsel
		r,CNUM
		rmodif,CNUM,14,1e6		!14は接触コンダクタンスのこと CONTA174の リアルコンスタントのことらしい
		real,CNUM
		type,3		!要素ナンバー3のこと 3ということはtarge170
		cmsel,s,a_targ	!Cuの表面選択
		nsla,s,1	!選択されたエリアに関する節点の選択
		esurf		!既存の要素の自由表面に重ねて要素を生成とのこと
		type,8		!粗い樹脂と銅の接触
		cmsel,s,a_cont	!はんだ下面の選択
		nsla,s,1	!選択されたエリアに関する節点の選択
		esurf
		allsel
*ENDDO

		CNUM=CNUM+1
		allsel
		!Create Contact Pair
		asel,s,,,A13+36+6	!下面を選択
		cm,a_cont,area	!a_contという名をつける
		asel,s,,,219		!Cu表面を選択
		cm,a_targ,area	!a_targという名をつける  TARGがくっつける相手の（通常大きいほうの）面
		allsel
		r,CNUM
		rmodif,CNUM,14,1e6		!14は接触コンダクタンスのこと CONTA174の リアルコンスタントのことらしい
		real,CNUM
		type,3		!要素ナンバー3のこと 3ということはtarge170
		cmsel,s,a_targ	!Cuの表面選択
		nsla,s,1	!選択されたエリアに関する節点の選択
		esurf		!既存の要素の自由表面に重ねて要素を生成とのこと
		type,5		!評価しない接触
		cmsel,s,a_cont	!はんだ下面の選択
		nsla,s,1	!選択されたエリアに関する節点の選択
		esurf
		allsel

		CNUM=CNUM+1
		allsel
		!Create Contact Pair
		asel,s,,,A13+36+2	!前面を選択
		cm,a_cont,area	!a_contという名をつける
		asel,s,,,314	!Cu表面を選択
		cm,a_targ,area	!a_targという名をつける  TARGがくっつける相手の（通常大きいほうの）面
		allsel
		r,CNUM
		rmodif,CNUM,14,1e6		!14は接触コンダクタンスのこと CONTA174の リアルコンスタントのことらしい
		real,CNUM
		type,3		!要素ナンバー3のこと 3ということはtarge170
		cmsel,s,a_targ	!Cuの表面選択
		nsla,s,1	!選択されたエリアに関する節点の選択
		esurf		!既存の要素の自由表面に重ねて要素を生成とのこと
		type,5		!はんだと樹脂の接触
		cmsel,s,a_cont	!はんだ下面の選択
		nsla,s,1	!選択されたエリアに関する節点の選択
		esurf
		allsel

		CNUM=CNUM+1
		allsel
		!Create Contact Pair
		asel,s,,,A13+36+2	!前面を選択
		cm,a_cont,area	!a_contという名をつける
		asel,s,,,335	!Cu表面を選択
		cm,a_targ,area	!a_targという名をつける  TARGがくっつける相手の（通常大きいほうの）面
		allsel
		r,CNUM
		rmodif,CNUM,14,1e6		!14は接触コンダクタンスのこと CONTA174の リアルコンスタントのことらしい
		real,CNUM
		type,3		!要素ナンバー3のこと 3ということはtarge170
		cmsel,s,a_targ	!Cuの表面選択
		nsla,s,1	!選択されたエリアに関する節点の選択
		esurf		!既存の要素の自由表面に重ねて要素を生成とのこと
		type,8		!粗い樹脂と銅の接触
		cmsel,s,a_cont	!はんだ下面の選択
		nsla,s,1	!選択されたエリアに関する節点の選択
		esurf
		allsel

*DO,ii,1,2,1
		CNUM=CNUM+1
		allsel
		!Create Contact Pair
		asel,s,,,A13+36+4	!前面を選択
		cm,a_cont,area	!a_contという名をつける
		asel,s,,,A12+6*4+2+(ii-1)*12	!Cu表面を選択
		cm,a_targ,area	!a_targという名をつける  TARGがくっつける相手の（通常大きいほうの）面
		allsel
		r,CNUM
		rmodif,CNUM,14,1e6		!14は接触コンダクタンスのこと CONTA174の リアルコンスタントのことらしい
		real,CNUM
		type,3		!要素ナンバー3のこと 3ということはtarge170
		cmsel,s,a_targ	!Cuの表面選択
		nsla,s,1	!選択されたエリアに関する節点の選択
		esurf		!既存の要素の自由表面に重ねて要素を生成とのこと
		type,5		!評価しない接触
		cmsel,s,a_cont	!はんだ下面の選択
		nsla,s,1	!選択されたエリアに関する節点の選択
		esurf
		allsel
*ENDDO

*DO,ii,1,PARA1ST,1
		CNUM=CNUM+1
		allsel
		!Create Contact Pair
		asel,s,,,A13+36+4	!前面を選択
		cm,a_cont,area	!a_contという名をつける
		asel,s,,,A1+PARA*20+2+(ii-1)*20*2	!Cu表面を選択
		cm,a_targ,area	!a_targという名をつける  TARGがくっつける相手の（通常大きいほうの）面
		allsel
		r,CNUM
		rmodif,CNUM,14,1e6		!14は接触コンダクタンスのこと CONTA174の リアルコンスタントのことらしい
		real,CNUM
		type,3		!要素ナンバー3のこと 3ということはtarge170
		cmsel,s,a_targ	!Cuの表面選択
		nsla,s,1	!選択されたエリアに関する節点の選択
		esurf		!既存の要素の自由表面に重ねて要素を生成とのこと
		type,5		!評価しない接触
		cmsel,s,a_cont	!はんだ下面の選択
		nsla,s,1	!選択されたエリアに関する節点の選択
		esurf
		allsel

		CNUM=CNUM+1
		allsel
		!Create Contact Pair
		asel,s,,,A13+36+4	!前面を選択
		cm,a_cont,area	!a_contという名をつける
		asel,s,,,A2+2+PARA*16+(ii-1)*16*2	!Cu表面を選択
		cm,a_targ,area	!a_targという名をつける  TARGがくっつける相手の（通常大きいほうの）面
		allsel
		r,CNUM
		rmodif,CNUM,14,1e6		!14は接触コンダクタンスのこと CONTA174の リアルコンスタントのことらしい
		real,CNUM
		type,3		!要素ナンバー3のこと 3ということはtarge170
		cmsel,s,a_targ	!Cuの表面選択
		nsla,s,1	!選択されたエリアに関する節点の選択
		esurf		!既存の要素の自由表面に重ねて要素を生成とのこと
		type,5		!評価しない接触
		cmsel,s,a_cont	!はんだ下面の選択
		nsla,s,1	!選択されたエリアに関する節点の選択
		esurf
		allsel

		CNUM=CNUM+1
		allsel
		!Create Contact Pair
		asel,s,,,A13+36+4	!前面を選択
		cm,a_cont,area	!a_contという名をつける
		asel,s,,,A9+2+PARA*6+(ii-1)*6*2	!Cu表面を選択
		cm,a_targ,area	!a_targという名をつける  TARGがくっつける相手の（通常大きいほうの）面
		allsel
		r,CNUM
		rmodif,CNUM,14,1e6		!14は接触コンダクタンスのこと CONTA174の リアルコンスタントのことらしい
		real,CNUM
		type,3		!要素ナンバー3のこと 3ということはtarge170
		cmsel,s,a_targ	!Cuの表面選択
		nsla,s,1	!選択されたエリアに関する節点の選択
		esurf		!既存の要素の自由表面に重ねて要素を生成とのこと
		type,5		!評価しない接触
		cmsel,s,a_cont	!はんだ下面の選択
		nsla,s,1	!選択されたエリアに関する節点の選択
		esurf
		allsel
*ENDDO

*DO,ii,1,PARA1ST-1,1
		CNUM=CNUM+1
		allsel
		!Create Contact Pair
		asel,s,,,A13+36+4	!前面を選択
		cm,a_cont,area	!a_contという名をつける
		asel,s,,,A10+2+(PARA-2)*6+(ii-1)*6*2	!Cu表面を選択
		cm,a_targ,area	!a_targという名をつける  TARGがくっつける相手の（通常大きいほうの）面
		allsel
		r,CNUM
		rmodif,CNUM,14,1e6		!14は接触コンダクタンスのこと CONTA174の リアルコンスタントのことらしい
		real,CNUM
		type,3		!要素ナンバー3のこと 3ということはtarge170
		cmsel,s,a_targ	!Cuの表面選択
		nsla,s,1	!選択されたエリアに関する節点の選択
		esurf		!既存の要素の自由表面に重ねて要素を生成とのこと
		type,5		!評価しない接触
		cmsel,s,a_cont	!はんだ下面の選択
		nsla,s,1	!選択されたエリアに関する節点の選択
		esurf
		allsel
*ENDDO

*DO,ii,1,2,1
		CNUM=CNUM+1
		allsel
		!Create Contact Pair
		asel,s,,,A13+36+4	!前面を選択
		cm,a_cont,area	!a_contという名をつける
		asel,s,,,A12+2+(ii-1)*12+6*4	!Cu表面を選択
		cm,a_targ,area	!a_targという名をつける  TARGがくっつける相手の（通常大きいほうの）面
		allsel
		r,CNUM
		rmodif,CNUM,14,1e6		!14は接触コンダクタンスのこと CONTA174の リアルコンスタントのことらしい
		real,CNUM
		type,3		!要素ナンバー3のこと 3ということはtarge170
		cmsel,s,a_targ	!Cuの表面選択
		nsla,s,1	!選択されたエリアに関する節点の選択
		esurf		!既存の要素の自由表面に重ねて要素を生成とのこと
		type,5		!評価しない接触
		cmsel,s,a_cont	!はんだ下面の選択
		nsla,s,1	!選択されたエリアに関する節点の選択
		esurf
		allsel
*ENDDO

*DO,ii,1,2,1
		CNUM=CNUM+1
		allsel
		!Create Contact Pair
		asel,s,,,A13+36+5	!下面を選択
		cm,a_cont,area	!a_contという名をつける
		asel,s,,,ABASE-32+3+(ii-1)*11	!Cu表面を選択
		cm,a_targ,area	!a_targという名をつける  TARGがくっつける相手の（通常大きいほうの）面
		allsel
		r,CNUM
		rmodif,CNUM,14,1e6		!14は接触コンダクタンスのこと CONTA174の リアルコンスタントのことらしい
		real,CNUM
		type,3		!要素ナンバー3のこと 3ということはtarge170
		cmsel,s,a_targ	!Cuの表面選択
		nsla,s,1	!選択されたエリアに関する節点の選択
		esurf		!既存の要素の自由表面に重ねて要素を生成とのこと
		type,5		!はんだと樹脂の接触
		cmsel,s,a_cont	!はんだ下面の選択
		nsla,s,1	!選択されたエリアに関する節点の選択
		esurf
		allsel
*ENDDO

		CNUM=CNUM+1
		allsel
		!Create Contact Pair
		asel,s,,,A13+36+5	!下面を選択
		cm,a_cont,area	!a_contという名をつける
		asel,s,,,ABASE-32+9		!Cu表面を選択
		cm,a_targ,area	!a_targという名をつける  TARGがくっつける相手の（通常大きいほうの）面
		allsel
		r,CNUM
		rmodif,CNUM,14,1e6		!14は接触コンダクタンスのこと CONTA174の リアルコンスタントのことらしい
		real,CNUM
		type,3		!要素ナンバー3のこと 3ということはtarge170
		cmsel,s,a_targ	!Cuの表面選択
		nsla,s,1	!選択されたエリアに関する節点の選択
		esurf		!既存の要素の自由表面に重ねて要素を生成とのこと
		type,8		!粗い樹脂と銅の接触
		cmsel,s,a_cont	!はんだ下面の選択
		nsla,s,1	!選択されたエリアに関する節点の選択
		esurf
		allsel

!P側上の8つめの樹脂
*DO,ii,1,2,1
		CNUM=CNUM+1
		allsel
		!Create Contact Pair
		asel,s,,,A13+42+1	!下面を選択
		cm,a_cont,area	!a_contという名をつける
		asel,s,,,30+(ii-1)*12		!Cu表面を選択
		cm,a_targ,area	!a_targという名をつける  TARGがくっつける相手の（通常大きいほうの）面
		allsel
		r,CNUM
		rmodif,CNUM,14,1e6		!14は接触コンダクタンスのこと CONTA174の リアルコンスタントのことらしい
		real,CNUM
		type,3		!要素ナンバー3のこと 3ということはtarge170
		cmsel,s,a_targ	!Cuの表面選択
		nsla,s,1	!選択されたエリアに関する節点の選択
		esurf		!既存の要素の自由表面に重ねて要素を生成とのこと
		type,8		!粗い樹脂と銅の接触
		cmsel,s,a_cont	!はんだ下面の選択
		nsla,s,1	!選択されたエリアに関する節点の選択
		esurf
		allsel
*ENDDO
		CNUM=CNUM+1
		allsel
		!Create Contact Pair
		asel,s,,,A13+42+1	!下面を選択
		cm,a_cont,area	!a_contという名をつける
		asel,s,,,132		!Cu表面を選択
		cm,a_targ,area	!a_targという名をつける  TARGがくっつける相手の（通常大きいほうの）面
		allsel
		r,CNUM
		rmodif,CNUM,14,1e6		!14は接触コンダクタンスのこと CONTA174の リアルコンスタントのことらしい
		real,CNUM
		type,3		!要素ナンバー3のこと 3ということはtarge170
		cmsel,s,a_targ	!Cuの表面選択
		nsla,s,1	!選択されたエリアに関する節点の選択
		esurf		!既存の要素の自由表面に重ねて要素を生成とのこと
		type,5		!評価しない接触
		cmsel,s,a_cont	!はんだ下面の選択
		nsla,s,1	!選択されたエリアに関する節点の選択
		esurf
		allsel

*DO,ii,1,2,1
		CNUM=CNUM+1
		allsel
		!Create Contact Pair
		asel,s,,,A13+42+6	!上面を選択
		cm,a_cont,area	!a_contという名をつける
		asel,s,,,201+(ii-1)*12		!Cu表面を選択
		cm,a_targ,area	!a_targという名をつける  TARGがくっつける相手の（通常大きいほうの）面
		allsel
		r,CNUM
		rmodif,CNUM,14,1e6		!14は接触コンダクタンスのこと CONTA174の リアルコンスタントのことらしい
		real,CNUM
		type,3		!要素ナンバー3のこと 3ということはtarge170
		cmsel,s,a_targ	!Cuの表面選択
		nsla,s,1	!選択されたエリアに関する節点の選択
		esurf		!既存の要素の自由表面に重ねて要素を生成とのこと
		type,8		!粗い樹脂と銅の接触
		cmsel,s,a_cont	!はんだ下面の選択
		nsla,s,1	!選択されたエリアに関する節点の選択
		esurf
		allsel
*ENDDO
*DO,ii,1,2,1
		CNUM=CNUM+1
		allsel
		!Create Contact Pair
		asel,s,,,A13+42+6	!上面を選択
		cm,a_cont,area	!a_contという名をつける
		asel,s,,,231+24*(ii-1)		!Cu表面を選択
		cm,a_targ,area	!a_targという名をつける  TARGがくっつける相手の（通常大きいほうの）面
		allsel
		r,CNUM
		rmodif,CNUM,14,1e6		!14は接触コンダクタンスのこと CONTA174の リアルコンスタントのことらしい
		real,CNUM
		type,3		!要素ナンバー3のこと 3ということはtarge170
		cmsel,s,a_targ	!Cuの表面選択
		nsla,s,1	!選択されたエリアに関する節点の選択
		esurf		!既存の要素の自由表面に重ねて要素を生成とのこと
		type,5		!評価しない接触
		cmsel,s,a_cont	!はんだ下面の選択
		nsla,s,1	!選択されたエリアに関する節点の選択
		esurf
		allsel
*ENDDO

*DO,ii,1,2,1
		CNUM=CNUM+1
		allsel
		!Create Contact Pair
		asel,s,,,A13+42+2	!前面を選択
		cm,a_cont,area	!a_contという名をつける
		asel,s,,,A12+12*(ii-1)+4+6*5	!Cu表面を選択
		cm,a_targ,area	!a_targという名をつける  TARGがくっつける相手の（通常大きいほうの）面
		allsel
		r,CNUM
		rmodif,CNUM,14,1e6		!14は接触コンダクタンスのこと CONTA174の リアルコンスタントのことらしい
		real,CNUM
		type,3		!要素ナンバー3のこと 3ということはtarge170
		cmsel,s,a_targ	!Cuの表面選択
		nsla,s,1	!選択されたエリアに関する節点の選択
		esurf		!既存の要素の自由表面に重ねて要素を生成とのこと
		type,5		!評価しない接触
		cmsel,s,a_cont	!はんだ下面の選択
		nsla,s,1	!選択されたエリアに関する節点の選択
		esurf
		allsel
*ENDDO

*DO,ii,1,PARA2ND,1
		CNUM=CNUM+1
		allsel
		!Create Contact Pair
		asel,s,,,A13+42+2	!前面を選択
		cm,a_cont,area	!a_contという名をつける
		asel,s,,,A1+20*2*(ii-1)+20*(PARA+1)+14	!Cu表面を選択
		cm,a_targ,area	!a_targという名をつける  TARGがくっつける相手の（通常大きいほうの）面
		allsel
		r,CNUM
		rmodif,CNUM,14,1e6		!14は接触コンダクタンスのこと CONTA174の リアルコンスタントのことらしい
		real,CNUM
		type,3		!要素ナンバー3のこと 3ということはtarge170
		cmsel,s,a_targ	!Cuの表面選択
		nsla,s,1	!選択されたエリアに関する節点の選択
		esurf		!既存の要素の自由表面に重ねて要素を生成とのこと
		type,5		!評価しない接触
		cmsel,s,a_cont	!はんだ下面の選択
		nsla,s,1	!選択されたエリアに関する節点の選択
		esurf
		allsel

		CNUM=CNUM+1
		allsel
		!Create Contact Pair
		asel,s,,,A13+42+2	!前面を選択
		cm,a_cont,area	!a_contという名をつける
		asel,s,,,A2+16*2*(ii-1)+16*(PARA+1)+12	!Cu表面を選択
		cm,a_targ,area	!a_targという名をつける  TARGがくっつける相手の（通常大きいほうの）面
		allsel
		r,CNUM
		rmodif,CNUM,14,1e6		!14は接触コンダクタンスのこと CONTA174の リアルコンスタントのことらしい
		real,CNUM
		type,3		!要素ナンバー3のこと 3ということはtarge170
		cmsel,s,a_targ	!Cuの表面選択
		nsla,s,1	!選択されたエリアに関する節点の選択
		esurf		!既存の要素の自由表面に重ねて要素を生成とのこと
		type,5		!評価しない接触
		cmsel,s,a_cont	!はんだ下面の選択
		nsla,s,1	!選択されたエリアに関する節点の選択
		esurf
		allsel

		CNUM=CNUM+1
		allsel
		!Create Contact Pair
		asel,s,,,A13+42+2	!前面を選択
		cm,a_cont,area	!a_contという名をつける
		asel,s,,,A3+30*2*(ii-1)+30*(PARA+1)+24	!Cu表面を選択
		cm,a_targ,area	!a_targという名をつける  TARGがくっつける相手の（通常大きいほうの）面
		allsel
		r,CNUM
		rmodif,CNUM,14,1e6		!14は接触コンダクタンスのこと CONTA174の リアルコンスタントのことらしい
		real,CNUM
		type,3		!要素ナンバー3のこと 3ということはtarge170
		cmsel,s,a_targ	!Cuの表面選択
		nsla,s,1	!選択されたエリアに関する節点の選択
		esurf		!既存の要素の自由表面に重ねて要素を生成とのこと
		type,5		!評価しない接触
		cmsel,s,a_cont	!はんだ下面の選択
		nsla,s,1	!選択されたエリアに関する節点の選択
		esurf
		allsel

		CNUM=CNUM+1
		allsel
		!Create Contact Pair
		asel,s,,,A13+42+2	!前面を選択
		cm,a_cont,area	!a_contという名をつける
		asel,s,,,A5+27*2*(ii-1)+27*(PARA+1)+20	!Cu表面を選択
		cm,a_targ,area	!a_targという名をつける  TARGがくっつける相手の（通常大きいほうの）面
		allsel
		r,CNUM
		rmodif,CNUM,14,1e6		!14は接触コンダクタンスのこと CONTA174の リアルコンスタントのことらしい
		real,CNUM
		type,3		!要素ナンバー3のこと 3ということはtarge170
		cmsel,s,a_targ	!Cuの表面選択
		nsla,s,1	!選択されたエリアに関する節点の選択
		esurf		!既存の要素の自由表面に重ねて要素を生成とのこと
		type,5		!評価しない接触
		cmsel,s,a_cont	!はんだ下面の選択
		nsla,s,1	!選択されたエリアに関する節点の選択
		esurf
		allsel

		CNUM=CNUM+1
		allsel
		!Create Contact Pair
		asel,s,,,A13+42+2	!前面を選択
		cm,a_cont,area	!a_contという名をつける
		asel,s,,,A6+20*2*(ii-1)+20*(PARA+1)+14	!Cu表面を選択
		cm,a_targ,area	!a_targという名をつける  TARGがくっつける相手の（通常大きいほうの）面
		allsel
		r,CNUM
		rmodif,CNUM,14,1e6		!14は接触コンダクタンスのこと CONTA174の リアルコンスタントのことらしい
		real,CNUM
		type,3		!要素ナンバー3のこと 3ということはtarge170
		cmsel,s,a_targ	!Cuの表面選択
		nsla,s,1	!選択されたエリアに関する節点の選択
		esurf		!既存の要素の自由表面に重ねて要素を生成とのこと
		type,5		!評価しない接触
		cmsel,s,a_cont	!はんだ下面の選択
		nsla,s,1	!選択されたエリアに関する節点の選択
		esurf
		allsel

		CNUM=CNUM+1
		allsel
		!Create Contact Pair
		asel,s,,,A13+42+2	!前面を選択
		cm,a_cont,area	!a_contという名をつける
		asel,s,,,A7+16*2*(ii-1)+16*(PARA+1)+12	!Cu表面を選択
		cm,a_targ,area	!a_targという名をつける  TARGがくっつける相手の（通常大きいほうの）面
		allsel
		r,CNUM
		rmodif,CNUM,14,1e6		!14は接触コンダクタンスのこと CONTA174の リアルコンスタントのことらしい
		real,CNUM
		type,3		!要素ナンバー3のこと 3ということはtarge170
		cmsel,s,a_targ	!Cuの表面選択
		nsla,s,1	!選択されたエリアに関する節点の選択
		esurf		!既存の要素の自由表面に重ねて要素を生成とのこと
		type,5		!評価しない接触
		cmsel,s,a_cont	!はんだ下面の選択
		nsla,s,1	!選択されたエリアに関する節点の選択
		esurf
		allsel

		CNUM=CNUM+1
		allsel
		!Create Contact Pair
		asel,s,,,A13+42+2	!前面を選択
		cm,a_cont,area	!a_contという名をつける
		asel,s,,,A8+16*2*(ii-1)+16*(PARA+1)+11	!Cu表面を選択
		cm,a_targ,area	!a_targという名をつける  TARGがくっつける相手の（通常大きいほうの）面
		allsel
		r,CNUM
		rmodif,CNUM,14,1e6		!14は接触コンダクタンスのこと CONTA174の リアルコンスタントのことらしい
		real,CNUM
		type,3		!要素ナンバー3のこと 3ということはtarge170
		cmsel,s,a_targ	!Cuの表面選択
		nsla,s,1	!選択されたエリアに関する節点の選択
		esurf		!既存の要素の自由表面に重ねて要素を生成とのこと
		type,5		!評価しない接触
		cmsel,s,a_cont	!はんだ下面の選択
		nsla,s,1	!選択されたエリアに関する節点の選択
		esurf
		allsel


*ENDDO

*DO,ii,1,PARA2ND-1,1
		CNUM=CNUM+1
		allsel
		!Create Contact Pair
		asel,s,,,A13+42+2	!前面を選択
		cm,a_cont,area	!a_contという名をつける
		asel,s,,,A10+6*2*(ii-1)+6+4+6*(PARA-2)	!Cu表面を選択
		cm,a_targ,area	!a_targという名をつける  TARGがくっつける相手の（通常大きいほうの）面
		allsel
		r,CNUM
		rmodif,CNUM,14,1e6		!14は接触コンダクタンスのこと CONTA174の リアルコンスタントのことらしい
		real,CNUM
		type,3		!要素ナンバー3のこと 3ということはtarge170
		cmsel,s,a_targ	!Cuの表面選択
		nsla,s,1	!選択されたエリアに関する節点の選択
		esurf		!既存の要素の自由表面に重ねて要素を生成とのこと
		type,5		!評価しない接触
		cmsel,s,a_cont	!はんだ下面の選択
		nsla,s,1	!選択されたエリアに関する節点の選択
		esurf
		allsel
*ENDDO
*DO,ii,1,2,1
		CNUM=CNUM+1
		allsel
		!Create Contact Pair
		asel,s,,,A13+42+4	!前面を選択
		cm,a_cont,area	!a_contという名をつける
		asel,s,,,300+(ii-1)*6	!Cu表面を選択
		cm,a_targ,area	!a_targという名をつける  TARGがくっつける相手の（通常大きいほうの）面
		allsel
		r,CNUM
		rmodif,CNUM,14,1e6		!14は接触コンダクタンスのこと CONTA174の リアルコンスタントのことらしい
		real,CNUM
		type,3		!要素ナンバー3のこと 3ということはtarge170
		cmsel,s,a_targ	!Cuの表面選択
		nsla,s,1	!選択されたエリアに関する節点の選択
		esurf		!既存の要素の自由表面に重ねて要素を生成とのこと
		type,5		!はんだと樹脂の接触
		cmsel,s,a_cont	!はんだ下面の選択
		nsla,s,1	!選択されたエリアに関する節点の選択
		esurf
		allsel
*ENDDO

*DO,ii,1,2,1
		CNUM=CNUM+1
		allsel
		!Create Contact Pair
		asel,s,,,A13+42+4	!前面を選択
		cm,a_cont,area	!a_contという名をつける
		asel,s,,,323+(ii-1)*5	!Cu表面を選択
		cm,a_targ,area	!a_targという名をつける  TARGがくっつける相手の（通常大きいほうの）面
		allsel
		r,CNUM
		rmodif,CNUM,14,1e6		!14は接触コンダクタンスのこと CONTA174の リアルコンスタントのことらしい
		real,CNUM
		type,3		!要素ナンバー3のこと 3ということはtarge170
		cmsel,s,a_targ	!Cuの表面選択
		nsla,s,1	!選択されたエリアに関する節点の選択
		esurf		!既存の要素の自由表面に重ねて要素を生成とのこと
		type,8		!粗い樹脂と銅の接触
		cmsel,s,a_cont	!はんだ下面の選択
		nsla,s,1	!選択されたエリアに関する節点の選択
		esurf
		allsel
*ENDDO

!柱前後とチップ前後のの樹脂作成で、
!点 8*8新規発生
!線 12*8新規発生
!面 6*8新規発生
!VOL 8新規発生
!X1=KBASE+2*PARA*8*10
!X1=X1+2*PARA*32+2*PARA*8
!X1=X1+2*PARA*26+13*PARA*2
!X1=X1+16*PARA*2+8*PARA*2
!X1=X1+8*PARA*2+8*PARA*2		!チップ周辺最後の樹脂
!X1=X1+8*(PARA-2)*2
!X1=X1+16
!X1=X1+8*8
X1=X1+8*8
!X2=LBASE+2*PARA*12*10
!X2=X2+2*PARA*(32+20)		!チップ側面樹脂まで
!X2=X2+2*PARA*53+33*PARA*2	!53EMIはんだ側面樹脂
!X2=X2+32*PARA*2+20*PARA*2	!
!X2=X2+20*PARA*2+12*PARA*2
!X2=X2+12*(PARA-2)*2
!X2=X2+24
!X2=X2+12*8
X2=X2+12*8
!X3=ABASE+2*PARA*6*10	!樹脂なしの各PARA要素まで
!X3=X3+2*PARA*(20+16)	!チップ周りの樹脂
!X3=X3+2*PARA*(30+4)+2*PARA*27			!EMIはんだまわりの樹脂+SPC周辺
!X3=X3+20*PARA*2+16*PARA*2
!X3=X3+16*PARA*2+6*PARA*2
!X3=X3+6*(PARA-2)*2
!X3=X3+12
!X3=X3+6*8
X3=X3+6*8
!X4=VBASE+2*PARA*10+2*PARA*8
!X4=X4+2*PARA*7+2*PARA*7
!X4=X4+4*PARA*2+4*PARA*2
!X4=X4+4*PARA*2+PARA*2
!X4=X4+(PARA-2)*2
!X4=X4+2
!X4=X4+8
X4=X4+8


!--------------------BUS下の薄い樹脂と、PNOバス間の小さい樹脂-------------------------------------------
!DBUSU下の樹脂だけCERAのエッジまで。OPNはすべて樹脂の最外部まで
*DO,ii,1,11,1			!11すべて
	*DO,jj,1,2,1		!上下
		*DO,kk,1,4,1	!4方向
				nn=X1+(ii-1)*8+(jj-1)*4+kk
				k,nn,RESINBUSLOW(ii,jj,kk,1),RESINBUSLOW(ii,jj,kk,2),RESINBUSLOW(ii,jj,kk,3)
		*ENDDO
	*ENDDO
*ENDDO
*DO,ii,1,11,1
			kk=X1+(ii-1)*8
			V,kk+1,kk+2,kk+3,kk+4,kk+5,kk+6,kk+7,kk+8
*ENDDO
*DO,ii,1,11,1
		D_PLTX=NINT((RESINBUSLOW(ii,1,2,1)-RESINBUSLOW(ii,1,1,1))/M_RESINX)
		D_PLTY=NINT((RESINBUSLOW(ii,1,3,2)-RESINBUSLOW(ii,1,2,2))/M_RESINY)
		D_PLTZ=NINT( (RESINBUSLOW(ii,2,1,3)-RESINBUSLOW(ii,1,1,3) )/M_RESINZ)
		*IF,D_PLTZ,LT,3,THEN
			D_PLTZ=3
		*ENDIF
		lsel,s,,,X2+(ii-1)*12+1
		lesiz,all,,,D_PLTX		!z分割
		lsel,all			!最後にこのALLがないと、次にLをSELできなくなってしまいエラーが発生します。これはMUST
		lsel,s,,,X2+(ii-1)*12+2
		lesiz,all,,,D_PLTY		!z分割
		lsel,all			!最後にこのALLがないと、次にLをSELできなくなってしまいエラーが発生します。これはMUST
		lsel,s,,,X2+(ii-1)*12+5
		lesiz,all,,,D_PLTZ		!z分割
		lsel,all			!最後にこのALLがないと、次にLをSELできなくなってしまいエラーが発生します。これはMUST
		VMESH,X4+ii
*ENDDO

!改めて面の基準どり
A1=ABASE+PARA*2*6*10	! ←樹脂の手前まで 上のDBC下はんだまで
A2=A1+20*PARA*2	! ダイ半田横の樹脂まで
A3=A2+16*PARA*2					! チップ横の樹脂まで
A4=A3+30*PARA*2					!EMIはんだ周辺樹脂まで
A5=A4+4*PARA*2					!EMIはんだまわり全部
A6=A5+27*PARA*2			!SPC下部分周辺樹脂まで
A7=A6+20*PARA*2			!面取り周辺樹脂まで
A8=A7+16*PARA*2			!上SPC周辺樹脂まで
A9=A8+16*PARA*2			!SPC上はんだ周辺樹脂まで
A10=A9+6*PARA*2			!EMI上の最後の樹脂まで
A11=A10+6*(PARA-2)*2			!PARA間の樹脂まで
A12=A11+6*2				!中央の樹脂まで
A13=A12+6*8				!チップ横の樹脂まで
A14=A13+6*8				!柱前後およびチップ前後の樹脂まで


!OBUS下樹脂
		CNUM=CNUM+1
		allsel
		!Create Contact Pair
		asel,s,,,A14+1	!下面を選択
		cm,a_cont,area	!a_contという名をつける
		asel,s,,,150	!Cu表面を選択
		cm,a_targ,area	!a_targという名をつける  TARGがくっつける相手の（通常大きいほうの）面
		allsel
		r,CNUM
		rmodif,CNUM,14,1e6		!14は接触コンダクタンスのこと CONTA174の リアルコンスタントのことらしい
		real,CNUM
		type,3		!要素ナンバー3のこと 3ということはtarge170
		cmsel,s,a_targ	!Cuの表面選択
		nsla,s,1	!選択されたエリアに関する節点の選択
		esurf		!既存の要素の自由表面に重ねて要素を生成とのこと
		type,5		!評価しない接触
		cmsel,s,a_cont	!はんだ下面の選択
		nsla,s,1	!選択されたエリアに関する節点の選択
		esurf
		allsel

		CNUM=CNUM+1
		allsel
		!Create Contact Pair
		asel,s,,,A14+6	!上面を選択
		cm,a_cont,area	!a_contという名をつける
		asel,s,,,337	!Cu表面を選択
		cm,a_targ,area	!a_targという名をつける  TARGがくっつける相手の（通常大きいほうの）面
		allsel
		r,CNUM
		rmodif,CNUM,14,1e6		!14は接触コンダクタンスのこと CONTA174の リアルコンスタントのことらしい
		real,CNUM
		type,3		!要素ナンバー3のこと 3ということはtarge170
		cmsel,s,a_targ	!Cuの表面選択
		nsla,s,1	!選択されたエリアに関する節点の選択
		esurf		!既存の要素の自由表面に重ねて要素を生成とのこと
		type,8		!粗い樹脂と銅の接触
		cmsel,s,a_cont	!はんだ下面の選択
		nsla,s,1	!選択されたエリアに関する節点の選択
		esurf
		allsel

		CNUM=CNUM+1
		allsel
		!Create Contact Pair
		asel,s,,,A14+2	!前面を選択
		cm,a_cont,area	!a_contという名をつける
		asel,s,,,296	!Cu表面を選択
		cm,a_targ,area	!a_targという名をつける  TARGがくっつける相手の（通常大きいほうの）面
		allsel
		r,CNUM
		rmodif,CNUM,14,1e6		!14は接触コンダクタンスのこと CONTA174の リアルコンスタントのことらしい
		real,CNUM
		type,3		!要素ナンバー3のこと 3ということはtarge170
		cmsel,s,a_targ	!Cuの表面選択
		nsla,s,1	!選択されたエリアに関する節点の選択
		esurf		!既存の要素の自由表面に重ねて要素を生成とのこと
		type,5		!はんだと樹脂の接触
		cmsel,s,a_cont	!はんだ下面の選択
		nsla,s,1	!選択されたエリアに関する節点の選択
		esurf
		allsel

		CNUM=CNUM+1
		allsel
		!Create Contact Pair
		asel,s,,,A14+3	!右面を選択
		cm,a_cont,area	!a_contという名をつける
		asel,s,,,A14+6*5+5	!Cu表面を選択
		cm,a_targ,area	!a_targという名をつける  TARGがくっつける相手の（通常大きいほうの）面
		allsel
		r,CNUM
		rmodif,CNUM,14,1e6		!14は接触コンダクタンスのこと CONTA174の リアルコンスタントのことらしい
		real,CNUM
		type,3		!要素ナンバー3のこと 3ということはtarge170
		cmsel,s,a_targ	!Cuの表面選択
		nsla,s,1	!選択されたエリアに関する節点の選択
		esurf		!既存の要素の自由表面に重ねて要素を生成とのこと
		type,5		!はんだと樹脂の接触
		cmsel,s,a_cont	!はんだ下面の選択
		nsla,s,1	!選択されたエリアに関する節点の選択
		esurf
		allsel

!NBUS下樹脂
		CNUM=CNUM+1
		allsel
		!Create Contact Pair
		asel,s,,,A14+6+1	!下面を選択
		cm,a_cont,area	!a_contという名をつける
		asel,s,,,150	!Cu表面を選択
		cm,a_targ,area	!a_targという名をつける  TARGがくっつける相手の（通常大きいほうの）面
		allsel
		r,CNUM
		rmodif,CNUM,14,1e6		!14は接触コンダクタンスのこと CONTA174の リアルコンスタントのことらしい
		real,CNUM
		type,3		!要素ナンバー3のこと 3ということはtarge170
		cmsel,s,a_targ	!Cuの表面選択
		nsla,s,1	!選択されたエリアに関する節点の選択
		esurf		!既存の要素の自由表面に重ねて要素を生成とのこと
		type,5		!評価しない接触
		cmsel,s,a_cont	!はんだ下面の選択
		nsla,s,1	!選択されたエリアに関する節点の選択
		esurf
		allsel

		CNUM=CNUM+1
		allsel
		!Create Contact Pair
		asel,s,,,A14+6+6	!上面を選択
		cm,a_cont,area	!a_contという名をつける
		asel,s,,,343	!Cu表面を選択
		cm,a_targ,area	!a_targという名をつける  TARGがくっつける相手の（通常大きいほうの）面
		allsel
		r,CNUM
		rmodif,CNUM,14,1e6		!14は接触コンダクタンスのこと CONTA174の リアルコンスタントのことらしい
		real,CNUM
		type,3		!要素ナンバー3のこと 3ということはtarge170
		cmsel,s,a_targ	!Cuの表面選択
		nsla,s,1	!選択されたエリアに関する節点の選択
		esurf		!既存の要素の自由表面に重ねて要素を生成とのこと
		type,8		!粗い樹脂と銅の接触
		cmsel,s,a_cont	!はんだ下面の選択
		nsla,s,1	!選択されたエリアに関する節点の選択
		esurf
		allsel

		CNUM=CNUM+1
		allsel
		!Create Contact Pair
		asel,s,,,A14+6+2	!前面を選択
		cm,a_cont,area	!a_contという名をつける
		asel,s,,,302	!Cu表面を選択
		cm,a_targ,area	!a_targという名をつける  TARGがくっつける相手の（通常大きいほうの）面
		allsel
		r,CNUM
		rmodif,CNUM,14,1e6		!14は接触コンダクタンスのこと CONTA174の リアルコンスタントのことらしい
		real,CNUM
		type,3		!要素ナンバー3のこと 3ということはtarge170
		cmsel,s,a_targ	!Cuの表面選択
		nsla,s,1	!選択されたエリアに関する節点の選択
		esurf		!既存の要素の自由表面に重ねて要素を生成とのこと
		type,5		!はんだと樹脂の接触
		cmsel,s,a_cont	!はんだ下面の選択
		nsla,s,1	!選択されたエリアに関する節点の選択
		esurf
		allsel

		CNUM=CNUM+1
		allsel
		!Create Contact Pair
		asel,s,,,A14+6+3	!右面を選択
		cm,a_cont,area	!a_contという名をつける
		asel,s,,,A14+6*7+5	!Cu表面を選択
		cm,a_targ,area	!a_targという名をつける  TARGがくっつける相手の（通常大きいほうの）面
		allsel
		r,CNUM
		rmodif,CNUM,14,1e6		!14は接触コンダクタンスのこと CONTA174の リアルコンスタントのことらしい
		real,CNUM
		type,3		!要素ナンバー3のこと 3ということはtarge170
		cmsel,s,a_targ	!Cuの表面選択
		nsla,s,1	!選択されたエリアに関する節点の選択
		esurf		!既存の要素の自由表面に重ねて要素を生成とのこと
		type,5		!評価しない接触
		cmsel,s,a_cont	!はんだ下面の選択
		nsla,s,1	!選択されたエリアに関する節点の選択
		esurf
		allsel


		CNUM=CNUM+1
		allsel
		!Create Contact Pair
		asel,s,,,A14+6+5	!左面を選択
		cm,a_cont,area	!a_contという名をつける
		asel,s,,,A14+6*5+3	!Cu表面を選択
		cm,a_targ,area	!a_targという名をつける  TARGがくっつける相手の（通常大きいほうの）面
		allsel
		r,CNUM
		rmodif,CNUM,14,1e6		!14は接触コンダクタンスのこと CONTA174の リアルコンスタントのことらしい
		real,CNUM
		type,3		!要素ナンバー3のこと 3ということはtarge170
		cmsel,s,a_targ	!Cuの表面選択
		nsla,s,1	!選択されたエリアに関する節点の選択
		esurf		!既存の要素の自由表面に重ねて要素を生成とのこと
		type,5		!評価しない接触
		cmsel,s,a_cont	!はんだ下面の選択
		nsla,s,1	!選択されたエリアに関する節点の選択
		esurf
		allsel

!Pバス下の樹脂
		CNUM=CNUM+1
		allsel
		!Create Contact Pair
		asel,s,,,A14+6*2+1	!下面を選択
		cm,a_cont,area	!a_contという名をつける
		asel,s,,,150	!Cu表面を選択
		cm,a_targ,area	!a_targという名をつける  TARGがくっつける相手の（通常大きいほうの）面
		allsel
		r,CNUM
		rmodif,CNUM,14,1e6		!14は接触コンダクタンスのこと CONTA174の リアルコンスタントのことらしい
		real,CNUM
		type,3		!要素ナンバー3のこと 3ということはtarge170
		cmsel,s,a_targ	!Cuの表面選択
		nsla,s,1	!選択されたエリアに関する節点の選択
		esurf		!既存の要素の自由表面に重ねて要素を生成とのこと
		type,5		!評価しない接触
		cmsel,s,a_cont	!はんだ下面の選択
		nsla,s,1	!選択されたエリアに関する節点の選択
		esurf
		allsel

		CNUM=CNUM+1
		allsel
		!Create Contact Pair
		asel,s,,,A14+6*2+6	!上面を選択
		cm,a_cont,area	!a_contという名をつける
		asel,s,,,355	!Cu表面を選択
		cm,a_targ,area	!a_targという名をつける  TARGがくっつける相手の（通常大きいほうの）面
		allsel
		r,CNUM
		rmodif,CNUM,14,1e6		!14は接触コンダクタンスのこと CONTA174の リアルコンスタントのことらしい
		real,CNUM
		type,3		!要素ナンバー3のこと 3ということはtarge170
		cmsel,s,a_targ	!Cuの表面選択
		nsla,s,1	!選択されたエリアに関する節点の選択
		esurf		!既存の要素の自由表面に重ねて要素を生成とのこと
		type,8		!粗い樹脂と銅の接触
		cmsel,s,a_cont	!はんだ下面の選択
		nsla,s,1	!選択されたエリアに関する節点の選択
		esurf
		allsel

		CNUM=CNUM+1
		allsel
		!Create Contact Pair
		asel,s,,,A14+6*2+2	!前面を選択
		cm,a_cont,area	!a_contという名をつける
		asel,s,,,308	!Cu表面を選択
		cm,a_targ,area	!a_targという名をつける  TARGがくっつける相手の（通常大きいほうの）面
		allsel
		r,CNUM
		rmodif,CNUM,14,1e6		!14は接触コンダクタンスのこと CONTA174の リアルコンスタントのことらしい
		real,CNUM
		type,3		!要素ナンバー3のこと 3ということはtarge170
		cmsel,s,a_targ	!Cuの表面選択
		nsla,s,1	!選択されたエリアに関する節点の選択
		esurf		!既存の要素の自由表面に重ねて要素を生成とのこと
		type,5		!はんだと樹脂の接触
		cmsel,s,a_cont	!はんだ下面の選択
		nsla,s,1	!選択されたエリアに関する節点の選択
		esurf
		allsel

		CNUM=CNUM+1
		allsel
		!Create Contact Pair
		asel,s,,,A14+6*2+5	!左面を選択
		cm,a_cont,area	!a_contという名をつける
		asel,s,,,A14+6*7+3	!Cu表面を選択
		cm,a_targ,area	!a_targという名をつける  TARGがくっつける相手の（通常大きいほうの）面
		allsel
		r,CNUM
		rmodif,CNUM,14,1e6		!14は接触コンダクタンスのこと CONTA174の リアルコンスタントのことらしい
		real,CNUM
		type,3		!要素ナンバー3のこと 3ということはtarge170
		cmsel,s,a_targ	!Cuの表面選択
		nsla,s,1	!選択されたエリアに関する節点の選択
		esurf		!既存の要素の自由表面に重ねて要素を生成とのこと
		type,5		!評価しない接触
		cmsel,s,a_cont	!はんだ下面の選択
		nsla,s,1	!選択されたエリアに関する節点の選択
		esurf
		allsel

!Dバス下の樹脂
		CNUM=CNUM+1
		allsel
		!Create Contact Pair
		asel,s,,,A14+6*3+1	!下面を選択
		cm,a_cont,area	!a_contという名をつける
		asel,s,,,78	!Cu表面を選択
		cm,a_targ,area	!a_targという名をつける  TARGがくっつける相手の（通常大きいほうの）面
		allsel
		r,CNUM
		rmodif,CNUM,14,1e6		!14は接触コンダクタンスのこと CONTA174の リアルコンスタントのことらしい
		real,CNUM
		type,3		!要素ナンバー3のこと 3ということはtarge170
		cmsel,s,a_targ	!Cuの表面選択
		nsla,s,1	!選択されたエリアに関する節点の選択
		esurf		!既存の要素の自由表面に重ねて要素を生成とのこと
		type,5		!評価しない接触
		cmsel,s,a_cont	!はんだ下面の選択
		nsla,s,1	!選択されたエリアに関する節点の選択
		esurf
		allsel

		CNUM=CNUM+1
		allsel
		!Create Contact Pair
		asel,s,,,A14+6*3+6	!上面を選択
		cm,a_cont,area	!a_contという名をつける
		asel,s,,,361	!Cu表面を選択
		cm,a_targ,area	!a_targという名をつける  TARGがくっつける相手の（通常大きいほうの）面
		allsel
		r,CNUM
		rmodif,CNUM,14,1e6		!14は接触コンダクタンスのこと CONTA174の リアルコンスタントのことらしい
		real,CNUM
		type,3		!要素ナンバー3のこと 3ということはtarge170
		cmsel,s,a_targ	!Cuの表面選択
		nsla,s,1	!選択されたエリアに関する節点の選択
		esurf		!既存の要素の自由表面に重ねて要素を生成とのこと
		type,8		!粗い樹脂と銅の接触
		cmsel,s,a_cont	!はんだ下面の選択
		nsla,s,1	!選択されたエリアに関する節点の選択
		esurf
		allsel

		CNUM=CNUM+1
		allsel
		!Create Contact Pair
		asel,s,,,A14+6*3+4	!後ろ面を選択
		cm,a_cont,area	!a_contという名をつける
		asel,s,,,312	!Cu表面を選択
		cm,a_targ,area	!a_targという名をつける  TARGがくっつける相手の（通常大きいほうの）面
		allsel
		r,CNUM
		rmodif,CNUM,14,1e6		!14は接触コンダクタンスのこと CONTA174の リアルコンスタントのことらしい
		real,CNUM
		type,3		!要素ナンバー3のこと 3ということはtarge170
		cmsel,s,a_targ	!Cuの表面選択
		nsla,s,1	!選択されたエリアに関する節点の選択
		esurf		!既存の要素の自由表面に重ねて要素を生成とのこと
		type,5		!はんだと樹脂の接触
		cmsel,s,a_cont	!はんだ下面の選択
		nsla,s,1	!選択されたエリアに関する節点の選択
		esurf
		allsel

!O側BSU間の小さい樹脂　内側
*DO,ii,1,2,1
		CNUM=CNUM+1
		allsel
		!Create Contact Pair
		asel,s,,,A14+6*4+1	!下面を選択
		cm,a_cont,area	!a_contという名をつける
		asel,s,,,12+30*(ii-1)	!Cu表面を選択
		cm,a_targ,area	!a_targという名をつける  TARGがくっつける相手の（通常大きいほうの）面
		allsel
		r,CNUM
		rmodif,CNUM,14,1e6		!14は接触コンダクタンスのこと CONTA174の リアルコンスタントのことらしい
		real,CNUM
		type,3		!要素ナンバー3のこと 3ということはtarge170
		cmsel,s,a_targ	!Cuの表面選択
		nsla,s,1	!選択されたエリアに関する節点の選択
		esurf		!既存の要素の自由表面に重ねて要素を生成とのこと
		type,8		!粗い樹脂と銅の接触
		cmsel,s,a_cont	!はんだ下面の選択
		nsla,s,1	!選択されたエリアに関する節点の選択
		esurf
		allsel
*ENDDO
		CNUM=CNUM+1
		allsel
		!Create Contact Pair
		asel,s,,,A14+6*4+1	!下面を選択
		cm,a_cont,area	!a_contという名をつける
		asel,s,,,126	!Cu表面を選択
		cm,a_targ,area	!a_targという名をつける  TARGがくっつける相手の（通常大きいほうの）面
		allsel
		r,CNUM
		rmodif,CNUM,14,1e6		!14は接触コンダクタンスのこと CONTA174の リアルコンスタントのことらしい
		real,CNUM
		type,3		!要素ナンバー3のこと 3ということはtarge170
		cmsel,s,a_targ	!Cuの表面選択
		nsla,s,1	!選択されたエリアに関する節点の選択
		esurf		!既存の要素の自由表面に重ねて要素を生成とのこと
		type,5		!評価しない接触
		cmsel,s,a_cont	!はんだ下面の選択
		nsla,s,1	!選択されたエリアに関する節点の選択
		esurf
		allsel

		CNUM=CNUM+1
		allsel
		!Create Contact Pair
		asel,s,,,A14+6*4+2	!前面を選択
		cm,a_cont,area	!a_contという名をつける
		asel,s,,,A13+6*5+4	!Cu表面を選択
		cm,a_targ,area	!a_targという名をつける  TARGがくっつける相手の（通常大きいほうの）面
		allsel
		r,CNUM
		rmodif,CNUM,14,1e6		!14は接触コンダクタンスのこと CONTA174の リアルコンスタントのことらしい
		real,CNUM
		type,3		!要素ナンバー3のこと 3ということはtarge170
		cmsel,s,a_targ	!Cuの表面選択
		nsla,s,1	!選択されたエリアに関する節点の選択
		esurf		!既存の要素の自由表面に重ねて要素を生成とのこと
		type,5		!評価しない接触
		cmsel,s,a_cont	!はんだ下面の選択
		nsla,s,1	!選択されたエリアに関する節点の選択
		esurf
		allsel

		CNUM=CNUM+1
		allsel
		!Create Contact Pair
		asel,s,,,A14+6*4+2	!前面を選択
		cm,a_cont,area	!a_contという名をつける
		asel,s,,,A13+6*3+4	!Cu表面を選択
		cm,a_targ,area	!a_targという名をつける  TARGがくっつける相手の（通常大きいほうの）面
		allsel
		r,CNUM
		rmodif,CNUM,14,1e6		!14は接触コンダクタンスのこと CONTA174の リアルコンスタントのことらしい
		real,CNUM
		type,3		!要素ナンバー3のこと 3ということはtarge170
		cmsel,s,a_targ	!Cuの表面選択
		nsla,s,1	!選択されたエリアに関する節点の選択
		esurf		!既存の要素の自由表面に重ねて要素を生成とのこと
		type,5		!評価しない接触
		cmsel,s,a_cont	!はんだ下面の選択
		nsla,s,1	!選択されたエリアに関する節点の選択
		esurf
		allsel

		CNUM=CNUM+1
		allsel
		!Create Contact Pair
		asel,s,,,A14+6*4+3	!右面を選択
		cm,a_cont,area	!a_contという名をつける
		asel,s,,,303	!Cu表面を選択
		cm,a_targ,area	!a_targという名をつける  TARGがくっつける相手の（通常大きいほうの）面
		allsel
		r,CNUM
		rmodif,CNUM,14,1e6		!14は接触コンダクタンスのこと CONTA174の リアルコンスタントのことらしい
		real,CNUM
		type,3		!要素ナンバー3のこと 3ということはtarge170
		cmsel,s,a_targ	!Cuの表面選択
		nsla,s,1	!選択されたエリアに関する節点の選択
		esurf		!既存の要素の自由表面に重ねて要素を生成とのこと
		type,5		!はんだと樹脂の接触
		cmsel,s,a_cont	!はんだ下面の選択
		nsla,s,1	!選択されたエリアに関する節点の選択
		esurf
		allsel

		CNUM=CNUM+1
		allsel
		!Create Contact Pair
		asel,s,,,A14+6*4+3	!右面を選択
		cm,a_cont,area	!a_contという名をつける
		asel,s,,,326	!Cu表面を選択
		cm,a_targ,area	!a_targという名をつける  TARGがくっつける相手の（通常大きいほうの）面
		allsel
		r,CNUM
		rmodif,CNUM,14,1e6		!14は接触コンダクタンスのこと CONTA174の リアルコンスタントのことらしい
		real,CNUM
		type,3		!要素ナンバー3のこと 3ということはtarge170
		cmsel,s,a_targ	!Cuの表面選択
		nsla,s,1	!選択されたエリアに関する節点の選択
		esurf		!既存の要素の自由表面に重ねて要素を生成とのこと
		type,8		!粗い樹脂と銅の接触
		cmsel,s,a_cont	!はんだ下面の選択
		nsla,s,1	!選択されたエリアに関する節点の選択
		esurf
		allsel

		CNUM=CNUM+1
		allsel
		!Create Contact Pair
		asel,s,,,A14+6*4+4	!後ろ面を選択
		cm,a_cont,area	!a_contという名をつける
		asel,s,,,A14+6*5+2	!Cu表面を選択
		cm,a_targ,area	!a_targという名をつける  TARGがくっつける相手の（通常大きいほうの）面
		allsel
		r,CNUM
		rmodif,CNUM,14,1e6		!14は接触コンダクタンスのこと CONTA174の リアルコンスタントのことらしい
		real,CNUM
		type,3		!要素ナンバー3のこと 3ということはtarge170
		cmsel,s,a_targ	!Cuの表面選択
		nsla,s,1	!選択されたエリアに関する節点の選択
		esurf		!既存の要素の自由表面に重ねて要素を生成とのこと
		type,5		!評価しない接触
		cmsel,s,a_cont	!はんだ下面の選択
		nsla,s,1	!選択されたエリアに関する節点の選択
		esurf
		allsel

		CNUM=CNUM+1
		allsel
		!Create Contact Pair
		asel,s,,,A14+6*4+5	!右面を選択
		cm,a_cont,area	!a_contという名をつける
		asel,s,,,295	!Cu表面を選択
		cm,a_targ,area	!a_targという名をつける  TARGがくっつける相手の（通常大きいほうの）面
		allsel
		r,CNUM
		rmodif,CNUM,14,1e6		!14は接触コンダクタンスのこと CONTA174の リアルコンスタントのことらしい
		real,CNUM
		type,3		!要素ナンバー3のこと 3ということはtarge170
		cmsel,s,a_targ	!Cuの表面選択
		nsla,s,1	!選択されたエリアに関する節点の選択
		esurf		!既存の要素の自由表面に重ねて要素を生成とのこと
		type,5		!はんだと樹脂の接触
		cmsel,s,a_cont	!はんだ下面の選択
		nsla,s,1	!選択されたエリアに関する節点の選択
		esurf
		allsel

		CNUM=CNUM+1
		allsel
		!Create Contact Pair
		asel,s,,,A14+6*4+5	!右面を選択
		cm,a_cont,area	!a_contという名をつける
		asel,s,,,319	!Cu表面を選択
		cm,a_targ,area	!a_targという名をつける  TARGがくっつける相手の（通常大きいほうの）面
		allsel
		r,CNUM
		rmodif,CNUM,14,1e6		!14は接触コンダクタンスのこと CONTA174の リアルコンスタントのことらしい
		real,CNUM
		type,3		!要素ナンバー3のこと 3ということはtarge170
		cmsel,s,a_targ	!Cuの表面選択
		nsla,s,1	!選択されたエリアに関する節点の選択
		esurf		!既存の要素の自由表面に重ねて要素を生成とのこと
		type,8		!粗い樹脂と銅の接触
		cmsel,s,a_cont	!はんだ下面の選択
		nsla,s,1	!選択されたエリアに関する節点の選択
		esurf
		allsel
!O側 BUS間の小樹脂　外側
		CNUM=CNUM+1
		allsel
		!Create Contact Pair
		asel,s,,,A14+6*5+1	!下面を選択
		cm,a_cont,area	!a_contという名をつける
		asel,s,,,150	!Cu表面を選択
		cm,a_targ,area	!a_targという名をつける  TARGがくっつける相手の（通常大きいほうの）面
		allsel
		r,CNUM
		rmodif,CNUM,14,1e6		!14は接触コンダクタンスのこと CONTA174の リアルコンスタントのことらしい
		real,CNUM
		type,3		!要素ナンバー3のこと 3ということはtarge170
		cmsel,s,a_targ	!Cuの表面選択
		nsla,s,1	!選択されたエリアに関する節点の選択
		esurf		!既存の要素の自由表面に重ねて要素を生成とのこと
		type,5		!評価しない接触
		cmsel,s,a_cont	!はんだ下面の選択
		nsla,s,1	!選択されたエリアに関する節点の選択
		esurf
		allsel

		CNUM=CNUM+1
		allsel
		!Create Contact Pair
		asel,s,,,A14+6*5+2	!前面を選択
		cm,a_cont,area	!a_contという名をつける
		asel,s,,,296	!Cu表面を選択
		cm,a_targ,area	!a_targという名をつける  TARGがくっつける相手の（通常大きいほうの）面
		allsel
		r,CNUM
		rmodif,CNUM,14,1e6		!14は接触コンダクタンスのこと CONTA174の リアルコンスタントのことらしい
		real,CNUM
		type,3		!要素ナンバー3のこと 3ということはtarge170
		cmsel,s,a_targ	!Cuの表面選択
		nsla,s,1	!選択されたエリアに関する節点の選択
		esurf		!既存の要素の自由表面に重ねて要素を生成とのこと
		type,5		!はんだと樹脂の接触
		cmsel,s,a_cont	!はんだ下面の選択
		nsla,s,1	!選択されたエリアに関する節点の選択
		esurf
		allsel

		CNUM=CNUM+1
		allsel
		!Create Contact Pair
		asel,s,,,A14+6*5+2	!前面を選択
		cm,a_cont,area	!a_contという名をつける
		asel,s,,,320	!Cu表面を選択
		cm,a_targ,area	!a_targという名をつける  TARGがくっつける相手の（通常大きいほうの）面
		allsel
		r,CNUM
		rmodif,CNUM,14,1e6		!14は接触コンダクタンスのこと CONTA174の リアルコンスタントのことらしい
		real,CNUM
		type,3		!要素ナンバー3のこと 3ということはtarge170
		cmsel,s,a_targ	!Cuの表面選択
		nsla,s,1	!選択されたエリアに関する節点の選択
		esurf		!既存の要素の自由表面に重ねて要素を生成とのこと
		type,8		!粗い樹脂と銅の接触
		cmsel,s,a_cont	!はんだ下面の選択
		nsla,s,1	!選択されたエリアに関する節点の選択
		esurf
		allsel

		CNUM=CNUM+1
		allsel
		!Create Contact Pair
		asel,s,,,A14+6*5+3	!右面を選択
		cm,a_cont,area	!a_contという名をつける
		asel,s,,,347	!Cu表面を選択
		cm,a_targ,area	!a_targという名をつける  TARGがくっつける相手の（通常大きいほうの）面
		allsel
		r,CNUM
		rmodif,CNUM,14,1e6		!14は接触コンダクタンスのこと CONTA174の リアルコンスタントのことらしい
		real,CNUM
		type,3		!要素ナンバー3のこと 3ということはtarge170
		cmsel,s,a_targ	!Cuの表面選択
		nsla,s,1	!選択されたエリアに関する節点の選択
		esurf		!既存の要素の自由表面に重ねて要素を生成とのこと
		type,8		!粗い樹脂と銅の接触
		cmsel,s,a_cont	!はんだ下面の選択
		nsla,s,1	!選択されたエリアに関する節点の選択
		esurf
		allsel

		CNUM=CNUM+1
		allsel
		!Create Contact Pair
		asel,s,,,A14+6*5+3	!右面を選択
		cm,a_cont,area	!a_contという名をつける
		asel,s,,,A14+6*1+5	!Cu表面を選択
		cm,a_targ,area	!a_targという名をつける  TARGがくっつける相手の（通常大きいほうの）面
		allsel
		r,CNUM
		rmodif,CNUM,14,1e6		!14は接触コンダクタンスのこと CONTA174の リアルコンスタントのことらしい
		real,CNUM
		type,3		!要素ナンバー3のこと 3ということはtarge170
		cmsel,s,a_targ	!Cuの表面選択
		nsla,s,1	!選択されたエリアに関する節点の選択
		esurf		!既存の要素の自由表面に重ねて要素を生成とのこと
		type,8		!粗い樹脂と銅の接触
		cmsel,s,a_cont	!はんだ下面の選択
		nsla,s,1	!選択されたエリアに関する節点の選択
		esurf
		allsel

		CNUM=CNUM+1
		allsel
		!Create Contact Pair
		asel,s,,,A14+6*5+5	!左面を選択
		cm,a_cont,area	!a_contという名をつける
		asel,s,,,339	!Cu表面を選択
		cm,a_targ,area	!a_targという名をつける  TARGがくっつける相手の（通常大きいほうの）面
		allsel
		r,CNUM
		rmodif,CNUM,14,1e6		!14は接触コンダクタンスのこと CONTA174の リアルコンスタントのことらしい
		real,CNUM
		type,3		!要素ナンバー3のこと 3ということはtarge170
		cmsel,s,a_targ	!Cuの表面選択
		nsla,s,1	!選択されたエリアに関する節点の選択
		esurf		!既存の要素の自由表面に重ねて要素を生成とのこと
		type,8		!粗い樹脂と銅の接触
		cmsel,s,a_cont	!はんだ下面の選択
		nsla,s,1	!選択されたエリアに関する節点の選択
		esurf
		allsel

		CNUM=CNUM+1
		allsel
		!Create Contact Pair
		asel,s,,,A14+6*5+5	!左面を選択
		cm,a_cont,area	!a_contという名をつける
		asel,s,,,A14+3	!Cu表面を選択
		cm,a_targ,area	!a_targという名をつける  TARGがくっつける相手の（通常大きいほうの）面
		allsel
		r,CNUM
		rmodif,CNUM,14,1e6		!14は接触コンダクタンスのこと CONTA174の リアルコンスタントのことらしい
		real,CNUM
		type,3		!要素ナンバー3のこと 3ということはtarge170
		cmsel,s,a_targ	!Cuの表面選択
		nsla,s,1	!選択されたエリアに関する節点の選択
		esurf		!既存の要素の自由表面に重ねて要素を生成とのこと
		type,8		!粗い樹脂と銅の接触
		cmsel,s,a_cont	!はんだ下面の選択
		nsla,s,1	!選択されたエリアに関する節点の選択
		esurf
		allsel

!*GO,:OWARI
!P側バス間小樹脂　内側
*DO,ii,1,2,1
		CNUM=CNUM+1
		allsel
		!Create Contact Pair
		asel,s,,,A14+6*6+1	!下面を選択
		cm,a_cont,area	!a_contという名をつける
		asel,s,,,30+12*(ii-1)	!Cu表面を選択
		cm,a_targ,area	!a_targという名をつける  TARGがくっつける相手の（通常大きいほうの）面
		allsel
		r,CNUM
		rmodif,CNUM,14,1e6		!14は接触コンダクタンスのこと CONTA174の リアルコンスタントのことらしい
		real,CNUM
		type,3		!要素ナンバー3のこと 3ということはtarge170
		cmsel,s,a_targ	!Cuの表面選択
		nsla,s,1	!選択されたエリアに関する節点の選択
		esurf		!既存の要素の自由表面に重ねて要素を生成とのこと
		type,8		!粗い樹脂と銅の接触
		cmsel,s,a_cont	!はんだ下面の選択
		nsla,s,1	!選択されたエリアに関する節点の選択
		esurf
		allsel
*ENDDO
		CNUM=CNUM+1
		allsel
		!Create Contact Pair
		asel,s,,,A14+6*6+1	!下面を選択
		cm,a_cont,area	!a_contという名をつける
		asel,s,,,132	!Cu表面を選択
		cm,a_targ,area	!a_targという名をつける  TARGがくっつける相手の（通常大きいほうの）面
		allsel
		r,CNUM
		rmodif,CNUM,14,1e6		!14は接触コンダクタンスのこと CONTA174の リアルコンスタントのことらしい
		real,CNUM
		type,3		!要素ナンバー3のこと 3ということはtarge170
		cmsel,s,a_targ	!Cuの表面選択
		nsla,s,1	!選択されたエリアに関する節点の選択
		esurf		!既存の要素の自由表面に重ねて要素を生成とのこと
		type,5		!評価しない接触
		cmsel,s,a_cont	!はんだ下面の選択
		nsla,s,1	!選択されたエリアに関する節点の選択
		esurf
		allsel

		CNUM=CNUM+1
		allsel
		!Create Contact Pair
		asel,s,,,A14+6*6+2	!前面を選択
		cm,a_cont,area	!a_contという名をつける
		asel,s,,,A13+6*7+4	!Cu表面を選択
		cm,a_targ,area	!a_targという名をつける  TARGがくっつける相手の（通常大きいほうの）面
		allsel
		r,CNUM
		rmodif,CNUM,14,1e6		!14は接触コンダクタンスのこと CONTA174の リアルコンスタントのことらしい
		real,CNUM
		type,3		!要素ナンバー3のこと 3ということはtarge170
		cmsel,s,a_targ	!Cuの表面選択
		nsla,s,1	!選択されたエリアに関する節点の選択
		esurf		!既存の要素の自由表面に重ねて要素を生成とのこと
		type,5		!評価しない接触
		cmsel,s,a_cont	!はんだ下面の選択
		nsla,s,1	!選択されたエリアに関する節点の選択
		esurf
		allsel

		CNUM=CNUM+1
		allsel
		!Create Contact Pair
		asel,s,,,A14+6*6+2	!前面を選択
		cm,a_cont,area	!a_contという名をつける
		asel,s,,,A13+6*3+4	!Cu表面を選択
		cm,a_targ,area	!a_targという名をつける  TARGがくっつける相手の（通常大きいほうの）面
		allsel
		r,CNUM
		rmodif,CNUM,14,1e6		!14は接触コンダクタンスのこと CONTA174の リアルコンスタントのことらしい
		real,CNUM
		type,3		!要素ナンバー3のこと 3ということはtarge170
		cmsel,s,a_targ	!Cuの表面選択
		nsla,s,1	!選択されたエリアに関する節点の選択
		esurf		!既存の要素の自由表面に重ねて要素を生成とのこと
		type,5		!評価しない接触
		cmsel,s,a_cont	!はんだ下面の選択
		nsla,s,1	!選択されたエリアに関する節点の選択
		esurf
		allsel

		CNUM=CNUM+1
		allsel
		!Create Contact Pair
		asel,s,,,A14+6*6+3	!右面を選択
		cm,a_cont,area	!a_contという名をつける
		asel,s,,,309	!Cu表面を選択
		cm,a_targ,area	!a_targという名をつける  TARGがくっつける相手の（通常大きいほうの）面
		allsel
		r,CNUM
		rmodif,CNUM,14,1e6		!14は接触コンダクタンスのこと CONTA174の リアルコンスタントのことらしい
		real,CNUM
		type,3		!要素ナンバー3のこと 3ということはtarge170
		cmsel,s,a_targ	!Cuの表面選択
		nsla,s,1	!選択されたエリアに関する節点の選択
		esurf		!既存の要素の自由表面に重ねて要素を生成とのこと
		type,5		!はんだと樹脂の接触
		cmsel,s,a_cont	!はんだ下面の選択
		nsla,s,1	!選択されたエリアに関する節点の選択
		esurf
		allsel

		CNUM=CNUM+1
		allsel
		!Create Contact Pair
		asel,s,,,A14+6*6+3	!右面を選択
		cm,a_cont,area	!a_contという名をつける
		asel,s,,,331	!Cu表面を選択
		cm,a_targ,area	!a_targという名をつける  TARGがくっつける相手の（通常大きいほうの）面
		allsel
		r,CNUM
		rmodif,CNUM,14,1e6		!14は接触コンダクタンスのこと CONTA174の リアルコンスタントのことらしい
		real,CNUM
		type,3		!要素ナンバー3のこと 3ということはtarge170
		cmsel,s,a_targ	!Cuの表面選択
		nsla,s,1	!選択されたエリアに関する節点の選択
		esurf		!既存の要素の自由表面に重ねて要素を生成とのこと
		type,8		!粗い樹脂と銅の接触
		cmsel,s,a_cont	!はんだ下面の選択
		nsla,s,1	!選択されたエリアに関する節点の選択
		esurf
		allsel

		CNUM=CNUM+1
		allsel
		!Create Contact Pair
		asel,s,,,A14+6*6+4	!後ろ面を選択
		cm,a_cont,area	!a_contという名をつける
		asel,s,,,A14+6*7+2	!Cu表面を選択
		cm,a_targ,area	!a_targという名をつける  TARGがくっつける相手の（通常大きいほうの）面
		allsel
		r,CNUM
		rmodif,CNUM,14,1e6		!14は接触コンダクタンスのこと CONTA174の リアルコンスタントのことらしい
		real,CNUM
		type,3		!要素ナンバー3のこと 3ということはtarge170
		cmsel,s,a_targ	!Cuの表面選択
		nsla,s,1	!選択されたエリアに関する節点の選択
		esurf		!既存の要素の自由表面に重ねて要素を生成とのこと
		type,5		!評価しない接触
		cmsel,s,a_cont	!はんだ下面の選択
		nsla,s,1	!選択されたエリアに関する節点の選択
		esurf
		allsel

		CNUM=CNUM+1
		allsel
		!Create Contact Pair
		asel,s,,,A14+6*6+5	!右面を選択
		cm,a_cont,area	!a_contという名をつける
		asel,s,,,301	!Cu表面を選択
		cm,a_targ,area	!a_targという名をつける  TARGがくっつける相手の（通常大きいほうの）面
		allsel
		r,CNUM
		rmodif,CNUM,14,1e6		!14は接触コンダクタンスのこと CONTA174の リアルコンスタントのことらしい
		real,CNUM
		type,3		!要素ナンバー3のこと 3ということはtarge170
		cmsel,s,a_targ	!Cuの表面選択
		nsla,s,1	!選択されたエリアに関する節点の選択
		esurf		!既存の要素の自由表面に重ねて要素を生成とのこと
		type,5		!はんだと樹脂の接触
		cmsel,s,a_cont	!はんだ下面の選択
		nsla,s,1	!選択されたエリアに関する節点の選択
		esurf
		allsel

		CNUM=CNUM+1
		allsel
		!Create Contact Pair
		asel,s,,,A14+6*6+5	!右面を選択
		cm,a_cont,area	!a_contという名をつける
		asel,s,,,324	!Cu表面を選択
		cm,a_targ,area	!a_targという名をつける  TARGがくっつける相手の（通常大きいほうの）面
		allsel
		r,CNUM
		rmodif,CNUM,14,1e6		!14は接触コンダクタンスのこと CONTA174の リアルコンスタントのことらしい
		real,CNUM
		type,3		!要素ナンバー3のこと 3ということはtarge170
		cmsel,s,a_targ	!Cuの表面選択
		nsla,s,1	!選択されたエリアに関する節点の選択
		esurf		!既存の要素の自由表面に重ねて要素を生成とのこと
		type,8		!粗い樹脂と銅の接触
		cmsel,s,a_cont	!はんだ下面の選択
		nsla,s,1	!選択されたエリアに関する節点の選択
		esurf
		allsel
!P側バス間の小樹脂　外側
		CNUM=CNUM+1
		allsel
		!Create Contact Pair
		asel,s,,,A14+6*7+1	!下面を選択
		cm,a_cont,area	!a_contという名をつける
		asel,s,,,150	!Cu表面を選択
		cm,a_targ,area	!a_targという名をつける  TARGがくっつける相手の（通常大きいほうの）面
		allsel
		r,CNUM
		rmodif,CNUM,14,1e6		!14は接触コンダクタンスのこと CONTA174の リアルコンスタントのことらしい
		real,CNUM
		type,3		!要素ナンバー3のこと 3ということはtarge170
		cmsel,s,a_targ	!Cuの表面選択
		nsla,s,1	!選択されたエリアに関する節点の選択
		esurf		!既存の要素の自由表面に重ねて要素を生成とのこと
		type,5		!評価しない接触
		cmsel,s,a_cont	!はんだ下面の選択
		nsla,s,1	!選択されたエリアに関する節点の選択
		esurf
		allsel

		CNUM=CNUM+1
		allsel
		!Create Contact Pair
		asel,s,,,A14+6*7+2	!前面を選択
		cm,a_cont,area	!a_contという名をつける
		asel,s,,,308	!Cu表面を選択
		cm,a_targ,area	!a_targという名をつける  TARGがくっつける相手の（通常大きいほうの）面
		allsel
		r,CNUM
		rmodif,CNUM,14,1e6		!14は接触コンダクタンスのこと CONTA174の リアルコンスタントのことらしい
		real,CNUM
		type,3		!要素ナンバー3のこと 3ということはtarge170
		cmsel,s,a_targ	!Cuの表面選択
		nsla,s,1	!選択されたエリアに関する節点の選択
		esurf		!既存の要素の自由表面に重ねて要素を生成とのこと
		type,5		!はんだと樹脂の接触
		cmsel,s,a_cont	!はんだ下面の選択
		nsla,s,1	!選択されたエリアに関する節点の選択
		esurf
		allsel

		CNUM=CNUM+1
		allsel
		!Create Contact Pair
		asel,s,,,A14+6*7+2	!前面を選択
		cm,a_cont,area	!a_contという名をつける
		asel,s,,,330	!Cu表面を選択
		cm,a_targ,area	!a_targという名をつける  TARGがくっつける相手の（通常大きいほうの）面
		allsel
		r,CNUM
		rmodif,CNUM,14,1e6		!14は接触コンダクタンスのこと CONTA174の リアルコンスタントのことらしい
		real,CNUM
		type,3		!要素ナンバー3のこと 3ということはtarge170
		cmsel,s,a_targ	!Cuの表面選択
		nsla,s,1	!選択されたエリアに関する節点の選択
		esurf		!既存の要素の自由表面に重ねて要素を生成とのこと
		type,8		!粗い樹脂と銅の接触
		cmsel,s,a_cont	!はんだ下面の選択
		nsla,s,1	!選択されたエリアに関する節点の選択
		esurf
		allsel

		CNUM=CNUM+1
		allsel
		!Create Contact Pair
		asel,s,,,A14+6*7+3	!右面を選択
		cm,a_cont,area	!a_contという名をつける
		asel,s,,,359	!Cu表面を選択
		cm,a_targ,area	!a_targという名をつける  TARGがくっつける相手の（通常大きいほうの）面
		allsel
		r,CNUM
		rmodif,CNUM,14,1e6		!14は接触コンダクタンスのこと CONTA174の リアルコンスタントのことらしい
		real,CNUM
		type,3		!要素ナンバー3のこと 3ということはtarge170
		cmsel,s,a_targ	!Cuの表面選択
		nsla,s,1	!選択されたエリアに関する節点の選択
		esurf		!既存の要素の自由表面に重ねて要素を生成とのこと
		type,8		!粗い樹脂と銅の接触
		cmsel,s,a_cont	!はんだ下面の選択
		nsla,s,1	!選択されたエリアに関する節点の選択
		esurf
		allsel

		CNUM=CNUM+1
		asel,s,,,A14+6*7+3	!右面を選択
		cm,a_cont,area	!a_contという名をつける
		asel,s,,,A14+6*2+5	!Cu表面を選択
		cm,a_targ,area	!a_targという名をつける  TARGがくっつける相手の（通常大きいほうの）面
		allsel
		r,CNUM
		rmodif,CNUM,14,1e6		!14は接触コンダクタンスのこと CONTA174の リアルコンスタントのことらしい
		real,CNUM
		type,3		!要素ナンバー3のこと 3ということはtarge170
		cmsel,s,a_targ	!Cuの表面選択
		nsla,s,1	!選択されたエリアに関する節点の選択
		esurf		!既存の要素の自由表面に重ねて要素を生成とのこと
		type,8		!粗い樹脂と銅の接触
		cmsel,s,a_cont	!はんだ下面の選択
		nsla,s,1	!選択されたエリアに関する節点の選択
		esurf
		allsel

		CNUM=CNUM+1
		allsel
		!Create Contact Pair
		asel,s,,,A14+6*7+5	!左面を選択
		cm,a_cont,area	!a_contという名をつける
		asel,s,,,345	!Cu表面を選択
		cm,a_targ,area	!a_targという名をつける  TARGがくっつける相手の（通常大きいほうの）面
		allsel
		r,CNUM
		rmodif,CNUM,14,1e6		!14は接触コンダクタンスのこと CONTA174の リアルコンスタントのことらしい
		real,CNUM
		type,3		!要素ナンバー3のこと 3ということはtarge170
		cmsel,s,a_targ	!Cuの表面選択
		nsla,s,1	!選択されたエリアに関する節点の選択
		esurf		!既存の要素の自由表面に重ねて要素を生成とのこと
		type,8		!粗い樹脂と銅の接触
		cmsel,s,a_cont	!はんだ下面の選択
		nsla,s,1	!選択されたエリアに関する節点の選択
		esurf
		allsel

		CNUM=CNUM+1
		asel,s,,,A14+6*7+5	!右面を選択
		cm,a_cont,area	!a_contという名をつける
		asel,s,,,A14+6*1+3	!Cu表面を選択
		cm,a_targ,area	!a_targという名をつける  TARGがくっつける相手の（通常大きいほうの）面
		allsel
		r,CNUM
		rmodif,CNUM,14,1e6		!14は接触コンダクタンスのこと CONTA174の リアルコンスタントのことらしい
		real,CNUM
		type,3		!要素ナンバー3のこと 3ということはtarge170
		cmsel,s,a_targ	!Cuの表面選択
		nsla,s,1	!選択されたエリアに関する節点の選択
		esurf		!既存の要素の自由表面に重ねて要素を生成とのこと
		type,8		!粗い樹脂と銅の接触
		cmsel,s,a_cont	!はんだ下面の選択
		nsla,s,1	!選択されたエリアに関する節点の選択
		esurf
		allsel


!ONBUS間の最上樹脂
		CNUM=CNUM+1
		allsel
		!Create Contact Pair
		asel,s,,,A14+6*8+1	!左面を選択
		cm,a_cont,area	!a_contという名をつける
		asel,s,,,150	!Cu表面を選択
		cm,a_targ,area	!a_targという名をつける  TARGがくっつける相手の（通常大きいほうの）面
		allsel
		r,CNUM
		rmodif,CNUM,14,1e6		!14は接触コンダクタンスのこと CONTA174の リアルコンスタントのことらしい
		real,CNUM
		type,3		!要素ナンバー3のこと 3ということはtarge170
		cmsel,s,a_targ	!Cuの表面選択
		nsla,s,1	!選択されたエリアに関する節点の選択
		esurf		!既存の要素の自由表面に重ねて要素を生成とのこと
		type,5		!粗い樹脂と銅の接触
		cmsel,s,a_cont	!はんだ下面の選択
		nsla,s,1	!選択されたエリアに関する節点の選択
		esurf
		allsel

		CNUM=CNUM+1
		allsel
		!Create Contact Pair
		asel,s,,,A14+6*8+2	!左面を選択
		cm,a_cont,area	!a_contという名をつける
		asel,s,,,A14+6*5+4	!Cu表面を選択
		cm,a_targ,area	!a_targという名をつける  TARGがくっつける相手の（通常大きいほうの）面
		allsel
		r,CNUM
		rmodif,CNUM,14,1e6		!14は接触コンダクタンスのこと CONTA174の リアルコンスタントのことらしい
		real,CNUM
		type,3		!要素ナンバー3のこと 3ということはtarge170
		cmsel,s,a_targ	!Cuの表面選択
		nsla,s,1	!選択されたエリアに関する節点の選択
		esurf		!既存の要素の自由表面に重ねて要素を生成とのこと
		type,5		!粗い樹脂と銅の接触
		cmsel,s,a_cont	!はんだ下面の選択
		nsla,s,1	!選択されたエリアに関する節点の選択
		esurf
		allsel

		CNUM=CNUM+1
		allsel
		!Create Contact Pair
		asel,s,,,A14+6*8+3	!左面を選択
		cm,a_cont,area	!a_contという名をつける
		asel,s,,,A14+6*10+5	!Cu表面を選択
		cm,a_targ,area	!a_targという名をつける  TARGがくっつける相手の（通常大きいほうの）面
		allsel
		r,CNUM
		rmodif,CNUM,14,1e6		!14は接触コンダクタンスのこと CONTA174の リアルコンスタントのことらしい
		real,CNUM
		type,3		!要素ナンバー3のこと 3ということはtarge170
		cmsel,s,a_targ	!Cuの表面選択
		nsla,s,1	!選択されたエリアに関する節点の選択
		esurf		!既存の要素の自由表面に重ねて要素を生成とのこと
		type,5		!粗い樹脂と銅の接触
		cmsel,s,a_cont	!はんだ下面の選択
		nsla,s,1	!選択されたエリアに関する節点の選択
		esurf
		allsel

		CNUM=CNUM+1
		allsel
		!Create Contact Pair
		asel,s,,,A14+6*8+3	!左面を選択
		cm,a_cont,area	!a_contという名をつける
		asel,s,,,353	!Cu表面を選択
		cm,a_targ,area	!a_targという名をつける  TARGがくっつける相手の（通常大きいほうの）面
		allsel
		r,CNUM
		rmodif,CNUM,14,1e6		!14は接触コンダクタンスのこと CONTA174の リアルコンスタントのことらしい
		real,CNUM
		type,3		!要素ナンバー3のこと 3ということはtarge170
		cmsel,s,a_targ	!Cuの表面選択
		nsla,s,1	!選択されたエリアに関する節点の選択
		esurf		!既存の要素の自由表面に重ねて要素を生成とのこと
		type,8		!粗い樹脂と銅の接触
		cmsel,s,a_cont	!はんだ下面の選択
		nsla,s,1	!選択されたエリアに関する節点の選択
		esurf
		allsel

		CNUM=CNUM+1
		allsel
		!Create Contact Pair
		asel,s,,,A14+6*8+5	!左面を選択
		cm,a_cont,area	!a_contという名をつける
		asel,s,,,A14+3	!Cu表面を選択
		cm,a_targ,area	!a_targという名をつける  TARGがくっつける相手の（通常大きいほうの）面
		allsel
		r,CNUM
		rmodif,CNUM,14,1e6		!14は接触コンダクタンスのこと CONTA174の リアルコンスタントのことらしい
		real,CNUM
		type,3		!要素ナンバー3のこと 3ということはtarge170
		cmsel,s,a_targ	!Cuの表面選択
		nsla,s,1	!選択されたエリアに関する節点の選択
		esurf		!既存の要素の自由表面に重ねて要素を生成とのこと
		type,5		!粗い樹脂と銅の接触
		cmsel,s,a_cont	!はんだ下面の選択
		nsla,s,1	!選択されたエリアに関する節点の選択
		esurf
		allsel

		CNUM=CNUM+1
		allsel
		!Create Contact Pair
		asel,s,,,A14+6*8+5	!左面を選択
		cm,a_cont,area	!a_contという名をつける
		asel,s,,,339	!Cu表面を選択
		cm,a_targ,area	!a_targという名をつける  TARGがくっつける相手の（通常大きいほうの）面
		allsel
		r,CNUM
		rmodif,CNUM,14,1e6		!14は接触コンダクタンスのこと CONTA174の リアルコンスタントのことらしい
		real,CNUM
		type,3		!要素ナンバー3のこと 3ということはtarge170
		cmsel,s,a_targ	!Cuの表面選択
		nsla,s,1	!選択されたエリアに関する節点の選択
		esurf		!既存の要素の自由表面に重ねて要素を生成とのこと
		type,8		!粗い樹脂と銅の接触
		cmsel,s,a_cont	!はんだ下面の選択
		nsla,s,1	!選択されたエリアに関する節点の選択
		esurf
		allsel

!NPBUS間の最上樹脂
		CNUM=CNUM+1
		allsel
		!Create Contact Pair
		asel,s,,,A14+6*9+1	!左面を選択
		cm,a_cont,area	!a_contという名をつける
		asel,s,,,150	!Cu表面を選択
		cm,a_targ,area	!a_targという名をつける  TARGがくっつける相手の（通常大きいほうの）面
		allsel
		r,CNUM
		rmodif,CNUM,14,1e6		!14は接触コンダクタンスのこと CONTA174の リアルコンスタントのことらしい
		real,CNUM
		type,3		!要素ナンバー3のこと 3ということはtarge170
		cmsel,s,a_targ	!Cuの表面選択
		nsla,s,1	!選択されたエリアに関する節点の選択
		esurf		!既存の要素の自由表面に重ねて要素を生成とのこと
		type,5		!粗い樹脂と銅の接触
		cmsel,s,a_cont	!はんだ下面の選択
		nsla,s,1	!選択されたエリアに関する節点の選択
		esurf
		allsel

		CNUM=CNUM+1
		allsel
		!Create Contact Pair
		asel,s,,,A14+6*9+2	!左面を選択
		cm,a_cont,area	!a_contという名をつける
		asel,s,,,A14+6*7+4	!Cu表面を選択
		cm,a_targ,area	!a_targという名をつける  TARGがくっつける相手の（通常大きいほうの）面
		allsel
		r,CNUM
		rmodif,CNUM,14,1e6		!14は接触コンダクタンスのこと CONTA174の リアルコンスタントのことらしい
		real,CNUM
		type,3		!要素ナンバー3のこと 3ということはtarge170
		cmsel,s,a_targ	!Cuの表面選択
		nsla,s,1	!選択されたエリアに関する節点の選択
		esurf		!既存の要素の自由表面に重ねて要素を生成とのこと
		type,5		!粗い樹脂と銅の接触
		cmsel,s,a_cont	!はんだ下面の選択
		nsla,s,1	!選択されたエリアに関する節点の選択
		esurf
		allsel

		CNUM=CNUM+1
		allsel
		!Create Contact Pair
		asel,s,,,A14+6*9+3	!左面を選択
		cm,a_cont,area	!a_contという名をつける
		asel,s,,,A14+6*2+5	!Cu表面を選択
		cm,a_targ,area	!a_targという名をつける  TARGがくっつける相手の（通常大きいほうの）面
		allsel
		r,CNUM
		rmodif,CNUM,14,1e6		!14は接触コンダクタンスのこと CONTA174の リアルコンスタントのことらしい
		real,CNUM
		type,3		!要素ナンバー3のこと 3ということはtarge170
		cmsel,s,a_targ	!Cuの表面選択
		nsla,s,1	!選択されたエリアに関する節点の選択
		esurf		!既存の要素の自由表面に重ねて要素を生成とのこと
		type,5		!粗い樹脂と銅の接触
		cmsel,s,a_cont	!はんだ下面の選択
		nsla,s,1	!選択されたエリアに関する節点の選択
		esurf
		allsel

		CNUM=CNUM+1
		allsel
		!Create Contact Pair
		asel,s,,,A14+6*9+3	!左面を選択
		cm,a_cont,area	!a_contという名をつける
		asel,s,,,359	!Cu表面を選択
		cm,a_targ,area	!a_targという名をつける  TARGがくっつける相手の（通常大きいほうの）面
		allsel
		r,CNUM
		rmodif,CNUM,14,1e6		!14は接触コンダクタンスのこと CONTA174の リアルコンスタントのことらしい
		real,CNUM
		type,3		!要素ナンバー3のこと 3ということはtarge170
		cmsel,s,a_targ	!Cuの表面選択
		nsla,s,1	!選択されたエリアに関する節点の選択
		esurf		!既存の要素の自由表面に重ねて要素を生成とのこと
		type,8		!粗い樹脂と銅の接触
		cmsel,s,a_cont	!はんだ下面の選択
		nsla,s,1	!選択されたエリアに関する節点の選択
		esurf
		allsel

		CNUM=CNUM+1
		allsel
		!Create Contact Pair
		asel,s,,,A14+6*9+5	!左面を選択
		cm,a_cont,area	!a_contという名をつける
		asel,s,,,A14+6*10+3	!Cu表面を選択
		cm,a_targ,area	!a_targという名をつける  TARGがくっつける相手の（通常大きいほうの）面
		allsel
		r,CNUM
		rmodif,CNUM,14,1e6		!14は接触コンダクタンスのこと CONTA174の リアルコンスタントのことらしい
		real,CNUM
		type,3		!要素ナンバー3のこと 3ということはtarge170
		cmsel,s,a_targ	!Cuの表面選択
		nsla,s,1	!選択されたエリアに関する節点の選択
		esurf		!既存の要素の自由表面に重ねて要素を生成とのこと
		type,5		!粗い樹脂と銅の接触
		cmsel,s,a_cont	!はんだ下面の選択
		nsla,s,1	!選択されたエリアに関する節点の選択
		esurf
		allsel

		CNUM=CNUM+1
		allsel
		!Create Contact Pair
		asel,s,,,A14+6*9+5	!左面を選択
		cm,a_cont,area	!a_contという名をつける
		asel,s,,,351	!Cu表面を選択
		cm,a_targ,area	!a_targという名をつける  TARGがくっつける相手の（通常大きいほうの）面
		allsel
		r,CNUM
		rmodif,CNUM,14,1e6		!14は接触コンダクタンスのこと CONTA174の リアルコンスタントのことらしい
		real,CNUM
		type,3		!要素ナンバー3のこと 3ということはtarge170
		cmsel,s,a_targ	!Cuの表面選択
		nsla,s,1	!選択されたエリアに関する節点の選択
		esurf		!既存の要素の自由表面に重ねて要素を生成とのこと
		type,8		!粗い樹脂と銅の接触
		cmsel,s,a_cont	!はんだ下面の選択
		nsla,s,1	!選択されたエリアに関する節点の選択
		esurf
		allsel

!Nバス下の薄い樹脂　最上
		CNUM=CNUM+1
		allsel
		!Create Contact Pair
		asel,s,,,A14+6*10+2	!左面を選択
		cm,a_cont,area	!a_contという名をつける
		asel,s,,,A14+6*1+4	!Cu表面を選択
		cm,a_targ,area	!a_targという名をつける  TARGがくっつける相手の（通常大きいほうの）面
		allsel
		r,CNUM
		rmodif,CNUM,14,1e6		!14は接触コンダクタンスのこと CONTA174の リアルコンスタントのことらしい
		real,CNUM
		type,3		!要素ナンバー3のこと 3ということはtarge170
		cmsel,s,a_targ	!Cuの表面選択
		nsla,s,1	!選択されたエリアに関する節点の選択
		esurf		!既存の要素の自由表面に重ねて要素を生成とのこと
		type,5		!粗い樹脂と銅の接触
		cmsel,s,a_cont	!はんだ下面の選択
		nsla,s,1	!選択されたエリアに関する節点の選択
		esurf
		allsel

		CNUM=CNUM+1
		allsel
		!Create Contact Pair
		asel,s,,,A14+6*10+6	!左面を選択
		cm,a_cont,area	!a_contという名をつける
		asel,s,,,349	!Cu表面を選択
		cm,a_targ,area	!a_targという名をつける  TARGがくっつける相手の（通常大きいほうの）面
		allsel
		r,CNUM
		rmodif,CNUM,14,1e6		!14は接触コンダクタンスのこと CONTA174の リアルコンスタントのことらしい
		real,CNUM
		type,3		!要素ナンバー3のこと 3ということはtarge170
		cmsel,s,a_targ	!Cuの表面選択
		nsla,s,1	!選択されたエリアに関する節点の選択
		esurf		!既存の要素の自由表面に重ねて要素を生成とのこと
		type,8		!粗い樹脂と銅の接触
		cmsel,s,a_cont	!はんだ下面の選択
		nsla,s,1	!選択されたエリアに関する節点の選択
		esurf
		allsel

!OPNDバス周辺の樹脂の作成で
!点 8*11新規発生
!線 12*11新規発生
!面 6*11新規発生
!VOL 11新規発生
!X1=KBASE+2*PARA*8*10
!X1=X1+2*PARA*32+2*PARA*8
!X1=X1+2*PARA*26+13*PARA*2
!X1=X1+16*PARA*2+8*PARA*2
!X1=X1+8*PARA*2+8*PARA*2		!チップ周辺最後の樹脂
!X1=X1+8*(PARA-2)*2	!パラ間の樹脂
!X1=X1+8*2			!チップ行間の中央横長樹脂
!X1=X1+8*8			!チップ行　左右端の樹脂
!X1=X1+8*8			!柱前後とチップ前後の樹脂
X1=X1+8*11			!BUS下およびBUS横の樹脂
!X2=LBASE+2*PARA*12*10
!X2=X2+2*PARA*(32+20)		!チップ側面樹脂まで
!X2=X2+2*PARA*53+33*PARA*2	!53EMIはんだ側面樹脂
!X2=X2+32*PARA*2+20*PARA*2	!
!X2=X2+20*PARA*2+12*PARA*2
!X2=X2+12*(PARA-2)*2
!X2=X2+24
!X2=X2+12*8
!X2=X2+12*8
X2=X2+12*11
!X3=ABASE+2*PARA*6*10	!樹脂なしの各PARA要素まで
!X3=X3+2*PARA*(20+16)	!チップ周りの樹脂
!X3=X3+2*PARA*(30+4)+2*PARA*27			!EMIはんだまわりの樹脂+SPC周辺
!X3=X3+20*PARA*2+16*PARA*2
!X3=X3+16*PARA*2+6*PARA*2
!X3=X3+6*(PARA-2)*2
!X3=X3+12
!X3=X3+6*8
!X3=X3+6*8
X3=X3+6*11
!X4=VBASE+2*PARA*10+2*PARA*8
!X4=X4+2*PARA*7+2*PARA*7
!X4=X4+4*PARA*2+4*PARA*2
!X4=X4+4*PARA*2+PARA*2
!X4=X4+(PARA-2)*2
!X4=X4+2
!X4=X4+8
!X4=X4+8
X4=X4+11


!-----RESINLASTDBC 最後の10個。OPBUSの左右とBUS上 DBUS左右とDBUS上 最後の左右の縁側----------------------!--------------------BUS下の薄い樹脂と、PNOバス間の小さい樹脂-------------------------------------------
!OBUS左,O-PBUS上,PBUS右,DBUS左,DBUS上,DBUS右、左縁側,右縁側、および、異形DBUSの左右の小さい樹脂
*DO,ii,1,10,1			!11すべて
	*DO,jj,1,2,1		!上下
		*DO,kk,1,4,1	!4方向
				nn=X1+(ii-1)*8+(jj-1)*4+kk
				k,nn,RESINLASTDBC(ii,jj,kk,1),RESINLASTDBC(ii,jj,kk,2),RESINLASTDBC(ii,jj,kk,3)
		*ENDDO
	*ENDDO
*ENDDO
*DO,ii,1,10,1
			kk=X1+(ii-1)*8
			V,kk+1,kk+2,kk+3,kk+4,kk+5,kk+6,kk+7,kk+8
*ENDDO
*DO,ii,1,10,1
		D_PLTX=NINT((RESINLASTDBC(ii,1,2,1)-RESINLASTDBC(ii,1,1,1))/M_RESINX)
		D_PLTY=NINT((RESINLASTDBC(ii,1,3,2)-RESINLASTDBC(ii,1,2,2))/M_RESINY)
		D_PLTZ=NINT( (RESINLASTDBC(ii,2,1,3)-RESINLASTDBC(ii,1,1,3) )/M_RESINZ)
		*IF,D_PLTZ,LT,3,THEN
			D_PLTZ=3
		*ENDIF
		lsel,s,,,X2+(ii-1)*12+1
		lesiz,all,,,D_PLTX		!z分割
		lsel,all			!最後にこのALLがないと、次にLをSELできなくなってしまいエラーが発生します。これはMUST
		lsel,s,,,X2+(ii-1)*12+2
		lesiz,all,,,D_PLTY		!z分割
		lsel,all			!最後にこのALLがないと、次にLをSELできなくなってしまいエラーが発生します。これはMUST
		lsel,s,,,X2+(ii-1)*12+5
		lesiz,all,,,D_PLTZ		!z分割
		lsel,all			!最後にこのALLがないと、次にLをSELできなくなってしまいエラーが発生します。これはMUST
		VMESH,X4+ii
*ENDDO

!改めて面の基準どり
A1=ABASE+PARA*2*6*10	! ←樹脂の手前まで 上のDBC下はんだまで
A2=A1+20*PARA*2	! ダイ半田横の樹脂まで
A3=A2+16*PARA*2					! チップ横の樹脂まで
A4=A3+30*PARA*2					!EMIはんだ周辺樹脂まで
A5=A4+4*PARA*2					!EMIはんだまわり全部
A6=A5+27*PARA*2			!SPC下部分周辺樹脂まで
A7=A6+20*PARA*2			!面取り周辺樹脂まで
A8=A7+16*PARA*2			!上SPC周辺樹脂まで
A9=A8+16*PARA*2			!SPC上はんだ周辺樹脂まで
A10=A9+6*PARA*2			!EMI上の最後の樹脂まで
A11=A10+6*(PARA-2)*2			!PARA間の樹脂まで
A12=A11+6*2				!中央の樹脂まで
A13=A12+6*8				!チップ横の樹脂まで
A14=A13+6*8				!柱前後およびチップ前後の樹脂まで
A15=A14+6*11				!BUS下およびBUS横の樹脂

!DBC間の最後の樹脂の接触-------------------------------------------------
!OBUS左
		CNUM=CNUM+1
		allsel
		!Create Contact Pair
		asel,s,,,A15+1	!左面を選択
		cm,a_cont,area	!a_contという名をつける
		asel,s,,,150	!Cu表面を選択
		cm,a_targ,area	!a_targという名をつける  TARGがくっつける相手の（通常大きいほうの）面
		allsel
		r,CNUM
		rmodif,CNUM,14,1e6		!14は接触コンダクタンスのこと CONTA174の リアルコンスタントのことらしい
		real,CNUM
		type,3		!要素ナンバー3のこと 3ということはtarge170
		cmsel,s,a_targ	!Cuの表面選択
		nsla,s,1	!選択されたエリアに関する節点の選択
		esurf		!既存の要素の自由表面に重ねて要素を生成とのこと
		type,5		!粗い樹脂と銅の接触
		cmsel,s,a_cont	!はんだ下面の選択
		nsla,s,1	!選択されたエリアに関する節点の選択
		esurf
		allsel

		CNUM=CNUM+1
		allsel
		!Create Contact Pair
		asel,s,,,A15+1	!左面を選択
		cm,a_cont,area	!a_contという名をつける
		asel,s,,,12	!Cu表面を選択
		cm,a_targ,area	!a_targという名をつける  TARGがくっつける相手の（通常大きいほうの）面
		allsel
		r,CNUM
		rmodif,CNUM,14,1e6		!14は接触コンダクタンスのこと CONTA174の リアルコンスタントのことらしい
		real,CNUM
		type,3		!要素ナンバー3のこと 3ということはtarge170
		cmsel,s,a_targ	!Cuの表面選択
		nsla,s,1	!選択されたエリアに関する節点の選択
		esurf		!既存の要素の自由表面に重ねて要素を生成とのこと
		type,8		!粗い樹脂と銅の接触
		cmsel,s,a_cont	!はんだ下面の選択
		nsla,s,1	!選択されたエリアに関する節点の選択
		esurf
		allsel

		CNUM=CNUM+1
		allsel
		!Create Contact Pair
		asel,s,,,A15+2	!左面を選択
		cm,a_cont,area	!a_contという名をつける
		asel,s,,,A13+6*5+4	!Cu表面を選択
		cm,a_targ,area	!a_targという名をつける  TARGがくっつける相手の（通常大きいほうの）面
		allsel
		r,CNUM
		rmodif,CNUM,14,1e6		!14は接触コンダクタンスのこと CONTA174の リアルコンスタントのことらしい
		real,CNUM
		type,3		!要素ナンバー3のこと 3ということはtarge170
		cmsel,s,a_targ	!Cuの表面選択
		nsla,s,1	!選択されたエリアに関する節点の選択
		esurf		!既存の要素の自由表面に重ねて要素を生成とのこと
		type,5		!粗い樹脂と銅の接触
		cmsel,s,a_cont	!はんだ下面の選択
		nsla,s,1	!選択されたエリアに関する節点の選択
		esurf
		allsel

		CNUM=CNUM+1
		allsel
		!Create Contact Pair
		asel,s,,,A15+3	!左面を選択
		cm,a_cont,area	!a_contという名をつける
		asel,s,,,297	!Cu表面を選択
		cm,a_targ,area	!a_targという名をつける  TARGがくっつける相手の（通常大きいほうの）面
		allsel
		r,CNUM
		rmodif,CNUM,14,1e6		!14は接触コンダクタンスのこと CONTA174の リアルコンスタントのことらしい
		real,CNUM
		type,3		!要素ナンバー3のこと 3ということはtarge170
		cmsel,s,a_targ	!Cuの表面選択
		nsla,s,1	!選択されたエリアに関する節点の選択
		esurf		!既存の要素の自由表面に重ねて要素を生成とのこと
		type,5		!粗い樹脂と銅の接触
		cmsel,s,a_cont	!はんだ下面の選択
		nsla,s,1	!選択されたエリアに関する節点の選択
		esurf
		allsel

		CNUM=CNUM+1
		allsel
		!Create Contact Pair
		asel,s,,,A15+3	!左面を選択
		cm,a_cont,area	!a_contという名をつける
		asel,s,,,321	!Cu表面を選択
		cm,a_targ,area	!a_targという名をつける  TARGがくっつける相手の（通常大きいほうの）面
		allsel
		r,CNUM
		rmodif,CNUM,14,1e6		!14は接触コンダクタンスのこと CONTA174の リアルコンスタントのことらしい
		real,CNUM
		type,3		!要素ナンバー3のこと 3ということはtarge170
		cmsel,s,a_targ	!Cuの表面選択
		nsla,s,1	!選択されたエリアに関する節点の選択
		esurf		!既存の要素の自由表面に重ねて要素を生成とのこと
		type,8		!粗い樹脂と銅の接触
		cmsel,s,a_cont	!はんだ下面の選択
		nsla,s,1	!選択されたエリアに関する節点の選択
		esurf
		allsel

		CNUM=CNUM+1
		allsel
		!Create Contact Pair
		asel,s,,,A15+3	!左面を選択
		cm,a_cont,area	!a_contという名をつける
		asel,s,,,A14+5	!Cu表面を選択
		cm,a_targ,area	!a_targという名をつける  TARGがくっつける相手の（通常大きいほうの）面
		allsel
		r,CNUM
		rmodif,CNUM,14,1e6		!14は接触コンダクタンスのこと CONTA174の リアルコンスタントのことらしい
		real,CNUM
		type,3		!要素ナンバー3のこと 3ということはtarge170
		cmsel,s,a_targ	!Cuの表面選択
		nsla,s,1	!選択されたエリアに関する節点の選択
		esurf		!既存の要素の自由表面に重ねて要素を生成とのこと
		type,5		!粗い樹脂と銅の接触
		cmsel,s,a_cont	!はんだ下面の選択
		nsla,s,1	!選択されたエリアに関する節点の選択
		esurf
		allsel

		CNUM=CNUM+1
		allsel
		!Create Contact Pair
		asel,s,,,A15+3	!左面を選択
		cm,a_cont,area	!a_contという名をつける
		asel,s,,,341	!Cu表面を選択
		cm,a_targ,area	!a_targという名をつける  TARGがくっつける相手の（通常大きいほうの）面
		allsel
		r,CNUM
		rmodif,CNUM,14,1e6		!14は接触コンダクタンスのこと CONTA174の リアルコンスタントのことらしい
		real,CNUM
		type,3		!要素ナンバー3のこと 3ということはtarge170
		cmsel,s,a_targ	!Cuの表面選択
		nsla,s,1	!選択されたエリアに関する節点の選択
		esurf		!既存の要素の自由表面に重ねて要素を生成とのこと
		type,8		!粗い樹脂と銅の接触
		cmsel,s,a_cont	!はんだ下面の選択
		nsla,s,1	!選択されたエリアに関する節点の選択
		esurf
		allsel

		CNUM=CNUM+1
		allsel
		!Create Contact Pair
		asel,s,,,A15+3	!左面を選択
		cm,a_cont,area	!a_contという名をつける
		asel,s,,,A15+6*1+5	!Cu表面を選択
		cm,a_targ,area	!a_targという名をつける  TARGがくっつける相手の（通常大きいほうの）面
		allsel
		r,CNUM
		rmodif,CNUM,14,1e6		!14は接触コンダクタンスのこと CONTA174の リアルコンスタントのことらしい
		real,CNUM
		type,3		!要素ナンバー3のこと 3ということはtarge170
		cmsel,s,a_targ	!Cuの表面選択
		nsla,s,1	!選択されたエリアに関する節点の選択
		esurf		!既存の要素の自由表面に重ねて要素を生成とのこと
		type,5		!粗い樹脂と銅の接触
		cmsel,s,a_cont	!はんだ下面の選択
		nsla,s,1	!選択されたエリアに関する節点の選択
		esurf
		allsel

		CNUM=CNUM+1
		allsel
		!Create Contact Pair
		asel,s,,,A15+5	!左面を選択
		cm,a_cont,area	!a_contという名をつける
		asel,s,,,A15+6*6+3	!Cu表面を選択
		cm,a_targ,area	!a_targという名をつける  TARGがくっつける相手の（通常大きいほうの）面
		allsel
		r,CNUM
		rmodif,CNUM,14,1e6		!14は接触コンダクタンスのこと CONTA174の リアルコンスタントのことらしい
		real,CNUM
		type,3		!要素ナンバー3のこと 3ということはtarge170
		cmsel,s,a_targ	!Cuの表面選択
		nsla,s,1	!選択されたエリアに関する節点の選択
		esurf		!既存の要素の自由表面に重ねて要素を生成とのこと
		type,5		!粗い樹脂と銅の接触
		cmsel,s,a_cont	!はんだ下面の選択
		nsla,s,1	!選択されたエリアに関する節点の選択
		esurf
		allsel

		CNUM=CNUM+1
		allsel
		!Create Contact Pair
		asel,s,,,A15+6	!左面を選択
		cm,a_cont,area	!a_contという名をつける
		asel,s,,,231	!Cu表面を選択
		cm,a_targ,area	!a_targという名をつける  TARGがくっつける相手の（通常大きいほうの）面
		allsel
		r,CNUM
		rmodif,CNUM,14,1e6		!14は接触コンダクタンスのこと CONTA174の リアルコンスタントのことらしい
		real,CNUM
		type,3		!要素ナンバー3のこと 3ということはtarge170
		cmsel,s,a_targ	!Cuの表面選択
		nsla,s,1	!選択されたエリアに関する節点の選択
		esurf		!既存の要素の自由表面に重ねて要素を生成とのこと
		type,5		!粗い樹脂と銅の接触
		cmsel,s,a_cont	!はんだ下面の選択
		nsla,s,1	!選択されたエリアに関する節点の選択
		esurf
		allsel

		CNUM=CNUM+1
		allsel
		!Create Contact Pair
		asel,s,,,A15+6	!左面を選択
		cm,a_cont,area	!a_contという名をつける
		asel,s,,,195	!Cu表面を選択
		cm,a_targ,area	!a_targという名をつける  TARGがくっつける相手の（通常大きいほうの）面
		allsel
		r,CNUM
		rmodif,CNUM,14,1e6		!14は接触コンダクタンスのこと CONTA174の リアルコンスタントのことらしい
		real,CNUM
		type,3		!要素ナンバー3のこと 3ということはtarge170
		cmsel,s,a_targ	!Cuの表面選択
		nsla,s,1	!選択されたエリアに関する節点の選択
		esurf		!既存の要素の自由表面に重ねて要素を生成とのこと
		type,5		!粗い樹脂と銅の接触
		cmsel,s,a_cont	!はんだ下面の選択
		nsla,s,1	!選択されたエリアに関する節点の選択
		esurf
		allsel

!O-PBUS上の樹脂の接合
		CNUM=CNUM+1
		allsel
		!Create Contact Pair
		asel,s,,,A15+6*1+1	!左面を選択
		cm,a_cont,area	!a_contという名をつける
		asel,s,,,317	!Cu表面を選択
		cm,a_targ,area	!a_targという名をつける  TARGがくっつける相手の（通常大きいほうの）面
		allsel
		r,CNUM
		rmodif,CNUM,14,1e6		!14は接触コンダクタンスのこと CONTA174の リアルコンスタントのことらしい
		real,CNUM
		type,3		!要素ナンバー3のこと 3ということはtarge170
		cmsel,s,a_targ	!Cuの表面選択
		nsla,s,1	!選択されたエリアに関する節点の選択
		esurf		!既存の要素の自由表面に重ねて要素を生成とのこと
		type,8		!粗い樹脂と銅の接触
		cmsel,s,a_cont	!はんだ下面の選択
		nsla,s,1	!選択されたエリアに関する節点の選択
		esurf
		allsel

		CNUM=CNUM+1
		allsel
		!Create Contact Pair
		asel,s,,,A15+6*1+1	!左面を選択
		cm,a_cont,area	!a_contという名をつける
		asel,s,,,342	!Cu表面を選択
		cm,a_targ,area	!a_targという名をつける  TARGがくっつける相手の（通常大きいほうの）面
		allsel
		r,CNUM
		rmodif,CNUM,14,1e6		!14は接触コンダクタンスのこと CONTA174の リアルコンスタントのことらしい
		real,CNUM
		type,3		!要素ナンバー3のこと 3ということはtarge170
		cmsel,s,a_targ	!Cuの表面選択
		nsla,s,1	!選択されたエリアに関する節点の選択
		esurf		!既存の要素の自由表面に重ねて要素を生成とのこと
		type,8		!粗い樹脂と銅の接触
		cmsel,s,a_cont	!はんだ下面の選択
		nsla,s,1	!選択されたエリアに関する節点の選択
		esurf
		allsel

		CNUM=CNUM+1
		allsel
		!Create Contact Pair
		asel,s,,,A15+6*1+1	!左面を選択
		cm,a_cont,area	!a_contという名をつける
		asel,s,,,322	!Cu表面を選択
		cm,a_targ,area	!a_targという名をつける  TARGがくっつける相手の（通常大きいほうの）面
		allsel
		r,CNUM
		rmodif,CNUM,14,1e6		!14は接触コンダクタンスのこと CONTA174の リアルコンスタントのことらしい
		real,CNUM
		type,3		!要素ナンバー3のこと 3ということはtarge170
		cmsel,s,a_targ	!Cuの表面選択
		nsla,s,1	!選択されたエリアに関する節点の選択
		esurf		!既存の要素の自由表面に重ねて要素を生成とのこと
		type,8		!粗い樹脂と銅の接触
		cmsel,s,a_cont	!はんだ下面の選択
		nsla,s,1	!選択されたエリアに関する節点の選択
		esurf
		allsel

		CNUM=CNUM+1
		allsel
		!Create Contact Pair
		asel,s,,,A15+6*1+1	!左面を選択
		cm,a_cont,area	!a_contという名をつける
		asel,s,,,348	!Cu表面を選択
		cm,a_targ,area	!a_targという名をつける  TARGがくっつける相手の（通常大きいほうの）面
		allsel
		r,CNUM
		rmodif,CNUM,14,1e6		!14は接触コンダクタンスのこと CONTA174の リアルコンスタントのことらしい
		real,CNUM
		type,3		!要素ナンバー3のこと 3ということはtarge170
		cmsel,s,a_targ	!Cuの表面選択
		nsla,s,1	!選択されたエリアに関する節点の選択
		esurf		!既存の要素の自由表面に重ねて要素を生成とのこと
		type,8		!粗い樹脂と銅の接触
		cmsel,s,a_cont	!はんだ下面の選択
		nsla,s,1	!選択されたエリアに関する節点の選択
		esurf
		allsel

		CNUM=CNUM+1
		allsel
		!Create Contact Pair
		asel,s,,,A15+6*1+1	!左面を選択
		cm,a_cont,area	!a_contという名をつける
		asel,s,,,327	!Cu表面を選択
		cm,a_targ,area	!a_targという名をつける  TARGがくっつける相手の（通常大きいほうの）面
		allsel
		r,CNUM
		rmodif,CNUM,14,1e6		!14は接触コンダクタンスのこと CONTA174の リアルコンスタントのことらしい
		real,CNUM
		type,3		!要素ナンバー3のこと 3ということはtarge170
		cmsel,s,a_targ	!Cuの表面選択
		nsla,s,1	!選択されたエリアに関する節点の選択
		esurf		!既存の要素の自由表面に重ねて要素を生成とのこと
		type,8		!粗い樹脂と銅の接触
		cmsel,s,a_cont	!はんだ下面の選択
		nsla,s,1	!選択されたエリアに関する節点の選択
		esurf
		allsel

		CNUM=CNUM+1
		allsel
		!Create Contact Pair
		asel,s,,,A15+6*1+1	!左面を選択
		cm,a_cont,area	!a_contという名をつける
		asel,s,,,360	!Cu表面を選択
		cm,a_targ,area	!a_targという名をつける  TARGがくっつける相手の（通常大きいほうの）面
		allsel
		r,CNUM
		rmodif,CNUM,14,1e6		!14は接触コンダクタンスのこと CONTA174の リアルコンスタントのことらしい
		real,CNUM
		type,3		!要素ナンバー3のこと 3ということはtarge170
		cmsel,s,a_targ	!Cuの表面選択
		nsla,s,1	!選択されたエリアに関する節点の選択
		esurf		!既存の要素の自由表面に重ねて要素を生成とのこと
		type,8		!粗い樹脂と銅の接触
		cmsel,s,a_cont	!はんだ下面の選択
		nsla,s,1	!選択されたエリアに関する節点の選択
		esurf
		allsel

*DO,ii,1,4,1
		CNUM=CNUM+1
		allsel
		!Create Contact Pair
		asel,s,,,A15+6*1+1	!左面を選択
		cm,a_cont,area	!a_contという名をつける
		asel,s,,,A14+6*4+(ii-1)*6+6	!Cu表面を選択
		cm,a_targ,area	!a_targという名をつける  TARGがくっつける相手の（通常大きいほうの）面
		allsel
		r,CNUM
		rmodif,CNUM,14,1e6		!14は接触コンダクタンスのこと CONTA174の リアルコンスタントのことらしい
		real,CNUM
		type,3		!要素ナンバー3のこと 3ということはtarge170
		cmsel,s,a_targ	!Cuの表面選択
		nsla,s,1	!選択されたエリアに関する節点の選択
		esurf		!既存の要素の自由表面に重ねて要素を生成とのこと
		type,5		!粗い樹脂と銅の接触
		cmsel,s,a_cont	!はんだ下面の選択
		nsla,s,1	!選択されたエリアに関する節点の選択
		esurf
		allsel
*ENDDO

		CNUM=CNUM+1
		allsel
		!Create Contact Pair
		asel,s,,,A15+6*1+2	!左面を選択
		cm,a_cont,area	!a_contという名をつける
		asel,s,,,A13+6*3+4	!Cu表面を選択
		cm,a_targ,area	!a_targという名をつける  TARGがくっつける相手の（通常大きいほうの）面
		allsel
		r,CNUM
		rmodif,CNUM,14,1e6		!14は接触コンダクタンスのこと CONTA174の リアルコンスタントのことらしい
		real,CNUM
		type,3		!要素ナンバー3のこと 3ということはtarge170
		cmsel,s,a_targ	!Cuの表面選択
		nsla,s,1	!選択されたエリアに関する節点の選択
		esurf		!既存の要素の自由表面に重ねて要素を生成とのこと
		type,5		!粗い樹脂と銅の接触
		cmsel,s,a_cont	!はんだ下面の選択
		nsla,s,1	!選択されたエリアに関する節点の選択
		esurf
		allsel

*DO,ii,1,2,1
		CNUM=CNUM+1
		allsel
		!Create Contact Pair
		asel,s,,,A15+6*1+2	!左面を選択
		cm,a_cont,area	!a_contという名をつける
		asel,s,,,A13+6*5+(ii-1)*12+4	!Cu表面を選択
		cm,a_targ,area	!a_targという名をつける  TARGがくっつける相手の（通常大きいほうの）面
		allsel
		r,CNUM
		rmodif,CNUM,14,1e6		!14は接触コンダクタンスのこと CONTA174の リアルコンスタントのことらしい
		real,CNUM
		type,3		!要素ナンバー3のこと 3ということはtarge170
		cmsel,s,a_targ	!Cuの表面選択
		nsla,s,1	!選択されたエリアに関する節点の選択
		esurf		!既存の要素の自由表面に重ねて要素を生成とのこと
		type,5		!粗い樹脂と銅の接触
		cmsel,s,a_cont	!はんだ下面の選択
		nsla,s,1	!選択されたエリアに関する節点の選択
		esurf
		allsel
*ENDDO

		CNUM=CNUM+1
		allsel
		!Create Contact Pair
		asel,s,,,A15+6*1+3	!左面を選択
		cm,a_cont,area	!a_contという名をつける
		asel,s,,,A15+6*2+5	!Cu表面を選択
		cm,a_targ,area	!a_targという名をつける  TARGがくっつける相手の（通常大きいほうの）面
		allsel
		r,CNUM
		rmodif,CNUM,14,1e6		!14は接触コンダクタンスのこと CONTA174の リアルコンスタントのことらしい
		real,CNUM
		type,3		!要素ナンバー3のこと 3ということはtarge170
		cmsel,s,a_targ	!Cuの表面選択
		nsla,s,1	!選択されたエリアに関する節点の選択
		esurf		!既存の要素の自由表面に重ねて要素を生成とのこと
		type,5		!粗い樹脂と銅の接触
		cmsel,s,a_cont	!はんだ下面の選択
		nsla,s,1	!選択されたエリアに関する節点の選択
		esurf
		allsel

		CNUM=CNUM+1
		allsel
		!Create Contact Pair
		asel,s,,,A15+6*1+6	!左面を選択
		cm,a_cont,area	!a_contという名をつける
		asel,s,,,231	!Cu表面を選択
		cm,a_targ,area	!a_targという名をつける  TARGがくっつける相手の（通常大きいほうの）面
		allsel
		r,CNUM
		rmodif,CNUM,14,1e6		!14は接触コンダクタンスのこと CONTA174の リアルコンスタントのことらしい
		real,CNUM
		type,3		!要素ナンバー3のこと 3ということはtarge170
		cmsel,s,a_targ	!Cuの表面選択
		nsla,s,1	!選択されたエリアに関する節点の選択
		esurf		!既存の要素の自由表面に重ねて要素を生成とのこと
		type,5		!粗い樹脂と銅の接触
		cmsel,s,a_cont	!はんだ下面の選択
		nsla,s,1	!選択されたエリアに関する節点の選択
		esurf
		allsel

		CNUM=CNUM+1
		allsel
		!Create Contact Pair
		asel,s,,,A15+6*1+6	!左面を選択
		cm,a_cont,area	!a_contという名をつける
		asel,s,,,255	!Cu表面を選択
		cm,a_targ,area	!a_targという名をつける  TARGがくっつける相手の（通常大きいほうの）面
		allsel
		r,CNUM
		rmodif,CNUM,14,1e6		!14は接触コンダクタンスのこと CONTA174の リアルコンスタントのことらしい
		real,CNUM
		type,3		!要素ナンバー3のこと 3ということはtarge170
		cmsel,s,a_targ	!Cuの表面選択
		nsla,s,1	!選択されたエリアに関する節点の選択
		esurf		!既存の要素の自由表面に重ねて要素を生成とのこと
		type,5		!粗い樹脂と銅の接触
		cmsel,s,a_cont	!はんだ下面の選択
		nsla,s,1	!選択されたエリアに関する節点の選択
		esurf
		allsel

		CNUM=CNUM+1
		allsel
		!Create Contact Pair
		asel,s,,,A15+6*1+6	!左面を選択
		cm,a_cont,area	!a_contという名をつける
		asel,s,,,195	!Cu表面を選択
		cm,a_targ,area	!a_targという名をつける  TARGがくっつける相手の（通常大きいほうの）面
		allsel
		r,CNUM
		rmodif,CNUM,14,1e6		!14は接触コンダクタンスのこと CONTA174の リアルコンスタントのことらしい
		real,CNUM
		type,3		!要素ナンバー3のこと 3ということはtarge170
		cmsel,s,a_targ	!Cuの表面選択
		nsla,s,1	!選択されたエリアに関する節点の選択
		esurf		!既存の要素の自由表面に重ねて要素を生成とのこと
		type,8		!粗い樹脂と銅の接触
		cmsel,s,a_cont	!はんだ下面の選択
		nsla,s,1	!選択されたエリアに関する節点の選択
		esurf
		allsel

		CNUM=CNUM+1
		allsel
		!Create Contact Pair
		asel,s,,,A15+6*1+6	!左面を選択
		cm,a_cont,area	!a_contという名をつける
		asel,s,,,201	!Cu表面を選択
		cm,a_targ,area	!a_targという名をつける  TARGがくっつける相手の（通常大きいほうの）面
		allsel
		r,CNUM
		rmodif,CNUM,14,1e6		!14は接触コンダクタンスのこと CONTA174の リアルコンスタントのことらしい
		real,CNUM
		type,3		!要素ナンバー3のこと 3ということはtarge170
		cmsel,s,a_targ	!Cuの表面選択
		nsla,s,1	!選択されたエリアに関する節点の選択
		esurf		!既存の要素の自由表面に重ねて要素を生成とのこと
		type,8		!粗い樹脂と銅の接触
		cmsel,s,a_cont	!はんだ下面の選択
		nsla,s,1	!選択されたエリアに関する節点の選択
		esurf
		allsel

		CNUM=CNUM+1
		allsel
		!Create Contact Pair
		asel,s,,,A15+6*1+6	!左面を選択
		cm,a_cont,area	!a_contという名をつける
		asel,s,,,213	!Cu表面を選択
		cm,a_targ,area	!a_targという名をつける  TARGがくっつける相手の（通常大きいほうの）面
		allsel
		r,CNUM
		rmodif,CNUM,14,1e6		!14は接触コンダクタンスのこと CONTA174の リアルコンスタントのことらしい
		real,CNUM
		type,3		!要素ナンバー3のこと 3ということはtarge170
		cmsel,s,a_targ	!Cuの表面選択
		nsla,s,1	!選択されたエリアに関する節点の選択
		esurf		!既存の要素の自由表面に重ねて要素を生成とのこと
		type,8		!粗い樹脂と銅の接触
		cmsel,s,a_cont	!はんだ下面の選択
		nsla,s,1	!選択されたエリアに関する節点の選択
		esurf
		allsel

!Pバスの右の樹脂の接触
		CNUM=CNUM+1
		allsel
		!Create Contact Pair
		asel,s,,,A15+6*2+1	!左面を選択
		cm,a_cont,area	!a_contという名をつける
		asel,s,,,30	!Cu表面を選択
		cm,a_targ,area	!a_targという名をつける  TARGがくっつける相手の（通常大きいほうの）面
		allsel
		r,CNUM
		rmodif,CNUM,14,1e6		!14は接触コンダクタンスのこと CONTA174の リアルコンスタントのことらしい
		real,CNUM
		type,3		!要素ナンバー3のこと 3ということはtarge170
		cmsel,s,a_targ	!Cuの表面選択
		nsla,s,1	!選択されたエリアに関する節点の選択
		esurf		!既存の要素の自由表面に重ねて要素を生成とのこと
		type,8		!粗い樹脂と銅の接触
		cmsel,s,a_cont	!はんだ下面の選択
		nsla,s,1	!選択されたエリアに関する節点の選択
		esurf
		allsel

		CNUM=CNUM+1
		allsel
		!Create Contact Pair
		asel,s,,,A15+6*2+1	!左面を選択
		cm,a_cont,area	!a_contという名をつける
		asel,s,,,150	!Cu表面を選択
		cm,a_targ,area	!a_targという名をつける  TARGがくっつける相手の（通常大きいほうの）面
		allsel
		r,CNUM
		rmodif,CNUM,14,1e6		!14は接触コンダクタンスのこと CONTA174の リアルコンスタントのことらしい
		real,CNUM
		type,3		!要素ナンバー3のこと 3ということはtarge170
		cmsel,s,a_targ	!Cuの表面選択
		nsla,s,1	!選択されたエリアに関する節点の選択
		esurf		!既存の要素の自由表面に重ねて要素を生成とのこと
		type,5		!粗い樹脂と銅の接触
		cmsel,s,a_cont	!はんだ下面の選択
		nsla,s,1	!選択されたエリアに関する節点の選択
		esurf
		allsel

		CNUM=CNUM+1
		allsel
		!Create Contact Pair
		asel,s,,,A15+6*2+2	!左面を選択
		cm,a_cont,area	!a_contという名をつける
		asel,s,,,A13+6*7+4	!Cu表面を選択
		cm,a_targ,area	!a_targという名をつける  TARGがくっつける相手の（通常大きいほうの）面
		allsel
		r,CNUM
		rmodif,CNUM,14,1e6		!14は接触コンダクタンスのこと CONTA174の リアルコンスタントのことらしい
		real,CNUM
		type,3		!要素ナンバー3のこと 3ということはtarge170
		cmsel,s,a_targ	!Cuの表面選択
		nsla,s,1	!選択されたエリアに関する節点の選択
		esurf		!既存の要素の自由表面に重ねて要素を生成とのこと
		type,5		!粗い樹脂と銅の接触
		cmsel,s,a_cont	!はんだ下面の選択
		nsla,s,1	!選択されたエリアに関する節点の選択
		esurf
		allsel

		CNUM=CNUM+1
		allsel
		!Create Contact Pair
		asel,s,,,A15+6*2+3	!左面を選択
		cm,a_cont,area	!a_contという名をつける
		asel,s,,,A15+6*7+5	!Cu表面を選択
		cm,a_targ,area	!a_targという名をつける  TARGがくっつける相手の（通常大きいほうの）面
		allsel
		r,CNUM
		rmodif,CNUM,14,1e6		!14は接触コンダクタンスのこと CONTA174の リアルコンスタントのことらしい
		real,CNUM
		type,3		!要素ナンバー3のこと 3ということはtarge170
		cmsel,s,a_targ	!Cuの表面選択
		nsla,s,1	!選択されたエリアに関する節点の選択
		esurf		!既存の要素の自由表面に重ねて要素を生成とのこと
		type,5		!粗い樹脂と銅の接触
		cmsel,s,a_cont	!はんだ下面の選択
		nsla,s,1	!選択されたエリアに関する節点の選択
		esurf
		allsel

		CNUM=CNUM+1
		allsel
		!Create Contact Pair
		asel,s,,,A15+6*2+5	!左面を選択
		cm,a_cont,area	!a_contという名をつける
		asel,s,,,307	!Cu表面を選択
		cm,a_targ,area	!a_targという名をつける  TARGがくっつける相手の（通常大きいほうの）面
		allsel
		r,CNUM
		rmodif,CNUM,14,1e6		!14は接触コンダクタンスのこと CONTA174の リアルコンスタントのことらしい
		real,CNUM
		type,3		!要素ナンバー3のこと 3ということはtarge170
		cmsel,s,a_targ	!Cuの表面選択
		nsla,s,1	!選択されたエリアに関する節点の選択
		esurf		!既存の要素の自由表面に重ねて要素を生成とのこと
		type,5		!粗い樹脂と銅の接触
		cmsel,s,a_cont	!はんだ下面の選択
		nsla,s,1	!選択されたエリアに関する節点の選択
		esurf
		allsel

		CNUM=CNUM+1
		allsel
		!Create Contact Pair
		asel,s,,,A15+6*2+5	!左面を選択
		cm,a_cont,area	!a_contという名をつける
		asel,s,,,329	!Cu表面を選択
		cm,a_targ,area	!a_targという名をつける  TARGがくっつける相手の（通常大きいほうの）面
		allsel
		r,CNUM
		rmodif,CNUM,14,1e6		!14は接触コンダクタンスのこと CONTA174の リアルコンスタントのことらしい
		real,CNUM
		type,3		!要素ナンバー3のこと 3ということはtarge170
		cmsel,s,a_targ	!Cuの表面選択
		nsla,s,1	!選択されたエリアに関する節点の選択
		esurf		!既存の要素の自由表面に重ねて要素を生成とのこと
		type,8		!粗い樹脂と銅の接触
		cmsel,s,a_cont	!はんだ下面の選択
		nsla,s,1	!選択されたエリアに関する節点の選択
		esurf
		allsel

		CNUM=CNUM+1
		allsel
		!Create Contact Pair
		asel,s,,,A15+6*2+5	!左面を選択
		cm,a_cont,area	!a_contという名をつける
		asel,s,,,357	!Cu表面を選択
		cm,a_targ,area	!a_targという名をつける  TARGがくっつける相手の（通常大きいほうの）面
		allsel
		r,CNUM
		rmodif,CNUM,14,1e6		!14は接触コンダクタンスのこと CONTA174の リアルコンスタントのことらしい
		real,CNUM
		type,3		!要素ナンバー3のこと 3ということはtarge170
		cmsel,s,a_targ	!Cuの表面選択
		nsla,s,1	!選択されたエリアに関する節点の選択
		esurf		!既存の要素の自由表面に重ねて要素を生成とのこと
		type,8		!粗い樹脂と銅の接触
		cmsel,s,a_cont	!はんだ下面の選択
		nsla,s,1	!選択されたエリアに関する節点の選択
		esurf
		allsel

		CNUM=CNUM+1
		allsel
		!Create Contact Pair
		asel,s,,,A15+6*2+5	!左面を選択
		cm,a_cont,area	!a_contという名をつける
		asel,s,,,A14+6*2+3	!Cu表面を選択
		cm,a_targ,area	!a_targという名をつける  TARGがくっつける相手の（通常大きいほうの）面
		allsel
		r,CNUM
		rmodif,CNUM,14,1e6		!14は接触コンダクタンスのこと CONTA174の リアルコンスタントのことらしい
		real,CNUM
		type,3		!要素ナンバー3のこと 3ということはtarge170
		cmsel,s,a_targ	!Cuの表面選択
		nsla,s,1	!選択されたエリアに関する節点の選択
		esurf		!既存の要素の自由表面に重ねて要素を生成とのこと
		type,5		!粗い樹脂と銅の接触
		cmsel,s,a_cont	!はんだ下面の選択
		nsla,s,1	!選択されたエリアに関する節点の選択
		esurf

		CNUM=CNUM+1
		allsel
		!Create Contact Pair
		asel,s,,,A15+6*2+6	!左面を選択
		cm,a_cont,area	!a_contという名をつける
		asel,s,,,231	!Cu表面を選択
		cm,a_targ,area	!a_targという名をつける  TARGがくっつける相手の（通常大きいほうの）面
		allsel
		r,CNUM
		rmodif,CNUM,14,1e6		!14は接触コンダクタンスのこと CONTA174の リアルコンスタントのことらしい
		real,CNUM
		type,3		!要素ナンバー3のこと 3ということはtarge170
		cmsel,s,a_targ	!Cuの表面選択
		nsla,s,1	!選択されたエリアに関する節点の選択
		esurf		!既存の要素の自由表面に重ねて要素を生成とのこと
		type,5		!粗い樹脂と銅の接触
		cmsel,s,a_cont	!はんだ下面の選択
		nsla,s,1	!選択されたエリアに関する節点の選択
		esurf

		CNUM=CNUM+1
		allsel
		!Create Contact Pair
		asel,s,,,A15+6*2+6	!左面を選択
		cm,a_cont,area	!a_contという名をつける
		asel,s,,,213	!Cu表面を選択
		cm,a_targ,area	!a_targという名をつける  TARGがくっつける相手の（通常大きいほうの）面
		allsel
		r,CNUM
		rmodif,CNUM,14,1e6		!14は接触コンダクタンスのこと CONTA174の リアルコンスタントのことらしい
		real,CNUM
		type,3		!要素ナンバー3のこと 3ということはtarge170
		cmsel,s,a_targ	!Cuの表面選択
		nsla,s,1	!選択されたエリアに関する節点の選択
		esurf		!既存の要素の自由表面に重ねて要素を生成とのこと
		type,8		!粗い樹脂と銅の接触
		cmsel,s,a_cont	!はんだ下面の選択
		nsla,s,1	!選択されたエリアに関する節点の選択
		esurf

!DBUS左側の樹脂
		CNUM=CNUM+1
		allsel
		!Create Contact Pair
		asel,s,,,A15+6*3+1	!左面を選択
		cm,a_cont,area	!a_contという名をつける
		asel,s,,,24	!Cu表面を選択
		cm,a_targ,area	!a_targという名をつける  TARGがくっつける相手の（通常大きいほうの）面
		allsel
		r,CNUM
		rmodif,CNUM,14,1e6		!14は接触コンダクタンスのこと CONTA174の リアルコンスタントのことらしい
		real,CNUM
		type,3		!要素ナンバー3のこと 3ということはtarge170
		cmsel,s,a_targ	!Cuの表面選択
		nsla,s,1	!選択されたエリアに関する節点の選択
		esurf		!既存の要素の自由表面に重ねて要素を生成とのこと
		type,8		!粗い樹脂と銅の接触
		cmsel,s,a_cont	!はんだ下面の選択
		nsla,s,1	!選択されたエリアに関する節点の選択
		esurf

*DO,ii,1,3,1
		CNUM=CNUM+1
		allsel
		!Create Contact Pair
		asel,s,,,A15+6*3+1	!左面を選択
		cm,a_cont,area	!a_contという名をつける
		asel,s,,,48+(ii-1)*6	!Cu表面を選択
		cm,a_targ,area	!a_targという名をつける  TARGがくっつける相手の（通常大きいほうの）面
		allsel
		r,CNUM
		rmodif,CNUM,14,1e6		!14は接触コンダクタンスのこと CONTA174の リアルコンスタントのことらしい
		real,CNUM
		type,3		!要素ナンバー3のこと 3ということはtarge170
		cmsel,s,a_targ	!Cuの表面選択
		nsla,s,1	!選択されたエリアに関する節点の選択
		esurf		!既存の要素の自由表面に重ねて要素を生成とのこと
		type,8		!粗い樹脂と銅の接触
		cmsel,s,a_cont	!はんだ下面の選択
		nsla,s,1	!選択されたエリアに関する節点の選択
		esurf
*ENDDO

*DO,ii,1,2,1
		CNUM=CNUM+1
		allsel
		!Create Contact Pair
		asel,s,,,A15+6*3+1	!左面を選択
		cm,a_cont,area	!a_contという名をつける
		asel,s,,,78+(ii-1)*6	!Cu表面を選択
		cm,a_targ,area	!a_targという名をつける  TARGがくっつける相手の（通常大きいほうの）面
		allsel
		r,CNUM
		rmodif,CNUM,14,1e6		!14は接触コンダクタンスのこと CONTA174の リアルコンスタントのことらしい
		real,CNUM
		type,3		!要素ナンバー3のこと 3ということはtarge170
		cmsel,s,a_targ	!Cuの表面選択
		nsla,s,1	!選択されたエリアに関する節点の選択
		esurf		!既存の要素の自由表面に重ねて要素を生成とのこと
		type,5		!粗い樹脂と銅の接触
		cmsel,s,a_cont	!はんだ下面の選択
		nsla,s,1	!選択されたエリアに関する節点の選択
		esurf
*ENDDO

		CNUM=CNUM+1
		allsel
		!Create Contact Pair
		asel,s,,,A15+6*3+1	!左面を選択
		cm,a_cont,area	!a_contという名をつける
		asel,s,,,96	!Cu表面を選択
		cm,a_targ,area	!a_targという名をつける  TARGがくっつける相手の（通常大きいほうの）面
		allsel
		r,CNUM
		rmodif,CNUM,14,1e6		!14は接触コンダクタンスのこと CONTA174の リアルコンスタントのことらしい
		real,CNUM
		type,3		!要素ナンバー3のこと 3ということはtarge170
		cmsel,s,a_targ	!Cuの表面選択
		nsla,s,1	!選択されたエリアに関する節点の選択
		esurf		!既存の要素の自由表面に重ねて要素を生成とのこと
		type,5		!粗い樹脂と銅の接触
		cmsel,s,a_cont	!はんだ下面の選択
		nsla,s,1	!選択されたエリアに関する節点の選択
		esurf

*DO,ii,1,2,1
		CNUM=CNUM+1
		allsel
		!Create Contact Pair
		asel,s,,,A15+6*3+1	!左面を選択
		cm,a_cont,area	!a_contという名をつける
		asel,s,,,114+(ii-1)*6	!Cu表面を選択
		cm,a_targ,area	!a_targという名をつける  TARGがくっつける相手の（通常大きいほうの）面
		allsel
		r,CNUM
		rmodif,CNUM,14,1e6		!14は接触コンダクタンスのこと CONTA174の リアルコンスタントのことらしい
		real,CNUM
		type,3		!要素ナンバー3のこと 3ということはtarge170
		cmsel,s,a_targ	!Cuの表面選択
		nsla,s,1	!選択されたエリアに関する節点の選択
		esurf		!既存の要素の自由表面に重ねて要素を生成とのこと
		type,5		!粗い樹脂と銅の接触
		cmsel,s,a_cont	!はんだ下面の選択
		nsla,s,1	!選択されたエリアに関する節点の選択
		esurf
*ENDDO

*DO,ii,1,5,1
		CNUM=CNUM+1
		allsel
		!Create Contact Pair
		asel,s,,,A15+6*3+2	!左面を選択
		cm,a_cont,area	!a_contという名をつける
		asel,s,,,370+(ii-1)*6	!Cu表面を選択
		cm,a_targ,area	!a_targという名をつける  TARGがくっつける相手の（通常大きいほうの）面
		allsel
		r,CNUM
		rmodif,CNUM,14,1e6		!14は接触コンダクタンスのこと CONTA174の リアルコンスタントのことらしい
		real,CNUM
		type,3		!要素ナンバー3のこと 3ということはtarge170
		cmsel,s,a_targ	!Cuの表面選択
		nsla,s,1	!選択されたエリアに関する節点の選択
		esurf		!既存の要素の自由表面に重ねて要素を生成とのこと
		type,8		!粗い樹脂と銅の接触
		cmsel,s,a_cont	!はんだ下面の選択
		nsla,s,1	!選択されたエリアに関する節点の選択
		esurf
*ENDDO

*DO,ii,1,2,1
		CNUM=CNUM+1
		allsel
		!Create Contact Pair
		asel,s,,,A15+6*3+3	!左面を選択
		cm,a_cont,area	!a_contという名をつける
		asel,s,,,A15+4*6+(ii-1)*6*4+5	!Cu表面を選択
		cm,a_targ,area	!a_targという名をつける  TARGがくっつける相手の（通常大きいほうの）面
		allsel
		r,CNUM
		rmodif,CNUM,14,1e6		!14は接触コンダクタンスのこと CONTA174の リアルコンスタントのことらしい
		real,CNUM
		type,3		!要素ナンバー3のこと 3ということはtarge170
		cmsel,s,a_targ	!Cuの表面選択
		nsla,s,1	!選択されたエリアに関する節点の選択
		esurf		!既存の要素の自由表面に重ねて要素を生成とのこと
		type,5		!粗い樹脂と銅の接触
		cmsel,s,a_cont	!はんだ下面の選択
		nsla,s,1	!選択されたエリアに関する節点の選択
		esurf
*ENDDO
*DO,ii,1,2,1
		CNUM=CNUM+1
		allsel
		!Create Contact Pair
		asel,s,,,A15+6*3+4	!左面を選択
		cm,a_cont,area	!a_contという名をつける
		asel,s,,,A13+(ii-1)*6*4+2	!Cu表面を選択
		cm,a_targ,area	!a_targという名をつける  TARGがくっつける相手の（通常大きいほうの）面
		allsel
		r,CNUM
		rmodif,CNUM,14,1e6		!14は接触コンダクタンスのこと CONTA174の リアルコンスタントのことらしい
		real,CNUM
		type,3		!要素ナンバー3のこと 3ということはtarge170
		cmsel,s,a_targ	!Cuの表面選択
		nsla,s,1	!選択されたエリアに関する節点の選択
		esurf		!既存の要素の自由表面に重ねて要素を生成とのこと
		type,5		!粗い樹脂と銅の接触
		cmsel,s,a_cont	!はんだ下面の選択
		nsla,s,1	!選択されたエリアに関する節点の選択
		esurf
*ENDDO

		CNUM=CNUM+1
		allsel
		!Create Contact Pair
		asel,s,,,A15+6*3+5	!左面を選択
		cm,a_cont,area	!a_contという名をつける
		asel,s,,,A15+6*6+3	!Cu表面を選択
		cm,a_targ,area	!a_targという名をつける  TARGがくっつける相手の（通常大きいほうの）面
		allsel
		r,CNUM
		rmodif,CNUM,14,1e6		!14は接触コンダクタンスのこと CONTA174の リアルコンスタントのことらしい
		real,CNUM
		type,3		!要素ナンバー3のこと 3ということはtarge170
		cmsel,s,a_targ	!Cuの表面選択
		nsla,s,1	!選択されたエリアに関する節点の選択
		esurf		!既存の要素の自由表面に重ねて要素を生成とのこと
		type,5		!粗い樹脂と銅の接触
		cmsel,s,a_cont	!はんだ下面の選択
		nsla,s,1	!選択されたエリアに関する節点の選択
		esurf

*DO,ii,1,2,1
		CNUM=CNUM+1
		allsel
		!Create Contact Pair
		asel,s,,,A15+6*3+6	!左面を選択
		cm,a_cont,area	!a_contという名をつける
		asel,s,,,219+(ii-1)*24	!Cu表面を選択
		cm,a_targ,area	!a_targという名をつける  TARGがくっつける相手の（通常大きいほうの）面
		allsel
		r,CNUM
		rmodif,CNUM,14,1e6		!14は接触コンダクタンスのこと CONTA174の リアルコンスタントのことらしい
		real,CNUM
		type,3		!要素ナンバー3のこと 3ということはtarge170
		cmsel,s,a_targ	!Cuの表面選択
		nsla,s,1	!選択されたエリアに関する節点の選択
		esurf		!既存の要素の自由表面に重ねて要素を生成とのこと
		type,5		!粗い樹脂と銅の接触
		cmsel,s,a_cont	!はんだ下面の選択
		nsla,s,1	!選択されたエリアに関する節点の選択
		esurf
*ENDDO

*DO,ii,1,2,1
		CNUM=CNUM+1
		allsel
		!Create Contact Pair
		asel,s,,,A15+6*3+6	!左面を選択
		cm,a_cont,area	!a_contという名をつける
		asel,s,,,195+(ii-1)*12	!Cu表面を選択
		cm,a_targ,area	!a_targという名をつける  TARGがくっつける相手の（通常大きいほうの）面
		allsel
		r,CNUM
		rmodif,CNUM,14,1e6		!14は接触コンダクタンスのこと CONTA174の リアルコンスタントのことらしい
		real,CNUM
		type,3		!要素ナンバー3のこと 3ということはtarge170
		cmsel,s,a_targ	!Cuの表面選択
		nsla,s,1	!選択されたエリアに関する節点の選択
		esurf		!既存の要素の自由表面に重ねて要素を生成とのこと
		type,8		!粗い樹脂と銅の接触
		cmsel,s,a_cont	!はんだ下面の選択
		nsla,s,1	!選択されたエリアに関する節点の選択
		esurf
*ENDDO

!DBUS上の樹脂-------------
*DO,ii,1,2,1
		CNUM=CNUM+1
		allsel
		!Create Contact Pair
		asel,s,,,A15+6*4+1	!左面を選択
		cm,a_cont,area	!a_contという名をつける
		asel,s,,,332+(ii-1)*34	!Cu表面を選択
		cm,a_targ,area	!a_targという名をつける  TARGがくっつける相手の（通常大きいほうの）面
		allsel
		r,CNUM
		rmodif,CNUM,14,1e6		!14は接触コンダクタンスのこと CONTA174の リアルコンスタントのことらしい
		real,CNUM
		type,3		!要素ナンバー3のこと 3ということはtarge170
		cmsel,s,a_targ	!Cuの表面選択
		nsla,s,1	!選択されたエリアに関する節点の選択
		esurf		!既存の要素の自由表面に重ねて要素を生成とのこと
		type,8		!粗い樹脂と銅の接触
		cmsel,s,a_cont	!はんだ下面の選択
		nsla,s,1	!選択されたエリアに関する節点の選択
		esurf
*ENDDO

*DO,ii,1,2,1
		CNUM=CNUM+1
		allsel
		!Create Contact Pair
		asel,s,,,A15+6*4+1	!左面を選択
		cm,a_cont,area	!a_contという名をつける
		asel,s,,,A15+6*8+(ii-1)*6+6	!Cu表面を選択
		cm,a_targ,area	!a_targという名をつける  TARGがくっつける相手の（通常大きいほうの）面
		allsel
		r,CNUM
		rmodif,CNUM,14,1e6		!14は接触コンダクタンスのこと CONTA174の リアルコンスタントのことらしい
		real,CNUM
		type,3		!要素ナンバー3のこと 3ということはtarge170
		cmsel,s,a_targ	!Cuの表面選択
		nsla,s,1	!選択されたエリアに関する節点の選択
		esurf		!既存の要素の自由表面に重ねて要素を生成とのこと
		type,5		!粗い樹脂と銅の接触
		cmsel,s,a_cont	!はんだ下面の選択
		nsla,s,1	!選択されたエリアに関する節点の選択
		esurf
*ENDDO

		CNUM=CNUM+1
		allsel
		!Create Contact Pair
		asel,s,,,A15+6*4+3	!左面を選択
		cm,a_cont,area	!a_contという名をつける
		asel,s,,,A15+6*5+5	!Cu表面を選択
		cm,a_targ,area	!a_targという名をつける  TARGがくっつける相手の（通常大きいほうの）面
		allsel
		r,CNUM
		rmodif,CNUM,14,1e6		!14は接触コンダクタンスのこと CONTA174の リアルコンスタントのことらしい
		real,CNUM
		type,3		!要素ナンバー3のこと 3ということはtarge170
		cmsel,s,a_targ	!Cuの表面選択
		nsla,s,1	!選択されたエリアに関する節点の選択
		esurf		!既存の要素の自由表面に重ねて要素を生成とのこと
		type,5		!粗い樹脂と銅の接触
		cmsel,s,a_cont	!はんだ下面の選択
		nsla,s,1	!選択されたエリアに関する節点の選択
		esurf

		CNUM=CNUM+1
		allsel
		!Create Contact Pair
		asel,s,,,A15+6*4+4	!左面を選択
		cm,a_cont,area	!a_contという名をつける
		asel,s,,,A13+2	!Cu表面を選択
		cm,a_targ,area	!a_targという名をつける  TARGがくっつける相手の（通常大きいほうの）面
		allsel
		r,CNUM
		rmodif,CNUM,14,1e6		!14は接触コンダクタンスのこと CONTA174の リアルコンスタントのことらしい
		real,CNUM
		type,3		!要素ナンバー3のこと 3ということはtarge170
		cmsel,s,a_targ	!Cuの表面選択
		nsla,s,1	!選択されたエリアに関する節点の選択
		esurf		!既存の要素の自由表面に重ねて要素を生成とのこと
		type,5		!粗い樹脂と銅の接触
		cmsel,s,a_cont	!はんだ下面の選択
		nsla,s,1	!選択されたエリアに関する節点の選択
		esurf

*DO,ii,1,2,1
		CNUM=CNUM+1
		allsel
		!Create Contact Pair
		asel,s,,,A15+6*4+4	!左面を選択
		cm,a_cont,area	!a_contという名をつける
		asel,s,,,A13+6*4+(ii-1)*6*2+2	!Cu表面を選択
		cm,a_targ,area	!a_targという名をつける  TARGがくっつける相手の（通常大きいほうの）面
		allsel
		r,CNUM
		rmodif,CNUM,14,1e6		!14は接触コンダクタンスのこと CONTA174の リアルコンスタントのことらしい
		real,CNUM
		type,3		!要素ナンバー3のこと 3ということはtarge170
		cmsel,s,a_targ	!Cuの表面選択
		nsla,s,1	!選択されたエリアに関する節点の選択
		esurf		!既存の要素の自由表面に重ねて要素を生成とのこと
		type,5		!粗い樹脂と銅の接触
		cmsel,s,a_cont	!はんだ下面の選択
		nsla,s,1	!選択されたエリアに関する節点の選択
		esurf
*ENDDO
*DO,ii,1,2,1
		CNUM=CNUM+1
		allsel
		!Create Contact Pair
		asel,s,,,A15+6*4+6	!左面を選択
		cm,a_cont,area	!a_contという名をつける
		asel,s,,,219+(ii-1)*24	!Cu表面を選択
		cm,a_targ,area	!a_targという名をつける  TARGがくっつける相手の（通常大きいほうの）面
		allsel
		r,CNUM
		rmodif,CNUM,14,1e6		!14は接触コンダクタンスのこと CONTA174の リアルコンスタントのことらしい
		real,CNUM
		type,3		!要素ナンバー3のこと 3ということはtarge170
		cmsel,s,a_targ	!Cuの表面選択
		nsla,s,1	!選択されたエリアに関する節点の選択
		esurf		!既存の要素の自由表面に重ねて要素を生成とのこと
		type,5		!粗い樹脂と銅の接触
		cmsel,s,a_cont	!はんだ下面の選択
		nsla,s,1	!選択されたエリアに関する節点の選択
		esurf
*ENDDO

		CNUM=CNUM+1
		allsel
		!Create Contact Pair
		asel,s,,,A15+6*4+6	!左面を選択
		cm,a_cont,area	!a_contという名をつける
		asel,s,,,207	!Cu表面を選択
		cm,a_targ,area	!a_targという名をつける  TARGがくっつける相手の（通常大きいほうの）面
		allsel
		r,CNUM
		rmodif,CNUM,14,1e6		!14は接触コンダクタンスのこと CONTA174の リアルコンスタントのことらしい
		real,CNUM
		type,3		!要素ナンバー3のこと 3ということはtarge170
		cmsel,s,a_targ	!Cuの表面選択
		nsla,s,1	!選択されたエリアに関する節点の選択
		esurf		!既存の要素の自由表面に重ねて要素を生成とのこと
		type,8		!粗い樹脂と銅の接触
		cmsel,s,a_cont	!はんだ下面の選択
		nsla,s,1	!選択されたエリアに関する節点の選択
		esurf

!DBUS右側の樹脂-----------
*DO,ii,1,3,1
		CNUM=CNUM+1
		allsel
		!Create Contact Pair
		asel,s,,,A15+6*5+1	!左面を選択
		cm,a_cont,area	!a_contという名をつける
		asel,s,,,78+(ii-1)*12	!Cu表面を選択
		cm,a_targ,area	!a_targという名をつける  TARGがくっつける相手の（通常大きいほうの）面
		allsel
		r,CNUM
		rmodif,CNUM,14,1e6		!14は接触コンダクタンスのこと CONTA174の リアルコンスタントのことらしい
		real,CNUM
		type,3		!要素ナンバー3のこと 3ということはtarge170
		cmsel,s,a_targ	!Cuの表面選択
		nsla,s,1	!選択されたエリアに関する節点の選択
		esurf		!既存の要素の自由表面に重ねて要素を生成とのこと
		type,5		!粗い樹脂と銅の接触
		cmsel,s,a_cont	!はんだ下面の選択
		nsla,s,1	!選択されたエリアに関する節点の選択
		esurf
*ENDDO

*DO,ii,1,2,1
		CNUM=CNUM+1
		allsel
		!Create Contact Pair
		asel,s,,,A15+6*5+1	!左面を選択
		cm,a_cont,area	!a_contという名をつける
		asel,s,,,132+(ii-1)*6	!Cu表面を選択
		cm,a_targ,area	!a_targという名をつける  TARGがくっつける相手の（通常大きいほうの）面
		allsel
		r,CNUM
		rmodif,CNUM,14,1e6		!14は接触コンダクタンスのこと CONTA174の リアルコンスタントのことらしい
		real,CNUM
		type,3		!要素ナンバー3のこと 3ということはtarge170
		cmsel,s,a_targ	!Cuの表面選択
		nsla,s,1	!選択されたエリアに関する節点の選択
		esurf		!既存の要素の自由表面に重ねて要素を生成とのこと
		type,5		!粗い樹脂と銅の接触
		cmsel,s,a_cont	!はんだ下面の選択
		nsla,s,1	!選択されたエリアに関する節点の選択
		esurf
*ENDDO

*DO,ii,1,2,1
		CNUM=CNUM+1
		allsel
		!Create Contact Pair
		asel,s,,,A15+6*5+1	!左面を選択
		cm,a_cont,area	!a_contという名をつける
		asel,s,,,24+(ii-1)*12	!Cu表面を選択
		cm,a_targ,area	!a_targという名をつける  TARGがくっつける相手の（通常大きいほうの）面
		allsel
		r,CNUM
		rmodif,CNUM,14,1e6		!14は接触コンダクタンスのこと CONTA174の リアルコンスタントのことらしい
		real,CNUM
		type,3		!要素ナンバー3のこと 3ということはtarge170
		cmsel,s,a_targ	!Cuの表面選択
		nsla,s,1	!選択されたエリアに関する節点の選択
		esurf		!既存の要素の自由表面に重ねて要素を生成とのこと
		type,8		!粗い樹脂と銅の接触
		cmsel,s,a_cont	!はんだ下面の選択
		nsla,s,1	!選択されたエリアに関する節点の選択
		esurf
*ENDDO

*DO,ii,1,2,1
		CNUM=CNUM+1
		allsel
		!Create Contact Pair
		asel,s,,,A15+6*5+1	!左面を選択
		cm,a_cont,area	!a_contという名をつける
		asel,s,,,66+(ii-1)*6	!Cu表面を選択
		cm,a_targ,area	!a_targという名をつける  TARGがくっつける相手の（通常大きいほうの）面
		allsel
		r,CNUM
		rmodif,CNUM,14,1e6		!14は接触コンダクタンスのこと CONTA174の リアルコンスタントのことらしい
		real,CNUM
		type,3		!要素ナンバー3のこと 3ということはtarge170
		cmsel,s,a_targ	!Cuの表面選択
		nsla,s,1	!選択されたエリアに関する節点の選択
		esurf		!既存の要素の自由表面に重ねて要素を生成とのこと
		type,8		!粗い樹脂と銅の接触
		cmsel,s,a_cont	!はんだ下面の選択
		nsla,s,1	!選択されたエリアに関する節点の選択
		esurf
*ENDDO

*DO,ii,1,3,1
		CNUM=CNUM+1
		allsel
		!Create Contact Pair
		asel,s,,,A15+6*5+2	!左面を選択
		cm,a_cont,area	!a_contという名をつける
		asel,s,,,400+(ii-1)*6	!Cu表面を選択
		cm,a_targ,area	!a_targという名をつける  TARGがくっつける相手の（通常大きいほうの）面
		allsel
		r,CNUM
		rmodif,CNUM,14,1e6		!14は接触コンダクタンスのこと CONTA174の リアルコンスタントのことらしい
		real,CNUM
		type,3		!要素ナンバー3のこと 3ということはtarge170
		cmsel,s,a_targ	!Cuの表面選択
		nsla,s,1	!選択されたエリアに関する節点の選択
		esurf		!既存の要素の自由表面に重ねて要素を生成とのこと
		type,8		!粗い樹脂と銅の接触
		cmsel,s,a_cont	!はんだ下面の選択
		nsla,s,1	!選択されたエリアに関する節点の選択
		esurf
*ENDDO

		CNUM=CNUM+1
		allsel
		!Create Contact Pair
		asel,s,,,A15+6*5+3	!左面を選択
		cm,a_cont,area	!a_contという名をつける
		asel,s,,,A15+6*7+5	!Cu表面を選択
		cm,a_targ,area	!a_targという名をつける  TARGがくっつける相手の（通常大きいほうの）面
		allsel
		r,CNUM
		rmodif,CNUM,14,1e6		!14は接触コンダクタンスのこと CONTA174の リアルコンスタントのことらしい
		real,CNUM
		type,3		!要素ナンバー3のこと 3ということはtarge170
		cmsel,s,a_targ	!Cuの表面選択
		nsla,s,1	!選択されたエリアに関する節点の選択
		esurf		!既存の要素の自由表面に重ねて要素を生成とのこと
		type,8		!粗い樹脂と銅の接触
		cmsel,s,a_cont	!はんだ下面の選択
		nsla,s,1	!選択されたエリアに関する節点の選択
		esurf

*DO,ii,1,2,1
		CNUM=CNUM+1
		allsel
		!Create Contact Pair
		asel,s,,,A15+6*5+4	!左面を選択
		cm,a_cont,area	!a_contという名をつける
		asel,s,,,A13+(ii-1)*6*6+2	!Cu表面を選択
		cm,a_targ,area	!a_targという名をつける  TARGがくっつける相手の（通常大きいほうの）面
		allsel
		r,CNUM
		rmodif,CNUM,14,1e6		!14は接触コンダクタンスのこと CONTA174の リアルコンスタントのことらしい
		real,CNUM
		type,3		!要素ナンバー3のこと 3ということはtarge170
		cmsel,s,a_targ	!Cuの表面選択
		nsla,s,1	!選択されたエリアに関する節点の選択
		esurf		!既存の要素の自由表面に重ねて要素を生成とのこと
		type,5		!粗い樹脂と銅の接触
		cmsel,s,a_cont	!はんだ下面の選択
		nsla,s,1	!選択されたエリアに関する節点の選択
		esurf
*ENDDO

		CNUM=CNUM+1
		allsel
		!Create Contact Pair
		asel,s,,,A15+6*5+5	!左面を選択
		cm,a_cont,area	!a_contという名をつける
		asel,s,,,313	!Cu表面を選択
		cm,a_targ,area	!a_targという名をつける  TARGがくっつける相手の（通常大きいほうの）面
		allsel
		r,CNUM
		rmodif,CNUM,14,1e6		!14は接触コンダクタンスのこと CONTA174の リアルコンスタントのことらしい
		real,CNUM
		type,3		!要素ナンバー3のこと 3ということはtarge170
		cmsel,s,a_targ	!Cuの表面選択
		nsla,s,1	!選択されたエリアに関する節点の選択
		esurf		!既存の要素の自由表面に重ねて要素を生成とのこと
		type,5		!粗い樹脂と銅の接触
		cmsel,s,a_cont	!はんだ下面の選択
		nsla,s,1	!選択されたエリアに関する節点の選択
		esurf

		CNUM=CNUM+1
		allsel
		!Create Contact Pair
		asel,s,,,A15+6*5+5	!左面を選択
		cm,a_cont,area	!a_contという名をつける
		asel,s,,,334	!Cu表面を選択
		cm,a_targ,area	!a_targという名をつける  TARGがくっつける相手の（通常大きいほうの）面
		allsel
		r,CNUM
		rmodif,CNUM,14,1e6		!14は接触コンダクタンスのこと CONTA174の リアルコンスタントのことらしい
		real,CNUM
		type,3		!要素ナンバー3のこと 3ということはtarge170
		cmsel,s,a_targ	!Cuの表面選択
		nsla,s,1	!選択されたエリアに関する節点の選択
		esurf		!既存の要素の自由表面に重ねて要素を生成とのこと
		type,8		!粗い樹脂と銅の接触
		cmsel,s,a_cont	!はんだ下面の選択
		nsla,s,1	!選択されたエリアに関する節点の選択
		esurf

		CNUM=CNUM+1
		allsel
		!Create Contact Pair
		asel,s,,,A15+6*5+5	!左面を選択
		cm,a_cont,area	!a_contという名をつける
		asel,s,,,A15+6*9+3	!Cu表面を選択
		cm,a_targ,area	!a_targという名をつける  TARGがくっつける相手の（通常大きいほうの）面
		allsel
		r,CNUM
		rmodif,CNUM,14,1e6		!14は接触コンダクタンスのこと CONTA174の リアルコンスタントのことらしい
		real,CNUM
		type,3		!要素ナンバー3のこと 3ということはtarge170
		cmsel,s,a_targ	!Cuの表面選択
		nsla,s,1	!選択されたエリアに関する節点の選択
		esurf		!既存の要素の自由表面に重ねて要素を生成とのこと
		type,5		!粗い樹脂と銅の接触
		cmsel,s,a_cont	!はんだ下面の選択
		nsla,s,1	!選択されたエリアに関する節点の選択
		esurf

		CNUM=CNUM+1
		allsel
		!Create Contact Pair
		asel,s,,,A15+6*5+6	!左面を選択
		cm,a_cont,area	!a_contという名をつける
		asel,s,,,219	!Cu表面を選択
		cm,a_targ,area	!a_targという名をつける  TARGがくっつける相手の（通常大きいほうの）面
		allsel
		r,CNUM
		rmodif,CNUM,14,1e6		!14は接触コンダクタンスのこと CONTA174の リアルコンスタントのことらしい
		real,CNUM
		type,3		!要素ナンバー3のこと 3ということはtarge170
		cmsel,s,a_targ	!Cuの表面選択
		nsla,s,1	!選択されたエリアに関する節点の選択
		esurf		!既存の要素の自由表面に重ねて要素を生成とのこと
		type,5		!粗い樹脂と銅の接触
		cmsel,s,a_cont	!はんだ下面の選択
		nsla,s,1	!選択されたエリアに関する節点の選択
		esurf

*DO,ii,1,2,1
		CNUM=CNUM+1
		allsel
		!Create Contact Pair
		asel,s,,,A15+6*5+6	!左面を選択
		cm,a_cont,area	!a_contという名をつける
		asel,s,,,207+(ii-1)*6	!Cu表面を選択
		cm,a_targ,area	!a_targという名をつける  TARGがくっつける相手の（通常大きいほうの）面
		allsel
		r,CNUM
		rmodif,CNUM,14,1e6		!14は接触コンダクタンスのこと CONTA174の リアルコンスタントのことらしい
		real,CNUM
		type,3		!要素ナンバー3のこと 3ということはtarge170
		cmsel,s,a_targ	!Cuの表面選択
		nsla,s,1	!選択されたエリアに関する節点の選択
		esurf		!既存の要素の自由表面に重ねて要素を生成とのこと
		type,8		!粗い樹脂と銅の接触
		cmsel,s,a_cont	!はんだ下面の選択
		nsla,s,1	!選択されたエリアに関する節点の選択
		esurf
*ENDDO

!左の縁側樹脂の接合
		CNUM=CNUM+1
		allsel
		!Create Contact Pair
		asel,s,,,A15+6*6+1	!左面を選択
		cm,a_cont,area	!a_contという名をつける
		asel,s,,,78	!Cu表面を選択
		cm,a_targ,area	!a_targという名をつける  TARGがくっつける相手の（通常大きいほうの）面
		allsel
		r,CNUM
		rmodif,CNUM,14,1e6		!14は接触コンダクタンスのこと CONTA174の リアルコンスタントのことらしい
		real,CNUM
		type,3		!要素ナンバー3のこと 3ということはtarge170
		cmsel,s,a_targ	!Cuの表面選択
		nsla,s,1	!選択されたエリアに関する節点の選択
		esurf		!既存の要素の自由表面に重ねて要素を生成とのこと
		type,5		!粗い樹脂と銅の接触
		cmsel,s,a_cont	!はんだ下面の選択
		nsla,s,1	!選択されたエリアに関する節点の選択
		esurf

*DO,ii,1,2,1
		CNUM=CNUM+1
		allsel
		!Create Contact Pair
		asel,s,,,A15+6*6+1	!左面を選択
		cm,a_cont,area	!a_contという名をつける
		asel,s,,,150+(ii-1)*6	!Cu表面を選択
		cm,a_targ,area	!a_targという名をつける  TARGがくっつける相手の（通常大きいほうの）面
		allsel
		r,CNUM
		rmodif,CNUM,14,1e6		!14は接触コンダクタンスのこと CONTA174の リアルコンスタントのことらしい
		real,CNUM
		type,3		!要素ナンバー3のこと 3ということはtarge170
		cmsel,s,a_targ	!Cuの表面選択
		nsla,s,1	!選択されたエリアに関する節点の選択
		esurf		!既存の要素の自由表面に重ねて要素を生成とのこと
		type,5		!粗い樹脂と銅の接触
		cmsel,s,a_cont	!はんだ下面の選択
		nsla,s,1	!選択されたエリアに関する節点の選択
		esurf
*ENDDO

*DO,ii,1,2,1
		CNUM=CNUM+1
		allsel
		!Create Contact Pair
		asel,s,,,A15+6*6+3	!左面を選択
		cm,a_cont,area	!a_contという名をつける
		asel,s,,,A13+6*4+(ii-1)*6+5	!Cu表面を選択
		cm,a_targ,area	!a_targという名をつける  TARGがくっつける相手の（通常大きいほうの）面
		allsel
		r,CNUM
		rmodif,CNUM,14,1e6		!14は接触コンダクタンスのこと CONTA174の リアルコンスタントのことらしい
		real,CNUM
		type,3		!要素ナンバー3のこと 3ということはtarge170
		cmsel,s,a_targ	!Cuの表面選択
		nsla,s,1	!選択されたエリアに関する節点の選択
		esurf		!既存の要素の自由表面に重ねて要素を生成とのこと
		type,5		!粗い樹脂と銅の接触
		cmsel,s,a_cont	!はんだ下面の選択
		nsla,s,1	!選択されたエリアに関する節点の選択
		esurf
*ENDDO

*DO,ii,1,2,1
		CNUM=CNUM+1
		allsel
		!Create Contact Pair
		asel,s,,,A15+6*6+3	!左面を選択
		cm,a_cont,area	!a_contという名をつける
		asel,s,,,A12+(ii-1)*6+5	!Cu表面を選択
		cm,a_targ,area	!a_targという名をつける  TARGがくっつける相手の（通常大きいほうの）面
		allsel
		r,CNUM
		rmodif,CNUM,14,1e6		!14は接触コンダクタンスのこと CONTA174の リアルコンスタントのことらしい
		real,CNUM
		type,3		!要素ナンバー3のこと 3ということはtarge170
		cmsel,s,a_targ	!Cuの表面選択
		nsla,s,1	!選択されたエリアに関する節点の選択
		esurf		!既存の要素の自由表面に重ねて要素を生成とのこと
		type,5		!粗い樹脂と銅の接触
		cmsel,s,a_cont	!はんだ下面の選択
		nsla,s,1	!選択されたエリアに関する節点の選択
		esurf
*ENDDO

		CNUM=CNUM+1
		allsel
		!Create Contact Pair
		asel,s,,,A15+6*6+3	!左面を選択
		cm,a_cont,area	!a_contという名をつける
		asel,s,,,A11+5	!Cu表面を選択
		cm,a_targ,area	!a_targという名をつける  TARGがくっつける相手の（通常大きいほうの）面
		allsel
		r,CNUM
		rmodif,CNUM,14,1e6		!14は接触コンダクタンスのこと CONTA174の リアルコンスタントのことらしい
		real,CNUM
		type,3		!要素ナンバー3のこと 3ということはtarge170
		cmsel,s,a_targ	!Cuの表面選択
		nsla,s,1	!選択されたエリアに関する節点の選択
		esurf		!既存の要素の自由表面に重ねて要素を生成とのこと
		type,5		!粗い樹脂と銅の接触
		cmsel,s,a_cont	!はんだ下面の選択
		nsla,s,1	!選択されたエリアに関する節点の選択
		esurf

		CNUM=CNUM+1
		allsel
		!Create Contact Pair
		asel,s,,,A15+6*6+6	!左面を選択
		cm,a_cont,area	!a_contという名をつける
		asel,s,,,219	!Cu表面を選択
		cm,a_targ,area	!a_targという名をつける  TARGがくっつける相手の（通常大きいほうの）面
		allsel
		r,CNUM
		rmodif,CNUM,14,1e6		!14は接触コンダクタンスのこと CONTA174の リアルコンスタントのことらしい
		real,CNUM
		type,3		!要素ナンバー3のこと 3ということはtarge170
		cmsel,s,a_targ	!Cuの表面選択
		nsla,s,1	!選択されたエリアに関する節点の選択
		esurf		!既存の要素の自由表面に重ねて要素を生成とのこと
		type,5		!粗い樹脂と銅の接触
		cmsel,s,a_cont	!はんだ下面の選択
		nsla,s,1	!選択されたエリアに関する節点の選択
		esurf

*DO,ii,1,2,1
		CNUM=CNUM+1
		allsel
		!Create Contact Pair
		asel,s,,,A15+6*6+6	!左面を選択
		cm,a_cont,area	!a_contという名をつける
		asel,s,,,231+(ii-1)*6	!Cu表面を選択
		cm,a_targ,area	!a_targという名をつける  TARGがくっつける相手の（通常大きいほうの）面
		allsel
		r,CNUM
		rmodif,CNUM,14,1e6		!14は接触コンダクタンスのこと CONTA174の リアルコンスタントのことらしい
		real,CNUM
		type,3		!要素ナンバー3のこと 3ということはtarge170
		cmsel,s,a_targ	!Cuの表面選択
		nsla,s,1	!選択されたエリアに関する節点の選択
		esurf		!既存の要素の自由表面に重ねて要素を生成とのこと
		type,5		!粗い樹脂と銅の接触
		cmsel,s,a_cont	!はんだ下面の選択
		nsla,s,1	!選択されたエリアに関する節点の選択
		esurf
*ENDDO

!右側縁側-------------------
*DO,ii,1,2,1
		CNUM=CNUM+1
		allsel
		!Create Contact Pair
		asel,s,,,A15+6*7+1	!左面を選択
		cm,a_cont,area	!a_contという名をつける
		asel,s,,,144+(ii-1)*6	!Cu表面を選択
		cm,a_targ,area	!a_targという名をつける  TARGがくっつける相手の（通常大きいほうの）面
		allsel
		r,CNUM
		rmodif,CNUM,14,1e6		!14は接触コンダクタンスのこと CONTA174の リアルコンスタントのことらしい
		real,CNUM
		type,3		!要素ナンバー3のこと 3ということはtarge170
		cmsel,s,a_targ	!Cuの表面選択
		nsla,s,1	!選択されたエリアに関する節点の選択
		esurf		!既存の要素の自由表面に重ねて要素を生成とのこと
		type,5		!粗い樹脂と銅の接触
		cmsel,s,a_cont	!はんだ下面の選択
		nsla,s,1	!選択されたエリアに関する節点の選択
		esurf
*ENDDO

		CNUM=CNUM+1
		allsel
		!Create Contact Pair
		asel,s,,,A15+6*7+1	!左面を選択
		cm,a_cont,area	!a_contという名をつける
		asel,s,,,78	!Cu表面を選択
		cm,a_targ,area	!a_targという名をつける  TARGがくっつける相手の（通常大きいほうの）面
		allsel
		r,CNUM
		rmodif,CNUM,14,1e6		!14は接触コンダクタンスのこと CONTA174の リアルコンスタントのことらしい
		real,CNUM
		type,3		!要素ナンバー3のこと 3ということはtarge170
		cmsel,s,a_targ	!Cuの表面選択
		nsla,s,1	!選択されたエリアに関する節点の選択
		esurf		!既存の要素の自由表面に重ねて要素を生成とのこと
		type,5		!粗い樹脂と銅の接触
		cmsel,s,a_cont	!はんだ下面の選択
		nsla,s,1	!選択されたエリアに関する節点の選択
		esurf

*DO,ii,1,2,1
		CNUM=CNUM+1
		allsel
		!Create Contact Pair
		asel,s,,,A15+6*7+5	!左面を選択
		cm,a_cont,area	!a_contという名をつける
		asel,s,,,A13+6*6+(ii-1)*6+3	!Cu表面を選択
		cm,a_targ,area	!a_targという名をつける  TARGがくっつける相手の（通常大きいほうの）面
		allsel
		r,CNUM
		rmodif,CNUM,14,1e6		!14は接触コンダクタンスのこと CONTA174の リアルコンスタントのことらしい
		real,CNUM
		type,3		!要素ナンバー3のこと 3ということはtarge170
		cmsel,s,a_targ	!Cuの表面選択
		nsla,s,1	!選択されたエリアに関する節点の選択
		esurf		!既存の要素の自由表面に重ねて要素を生成とのこと
		type,5		!粗い樹脂と銅の接触
		cmsel,s,a_cont	!はんだ下面の選択
		nsla,s,1	!選択されたエリアに関する節点の選択
		esurf
*ENDDO

*DO,ii,1,2,1
		CNUM=CNUM+1
		allsel
		!Create Contact Pair
		asel,s,,,A15+6*7+5	!左面を選択
		cm,a_cont,area	!a_contという名をつける
		asel,s,,,A12+6*6+(ii-1)*6+3	!Cu表面を選択
		cm,a_targ,area	!a_targという名をつける  TARGがくっつける相手の（通常大きいほうの）面
		allsel
		r,CNUM
		rmodif,CNUM,14,1e6		!14は接触コンダクタンスのこと CONTA174の リアルコンスタントのことらしい
		real,CNUM
		type,3		!要素ナンバー3のこと 3ということはtarge170
		cmsel,s,a_targ	!Cuの表面選択
		nsla,s,1	!選択されたエリアに関する節点の選択
		esurf		!既存の要素の自由表面に重ねて要素を生成とのこと
		type,5		!粗い樹脂と銅の接触
		cmsel,s,a_cont	!はんだ下面の選択
		nsla,s,1	!選択されたエリアに関する節点の選択
		esurf
*ENDDO

		CNUM=CNUM+1
		allsel
		!Create Contact Pair
		asel,s,,,A15+6*7+5	!左面を選択
		cm,a_cont,area	!a_contという名をつける
		asel,s,,,A11+6+3	!Cu表面を選択
		cm,a_targ,area	!a_targという名をつける  TARGがくっつける相手の（通常大きいほうの）面
		allsel
		r,CNUM
		rmodif,CNUM,14,1e6		!14は接触コンダクタンスのこと CONTA174の リアルコンスタントのことらしい
		real,CNUM
		type,3		!要素ナンバー3のこと 3ということはtarge170
		cmsel,s,a_targ	!Cuの表面選択
		nsla,s,1	!選択されたエリアに関する節点の選択
		esurf		!既存の要素の自由表面に重ねて要素を生成とのこと
		type,5		!粗い樹脂と銅の接触
		cmsel,s,a_cont	!はんだ下面の選択
		nsla,s,1	!選択されたエリアに関する節点の選択
		esurf

*DO,ii,1,3,1
		CNUM=CNUM+1
		allsel
		!Create Contact Pair
		asel,s,,,A15+6*7+6	!左面を選択
		cm,a_cont,area	!a_contという名をつける
		asel,s,,,219+(ii-1)*6	!Cu表面を選択
		cm,a_targ,area	!a_targという名をつける  TARGがくっつける相手の（通常大きいほうの）面
		allsel
		r,CNUM
		rmodif,CNUM,14,1e6		!14は接触コンダクタンスのこと CONTA174の リアルコンスタントのことらしい
		real,CNUM
		type,3		!要素ナンバー3のこと 3ということはtarge170
		cmsel,s,a_targ	!Cuの表面選択
		nsla,s,1	!選択されたエリアに関する節点の選択
		esurf		!既存の要素の自由表面に重ねて要素を生成とのこと
		type,5		!粗い樹脂と銅の接触
		cmsel,s,a_cont	!はんだ下面の選択
		nsla,s,1	!選択されたエリアに関する節点の選択
		esurf
*ENDDO

!DBUS横　小樹脂　左側
		CNUM=CNUM+1
		allsel
		!Create Contact Pair
		asel,s,,,A15+6*8+1	!左面を選択
		cm,a_cont,area	!a_contという名をつける
		asel,s,,,78	!Cu表面を選択
		cm,a_targ,area	!a_targという名をつける  TARGがくっつける相手の（通常大きいほうの）面
		allsel
		r,CNUM
		rmodif,CNUM,14,1e6		!14は接触コンダクタンスのこと CONTA174の リアルコンスタントのことらしい
		real,CNUM
		type,3		!要素ナンバー3のこと 3ということはtarge170
		cmsel,s,a_targ	!Cuの表面選択
		nsla,s,1	!選択されたエリアに関する節点の選択
		esurf		!既存の要素の自由表面に重ねて要素を生成とのこと
		type,5		!粗い樹脂と銅の接触
		cmsel,s,a_cont	!はんだ下面の選択
		nsla,s,1	!選択されたエリアに関する節点の選択
		esurf

		CNUM=CNUM+1
		allsel
		!Create Contact Pair
		asel,s,,,A15+6*8+1	!左面を選択
		cm,a_cont,area	!a_contという名をつける
		asel,s,,,24	!Cu表面を選択
		cm,a_targ,area	!a_targという名をつける  TARGがくっつける相手の（通常大きいほうの）面
		allsel
		r,CNUM
		rmodif,CNUM,14,1e6		!14は接触コンダクタンスのこと CONTA174の リアルコンスタントのことらしい
		real,CNUM
		type,3		!要素ナンバー3のこと 3ということはtarge170
		cmsel,s,a_targ	!Cuの表面選択
		nsla,s,1	!選択されたエリアに関する節点の選択
		esurf		!既存の要素の自由表面に重ねて要素を生成とのこと
		type,8		!粗い樹脂と銅の接触
		cmsel,s,a_cont	!はんだ下面の選択
		nsla,s,1	!選択されたエリアに関する節点の選択
		esurf

		CNUM=CNUM+1
		allsel
		!Create Contact Pair
		asel,s,,,A15+6*8+3	!左面を選択
		cm,a_cont,area	!a_contという名をつける
		asel,s,,,A14+6*3+5	!Cu表面を選択
		cm,a_targ,area	!a_targという名をつける  TARGがくっつける相手の（通常大きいほうの）面
		allsel
		r,CNUM
		rmodif,CNUM,14,1e6		!14は接触コンダクタンスのこと CONTA174の リアルコンスタントのことらしい
		real,CNUM
		type,3		!要素ナンバー3のこと 3ということはtarge170
		cmsel,s,a_targ	!Cuの表面選択
		nsla,s,1	!選択されたエリアに関する節点の選択
		esurf		!既存の要素の自由表面に重ねて要素を生成とのこと
		type,5		!粗い樹脂と銅の接触
		cmsel,s,a_cont	!はんだ下面の選択
		nsla,s,1	!選択されたエリアに関する節点の選択
		esurf

		CNUM=CNUM+1
		allsel
		!Create Contact Pair
		asel,s,,,A15+6*8+3	!左面を選択
		cm,a_cont,area	!a_contという名をつける
		asel,s,,,365	!Cu表面を選択
		cm,a_targ,area	!a_targという名をつける  TARGがくっつける相手の（通常大きいほうの）面
		allsel
		r,CNUM
		rmodif,CNUM,14,1e6		!14は接触コンダクタンスのこと CONTA174の リアルコンスタントのことらしい
		real,CNUM
		type,3		!要素ナンバー3のこと 3ということはtarge170
		cmsel,s,a_targ	!Cuの表面選択
		nsla,s,1	!選択されたエリアに関する節点の選択
		esurf		!既存の要素の自由表面に重ねて要素を生成とのこと
		type,8		!粗い樹脂と銅の接触
		cmsel,s,a_cont	!はんだ下面の選択
		nsla,s,1	!選択されたエリアに関する節点の選択
		esurf

		CNUM=CNUM+1
		allsel
		!Create Contact Pair
		asel,s,,,A15+6*8+4	!左面を選択
		cm,a_cont,area	!a_contという名をつける
		asel,s,,,333	!Cu表面を選択
		cm,a_targ,area	!a_targという名をつける  TARGがくっつける相手の（通常大きいほうの）面
		allsel
		r,CNUM
		rmodif,CNUM,14,1e6		!14は接触コンダクタンスのこと CONTA174の リアルコンスタントのことらしい
		real,CNUM
		type,3		!要素ナンバー3のこと 3ということはtarge170
		cmsel,s,a_targ	!Cuの表面選択
		nsla,s,1	!選択されたエリアに関する節点の選択
		esurf		!既存の要素の自由表面に重ねて要素を生成とのこと
		type,8		!粗い樹脂と銅の接触
		cmsel,s,a_cont	!はんだ下面の選択
		nsla,s,1	!選択されたエリアに関する節点の選択
		esurf

		CNUM=CNUM+1
		allsel
		!Create Contact Pair
		asel,s,,,A15+6*8+4	!左面を選択
		cm,a_cont,area	!a_contという名をつける
		asel,s,,,312	!Cu表面を選択
		cm,a_targ,area	!a_targという名をつける  TARGがくっつける相手の（通常大きいほうの）面
		allsel
		r,CNUM
		rmodif,CNUM,14,1e6		!14は接触コンダクタンスのこと CONTA174の リアルコンスタントのことらしい
		real,CNUM
		type,3		!要素ナンバー3のこと 3ということはtarge170
		cmsel,s,a_targ	!Cuの表面選択
		nsla,s,1	!選択されたエリアに関する節点の選択
		esurf		!既存の要素の自由表面に重ねて要素を生成とのこと
		type,5		!粗い樹脂と銅の接触
		cmsel,s,a_cont	!はんだ下面の選択
		nsla,s,1	!選択されたエリアに関する節点の選択
		esurf

!DBUS横　小樹脂　右側
		CNUM=CNUM+1
		allsel
		!Create Contact Pair
		asel,s,,,A15+6*9+1	!左面を選択
		cm,a_cont,area	!a_contという名をつける
		asel,s,,,78	!Cu表面を選択
		cm,a_targ,area	!a_targという名をつける  TARGがくっつける相手の（通常大きいほうの）面
		allsel
		r,CNUM
		rmodif,CNUM,14,1e6		!14は接触コンダクタンスのこと CONTA174の リアルコンスタントのことらしい
		real,CNUM
		type,3		!要素ナンバー3のこと 3ということはtarge170
		cmsel,s,a_targ	!Cuの表面選択
		nsla,s,1	!選択されたエリアに関する節点の選択
		esurf		!既存の要素の自由表面に重ねて要素を生成とのこと
		type,5		!粗い樹脂と銅の接触
		cmsel,s,a_cont	!はんだ下面の選択
		nsla,s,1	!選択されたエリアに関する節点の選択
		esurf

		CNUM=CNUM+1
		allsel
		!Create Contact Pair
		asel,s,,,A15+6*9+1	!左面を選択
		cm,a_cont,area	!a_contという名をつける
		asel,s,,,24	!Cu表面を選択
		cm,a_targ,area	!a_targという名をつける  TARGがくっつける相手の（通常大きいほうの）面
		allsel
		r,CNUM
		rmodif,CNUM,14,1e6		!14は接触コンダクタンスのこと CONTA174の リアルコンスタントのことらしい
		real,CNUM
		type,3		!要素ナンバー3のこと 3ということはtarge170
		cmsel,s,a_targ	!Cuの表面選択
		nsla,s,1	!選択されたエリアに関する節点の選択
		esurf		!既存の要素の自由表面に重ねて要素を生成とのこと
		type,8		!粗い樹脂と銅の接触
		cmsel,s,a_cont	!はんだ下面の選択
		nsla,s,1	!選択されたエリアに関する節点の選択
		esurf

		CNUM=CNUM+1
		allsel
		!Create Contact Pair
		asel,s,,,A15+6*9+4	!左面を選択
		cm,a_cont,area	!a_contという名をつける
		asel,s,,,333	!Cu表面を選択
		cm,a_targ,area	!a_targという名をつける  TARGがくっつける相手の（通常大きいほうの）面
		allsel
		r,CNUM
		rmodif,CNUM,14,1e6		!14は接触コンダクタンスのこと CONTA174の リアルコンスタントのことらしい
		real,CNUM
		type,3		!要素ナンバー3のこと 3ということはtarge170
		cmsel,s,a_targ	!Cuの表面選択
		nsla,s,1	!選択されたエリアに関する節点の選択
		esurf		!既存の要素の自由表面に重ねて要素を生成とのこと
		type,8		!粗い樹脂と銅の接触
		cmsel,s,a_cont	!はんだ下面の選択
		nsla,s,1	!選択されたエリアに関する節点の選択
		esurf

		CNUM=CNUM+1
		allsel
		!Create Contact Pair
		asel,s,,,A15+6*9+4	!左面を選択
		cm,a_cont,area	!a_contという名をつける
		asel,s,,,312	!Cu表面を選択
		cm,a_targ,area	!a_targという名をつける  TARGがくっつける相手の（通常大きいほうの）面
		allsel
		r,CNUM
		rmodif,CNUM,14,1e6		!14は接触コンダクタンスのこと CONTA174の リアルコンスタントのことらしい
		real,CNUM
		type,3		!要素ナンバー3のこと 3ということはtarge170
		cmsel,s,a_targ	!Cuの表面選択
		nsla,s,1	!選択されたエリアに関する節点の選択
		esurf		!既存の要素の自由表面に重ねて要素を生成とのこと
		type,5		!粗い樹脂と銅の接触
		cmsel,s,a_cont	!はんだ下面の選択
		nsla,s,1	!選択されたエリアに関する節点の選択
		esurf

		CNUM=CNUM+1
		allsel
		!Create Contact Pair
		asel,s,,,A15+6*9+5	!左面を選択
		cm,a_cont,area	!a_contという名をつける
		asel,s,,,A14+6*3+3	!Cu表面を選択
		cm,a_targ,area	!a_targという名をつける  TARGがくっつける相手の（通常大きいほうの）面
		allsel
		r,CNUM
		rmodif,CNUM,14,1e6		!14は接触コンダクタンスのこと CONTA174の リアルコンスタントのことらしい
		real,CNUM
		type,3		!要素ナンバー3のこと 3ということはtarge170
		cmsel,s,a_targ	!Cuの表面選択
		nsla,s,1	!選択されたエリアに関する節点の選択
		esurf		!既存の要素の自由表面に重ねて要素を生成とのこと
		type,5		!粗い樹脂と銅の接触
		cmsel,s,a_cont	!はんだ下面の選択
		nsla,s,1	!選択されたエリアに関する節点の選択
		esurf

		CNUM=CNUM+1
		allsel
		!Create Contact Pair
		asel,s,,,A15+6*9+5	!左面を選択
		cm,a_cont,area	!a_contという名をつける
		asel,s,,,363	!Cu表面を選択
		cm,a_targ,area	!a_targという名をつける  TARGがくっつける相手の（通常大きいほうの）面
		allsel
		r,CNUM
		rmodif,CNUM,14,1e6		!14は接触コンダクタンスのこと CONTA174の リアルコンスタントのことらしい
		real,CNUM
		type,3		!要素ナンバー3のこと 3ということはtarge170
		cmsel,s,a_targ	!Cuの表面選択
		nsla,s,1	!選択されたエリアに関する節点の選択
		esurf		!既存の要素の自由表面に重ねて要素を生成とのこと
		type,8		!粗い樹脂と銅の接触
		cmsel,s,a_cont	!はんだ下面の選択
		nsla,s,1	!選択されたエリアに関する節点の選択
		esurf

!DBC間最後の樹脂の作成で
!点 8*10新規発生
!線 12*10新規発生
!面 6*10新規発生
!VOL 10新規発生
!X1=KBASE+2*PARA*8*10
!X1=X1+2*PARA*32+2*PARA*8
!X1=X1+2*PARA*26+13*PARA*2
!X1=X1+16*PARA*2+8*PARA*2
!X1=X1+8*PARA*2+8*PARA*2		!チップ周辺最後の樹脂
!X1=X1+8*(PARA-2)*2	!パラ間の樹脂
!X1=X1+8*2			!チップ行間の中央横長樹脂
!X1=X1+8*8			!チップ行　左右端の樹脂
!X1=X1+8*8			!柱前後とチップ前後の樹脂
!X1=X1+8*11			!BUS下およびBUS横の樹脂
X1=X1+8*10			!DBC間の最後の樹脂作成
!X2=LBASE+2*PARA*12*10
!X2=X2+2*PARA*(32+20)		!チップ側面樹脂まで
!X2=X2+2*PARA*53+33*PARA*2	!53EMIはんだ側面樹脂
!X2=X2+32*PARA*2+20*PARA*2	!
!X2=X2+20*PARA*2+12*PARA*2
!X2=X2+12*(PARA-2)*2
!X2=X2+24
!X2=X2+12*8
!X2=X2+12*8
!X2=X2+12*11
X2=X2+12*10
!X3=ABASE+2*PARA*6*10	!樹脂なしの各PARA要素まで
!X3=X3+2*PARA*(20+16)	!チップ周りの樹脂
!X3=X3+2*PARA*(30+4)+2*PARA*27			!EMIはんだまわりの樹脂+SPC周辺
!X3=X3+20*PARA*2+16*PARA*2
!X3=X3+16*PARA*2+6*PARA*2
!X3=X3+6*(PARA-2)*2
!X3=X3+12
!X3=X3+6*8
!X3=X3+6*8
!X3=X3+6*11
X3=X3+6*10
!X4=VBASE+2*PARA*10+2*PARA*8
!X4=X4+2*PARA*7+2*PARA*7
!X4=X4+4*PARA*2+4*PARA*2
!X4=X4+4*PARA*2+PARA*2
!X4=X4+(PARA-2)*2
!X4=X4+2
!X4=X4+8
!X4=X4+8
!X4=X4+11
X4=X4+10

!改めて面の基準どり
A1=ABASE+PARA*2*6*10	! ←樹脂の手前まで 上のDBC下はんだまで
A2=A1+20*PARA*2	! ダイ半田横の樹脂まで
A3=A2+16*PARA*2					! チップ横の樹脂まで
A4=A3+30*PARA*2					!EMIはんだ周辺樹脂まで
A5=A4+4*PARA*2					!EMIはんだまわり全部
A6=A5+27*PARA*2			!SPC下部分周辺樹脂まで
A7=A6+20*PARA*2			!面取り周辺樹脂まで
A8=A7+16*PARA*2			!上SPC周辺樹脂まで
A9=A8+16*PARA*2			!SPC上はんだ周辺樹脂まで
A10=A9+6*PARA*2			!EMI上の最後の樹脂まで
A11=A10+6*(PARA-2)*2			!PARA間の樹脂まで
A12=A11+6*2				!中央の樹脂まで
A13=A12+6*8				!チップ横の樹脂まで
A14=A13+6*8				!柱前後およびチップ前後の樹脂まで
A15=A14+6*11				!BUS下およびBUS横の樹脂
A16=A15+6*10				!DBC間の最後の樹脂作成


!--------------------信号PIN間の樹脂--------------------------
ALLSEL
*DO,ii,1,8,1			!8つすべて
	*DO,jj,1,2,1		!上下
		*DO,kk,1,4,1	!4方向
				nn=X1+(ii-1)*8+(jj-1)*4+kk
				k,nn,RESINSIG(ii,jj,kk,1),RESINSIG(ii,jj,kk,2),RESINSIG(ii,jj,kk,3)
		*ENDDO
	*ENDDO
*ENDDO
*DO,ii,1,8,1
			kk=X1+(ii-1)*8
			V,kk+1,kk+2,kk+3,kk+4,kk+5,kk+6,kk+7,kk+8
*ENDDO

*DO,ii,1,8,1
		D_PLTX=NINT((RESINSIG(ii,1,2,1)-RESINSIG(ii,1,1,1))/M_RESINX)
		D_PLTY=NINT((RESINSIG(ii,1,3,2)-RESINSIG(ii,1,2,2))/M_RESINY)
		D_PLTZ=NINT( (RESINSIG(ii,2,1,3)-RESINSIG(ii,1,1,3) )/M_RESINZ)
*IF,D_PLTZ,LT,3,THEN
	D_PLTZ=3
*ENDIF
		lsel,s,,,X2+(ii-1)*12+1
		lesiz,all,,,D_PLTX		!z分割
		lsel,all			!最後にこのALLがないと、次にLをSELできなくなってしまいエラーが発生します。これはMUST
		lsel,s,,,X2+(ii-1)*12+2
		lesiz,all,,,D_PLTY		!z分割
		lsel,all			!最後にこのALLがないと、次にLをSELできなくなってしまいエラーが発生します。これはMUST
		lsel,s,,,X2+(ii-1)*12+5
		lesiz,all,,,D_PLTZ		!z分割
		lsel,all			!最後にこのALLがないと、次にLをSELできなくなってしまいエラーが発生します。これはMUST
		VMESH,X4+ii
*ENDDO

!みずかき樹脂の接合-------------------------

*DO,ii,1,4,1
		CNUM=CNUM+1
		allsel
		!Create Contact Pair
		asel,s,,,A16+(ii-1)*6+3	!下面を選択
		cm,a_cont,area	!a_contという名をつける
		asel,s,,,377+(ii-1)*6	!Cu表面を選択
		cm,a_targ,area	!a_targという名をつける  TARGがくっつける相手の（通常大きいほうの）面
		allsel
		r,CNUM
		rmodif,CNUM,14,1e6		!14は接触コンダクタンスのこと CONTA174の リアルコンスタントのことらしい
		real,CNUM
		type,3		!要素ナンバー3のこと 3ということはtarge170
		cmsel,s,a_targ	!Cuの表面選択
		nsla,s,1	!選択されたエリアに関する節点の選択
		esurf		!既存の要素の自由表面に重ねて要素を生成とのこと
		type,8		!
		cmsel,s,a_cont	!はんだ下面の選択
		nsla,s,1	!選択されたエリアに関する節点の選択
		esurf
		allsel

		CNUM=CNUM+1
		allsel
		!Create Contact Pair
		asel,s,,,A16+(ii-1)*6+4	!下面を選択
		cm,a_cont,area	!a_contという名をつける
		asel,s,,,A15+6*3+2	!Cu表面を選択
		cm,a_targ,area	!a_targという名をつける  TARGがくっつける相手の（通常大きいほうの）面
		allsel
		r,CNUM
		rmodif,CNUM,14,1e6		!14は接触コンダクタンスのこと CONTA174の リアルコンスタントのことらしい
		real,CNUM
		type,3		!要素ナンバー3のこと 3ということはtarge170
		cmsel,s,a_targ	!Cuの表面選択
		nsla,s,1	!選択されたエリアに関する節点の選択
		esurf		!既存の要素の自由表面に重ねて要素を生成とのこと
		type,5		!
		cmsel,s,a_cont	!はんだ下面の選択
		nsla,s,1	!選択されたエリアに関する節点の選択
		esurf
		allsel

		CNUM=CNUM+1
		allsel
		!Create Contact Pair
		asel,s,,,A16+(ii-1)*6+5	!下面を選択
		cm,a_cont,area	!a_contという名をつける
		asel,s,,,369+(ii-1)*6	!Cu表面を選択
		cm,a_targ,area	!a_targという名をつける  TARGがくっつける相手の（通常大きいほうの）面
		allsel
		r,CNUM
		rmodif,CNUM,14,1e6		!14は接触コンダクタンスのこと CONTA174の リアルコンスタントのことらしい
		real,CNUM
		type,3		!要素ナンバー3のこと 3ということはtarge170
		cmsel,s,a_targ	!Cuの表面選択
		nsla,s,1	!選択されたエリアに関する節点の選択
		esurf		!既存の要素の自由表面に重ねて要素を生成とのこと
		type,8		!
		cmsel,s,a_cont	!はんだ下面の選択
		nsla,s,1	!選択されたエリアに関する節点の選択
		esurf
		allsel

*ENDDO

		CNUM=CNUM+1
		allsel
		!Create Contact Pair
		asel,s,,,A16+4*6+3	!下面を選択
		cm,a_cont,area	!a_contという名をつける
		asel,s,,,365	!Cu表面を選択
		cm,a_targ,area	!a_targという名をつける  TARGがくっつける相手の（通常大きいほうの）面
		allsel
		r,CNUM
		rmodif,CNUM,14,1e6		!14は接触コンダクタンスのこと CONTA174の リアルコンスタントのことらしい
		real,CNUM
		type,3		!要素ナンバー3のこと 3ということはtarge170
		cmsel,s,a_targ	!Cuの表面選択
		nsla,s,1	!選択されたエリアに関する節点の選択
		esurf		!既存の要素の自由表面に重ねて要素を生成とのこと
		type,8		!
		cmsel,s,a_cont	!はんだ下面の選択
		nsla,s,1	!選択されたエリアに関する節点の選択
		esurf
		allsel

		CNUM=CNUM+1
		allsel
		!Create Contact Pair
		asel,s,,,A16+4*6+4	!下面を選択
		cm,a_cont,area	!a_contという名をつける
		asel,s,,,A15+6*3+2	!Cu表面を選択
		cm,a_targ,area	!a_targという名をつける  TARGがくっつける相手の（通常大きいほうの）面
		allsel
		r,CNUM
		rmodif,CNUM,14,1e6		!14は接触コンダクタンスのこと CONTA174の リアルコンスタントのことらしい
		real,CNUM
		type,3		!要素ナンバー3のこと 3ということはtarge170
		cmsel,s,a_targ	!Cuの表面選択
		nsla,s,1	!選択されたエリアに関する節点の選択
		esurf		!既存の要素の自由表面に重ねて要素を生成とのこと
		type,5		!
		cmsel,s,a_cont	!はんだ下面の選択
		nsla,s,1	!選択されたエリアに関する節点の選択
		esurf
		allsel

		CNUM=CNUM+1
		allsel
		!Create Contact Pair
		asel,s,,,A16+4*6+4	!下面を選択
		cm,a_cont,area	!a_contという名をつける
		asel,s,,,A15+6*8+2	!Cu表面を選択
		cm,a_targ,area	!a_targという名をつける  TARGがくっつける相手の（通常大きいほうの）面
		allsel
		r,CNUM
		rmodif,CNUM,14,1e6		!14は接触コンダクタンスのこと CONTA174の リアルコンスタントのことらしい
		real,CNUM
		type,3		!要素ナンバー3のこと 3ということはtarge170
		cmsel,s,a_targ	!Cuの表面選択
		nsla,s,1	!選択されたエリアに関する節点の選択
		esurf		!既存の要素の自由表面に重ねて要素を生成とのこと
		type,5		!
		cmsel,s,a_cont	!はんだ下面の選択
		nsla,s,1	!選択されたエリアに関する節点の選択
		esurf
		allsel

		CNUM=CNUM+1
		allsel
		!Create Contact Pair
		asel,s,,,A16+4*6+5	!下面を選択
		cm,a_cont,area	!a_contという名をつける
		asel,s,,,393	!Cu表面を選択
		cm,a_targ,area	!a_targという名をつける  TARGがくっつける相手の（通常大きいほうの）面
		allsel
		r,CNUM
		rmodif,CNUM,14,1e6		!14は接触コンダクタンスのこと CONTA174の リアルコンスタントのことらしい
		real,CNUM
		type,3		!要素ナンバー3のこと 3ということはtarge170
		cmsel,s,a_targ	!Cuの表面選択
		nsla,s,1	!選択されたエリアに関する節点の選択
		esurf		!既存の要素の自由表面に重ねて要素を生成とのこと
		type,8		!
		cmsel,s,a_cont	!はんだ下面の選択
		nsla,s,1	!選択されたエリアに関する節点の選択
		esurf
		allsel


		CNUM=CNUM+1
		allsel
		!Create Contact Pair
		asel,s,,,A16+5*6+3	!下面を選択
		cm,a_cont,area	!a_contという名をつける
		asel,s,,,401	!Cu表面を選択
		cm,a_targ,area	!a_targという名をつける  TARGがくっつける相手の（通常大きいほうの）面
		allsel
		r,CNUM
		rmodif,CNUM,14,1e6		!14は接触コンダクタンスのこと CONTA174の リアルコンスタントのことらしい
		real,CNUM
		type,3		!要素ナンバー3のこと 3ということはtarge170
		cmsel,s,a_targ	!Cuの表面選択
		nsla,s,1	!選択されたエリアに関する節点の選択
		esurf		!既存の要素の自由表面に重ねて要素を生成とのこと
		type,8		!
		cmsel,s,a_cont	!はんだ下面の選択
		nsla,s,1	!選択されたエリアに関する節点の選択
		esurf
		allsel

		CNUM=CNUM+1
		allsel
		!Create Contact Pair
		asel,s,,,A16+5*6+4	!下面を選択
		cm,a_cont,area	!a_contという名をつける
		asel,s,,,A15+6*5+2	!Cu表面を選択
		cm,a_targ,area	!a_targという名をつける  TARGがくっつける相手の（通常大きいほうの）面
		allsel
		r,CNUM
		rmodif,CNUM,14,1e6		!14は接触コンダクタンスのこと CONTA174の リアルコンスタントのことらしい
		real,CNUM
		type,3		!要素ナンバー3のこと 3ということはtarge170
		cmsel,s,a_targ	!Cuの表面選択
		nsla,s,1	!選択されたエリアに関する節点の選択
		esurf		!既存の要素の自由表面に重ねて要素を生成とのこと
		type,5		!
		cmsel,s,a_cont	!はんだ下面の選択
		nsla,s,1	!選択されたエリアに関する節点の選択
		esurf
		allsel

		CNUM=CNUM+1
		allsel
		!Create Contact Pair
		asel,s,,,A16+5*6+4	!下面を選択
		cm,a_cont,area	!a_contという名をつける
		asel,s,,,A15+6*9+2	!Cu表面を選択
		cm,a_targ,area	!a_targという名をつける  TARGがくっつける相手の（通常大きいほうの）面
		allsel
		r,CNUM
		rmodif,CNUM,14,1e6		!14は接触コンダクタンスのこと CONTA174の リアルコンスタントのことらしい
		real,CNUM
		type,3		!要素ナンバー3のこと 3ということはtarge170
		cmsel,s,a_targ	!Cuの表面選択
		nsla,s,1	!選択されたエリアに関する節点の選択
		esurf		!既存の要素の自由表面に重ねて要素を生成とのこと
		type,5		!
		cmsel,s,a_cont	!はんだ下面の選択
		nsla,s,1	!選択されたエリアに関する節点の選択
		esurf
		allsel

		CNUM=CNUM+1
		allsel
		!Create Contact Pair
		asel,s,,,A16+5*6+5	!下面を選択
		cm,a_cont,area	!a_contという名をつける
		asel,s,,,363	!Cu表面を選択
		cm,a_targ,area	!a_targという名をつける  TARGがくっつける相手の（通常大きいほうの）面
		allsel
		r,CNUM
		rmodif,CNUM,14,1e6		!14は接触コンダクタンスのこと CONTA174の リアルコンスタントのことらしい
		real,CNUM
		type,3		!要素ナンバー3のこと 3ということはtarge170
		cmsel,s,a_targ	!Cuの表面選択
		nsla,s,1	!選択されたエリアに関する節点の選択
		esurf		!既存の要素の自由表面に重ねて要素を生成とのこと
		type,8		!
		cmsel,s,a_cont	!はんだ下面の選択
		nsla,s,1	!選択されたエリアに関する節点の選択
		esurf
		allsel

*DO,ii,7,8,1
		CNUM=CNUM+1
		allsel
		!Create Contact Pair
		asel,s,,,A16+(ii-1)*6+3	!下面を選択
		cm,a_cont,area	!a_contという名をつける
		asel,s,,,401+(ii-7)*6+6	!Cu表面を選択
		cm,a_targ,area	!a_targという名をつける  TARGがくっつける相手の（通常大きいほうの）面
		allsel
		r,CNUM
		rmodif,CNUM,14,1e6		!14は接触コンダクタンスのこと CONTA174の リアルコンスタントのことらしい
		real,CNUM
		type,3		!要素ナンバー3のこと 3ということはtarge170
		cmsel,s,a_targ	!Cuの表面選択
		nsla,s,1	!選択されたエリアに関する節点の選択
		esurf		!既存の要素の自由表面に重ねて要素を生成とのこと
		type,8		!
		cmsel,s,a_cont	!はんだ下面の選択
		nsla,s,1	!選択されたエリアに関する節点の選択
		esurf
		allsel

		CNUM=CNUM+1
		allsel
		!Create Contact Pair
		asel,s,,,A16+(ii-1)*6+4	!下面を選択
		cm,a_cont,area	!a_contという名をつける
		asel,s,,,A15+6*5+2	!Cu表面を選択
		cm,a_targ,area	!a_targという名をつける  TARGがくっつける相手の（通常大きいほうの）面
		allsel
		r,CNUM
		rmodif,CNUM,14,1e6		!14は接触コンダクタンスのこと CONTA174の リアルコンスタントのことらしい
		real,CNUM
		type,3		!要素ナンバー3のこと 3ということはtarge170
		cmsel,s,a_targ	!Cuの表面選択
		nsla,s,1	!選択されたエリアに関する節点の選択
		esurf		!既存の要素の自由表面に重ねて要素を生成とのこと
		type,5		!
		cmsel,s,a_cont	!はんだ下面の選択
		nsla,s,1	!選択されたエリアに関する節点の選択
		esurf
		allsel

		CNUM=CNUM+1
		allsel
		!Create Contact Pair
		asel,s,,,A16+(ii-1)*6+5	!下面を選択
		cm,a_cont,area	!a_contという名をつける
		asel,s,,,399+(ii-7)*6	!Cu表面を選択
		cm,a_targ,area	!a_targという名をつける  TARGがくっつける相手の（通常大きいほうの）面
		allsel
		r,CNUM
		rmodif,CNUM,14,1e6		!14は接触コンダクタンスのこと CONTA174の リアルコンスタントのことらしい
		real,CNUM
		type,3		!要素ナンバー3のこと 3ということはtarge170
		cmsel,s,a_targ	!Cuの表面選択
		nsla,s,1	!選択されたエリアに関する節点の選択
		esurf		!既存の要素の自由表面に重ねて要素を生成とのこと
		type,8		!
		cmsel,s,a_cont	!はんだ下面の選択
		nsla,s,1	!選択されたエリアに関する節点の選択
		esurf
		allsel

*ENDDO

!信号PIN間の樹脂の作成で
!点 8*8新規発生
!線 12*8新規発生
!面 6*8新規発生
!VOL 8新規発生
!X1=KBASE+2*PARA*8*10
!X1=X1+2*PARA*32+2*PARA*8
!X1=X1+2*PARA*26+13*PARA*2
!X1=X1+16*PARA*2+8*PARA*2
!X1=X1+8*PARA*2+8*PARA*2		!チップ周辺最後の樹脂
!X1=X1+8*(PARA-2)*2	!パラ間の樹脂
!X1=X1+8*2			!チップ行間の中央横長樹脂
!X1=X1+8*8			!チップ行　左右端の樹脂
!X1=X1+8*8			!柱前後とチップ前後の樹脂
!X1=X1+8*11			!BUS下およびBUS横の樹脂
!X1=X1+8*10			!DBC間の最後の樹脂作成
X1=X1+8*8			!信号PIN間の樹脂の作成
!X2=LBASE+2*PARA*12*10
!X2=X2+2*PARA*(32+20)		!チップ側面樹脂まで
!X2=X2+2*PARA*53+33*PARA*2	!53EMIはんだ側面樹脂
!X2=X2+32*PARA*2+20*PARA*2	!
!X2=X2+20*PARA*2+12*PARA*2
!X2=X2+12*(PARA-2)*2
!X2=X2+24
!X2=X2+12*8
!X2=X2+12*8
!X2=X2+12*11
!X2=X2+12*10
X2=X2+12*8
!X3=ABASE+2*PARA*6*10	!樹脂なしの各PARA要素まで
!X3=X3+2*PARA*(20+16)	!チップ周りの樹脂
!X3=X3+2*PARA*(30+4)+2*PARA*27			!EMIはんだまわりの樹脂+SPC周辺
!X3=X3+20*PARA*2+16*PARA*2
!X3=X3+16*PARA*2+6*PARA*2
!X3=X3+6*(PARA-2)*2
!X3=X3+12
!X3=X3+6*8
!X3=X3+6*8
!X3=X3+6*11
!X3=X3+6*10
X3=X3+6*8
!X4=VBASE+2*PARA*10+2*PARA*8
!X4=X4+2*PARA*7+2*PARA*7
!X4=X4+4*PARA*2+4*PARA*2
!X4=X4+4*PARA*2+PARA*2
!X4=X4+(PARA-2)*2
!X4=X4+2
!X4=X4+8
!X4=X4+8
!X4=X4+11
!X4=X4+10
X4=X4+8

!改めて面の基準どり
A1=ABASE+PARA*2*6*10	! ←樹脂の手前まで 上のDBC下はんだまで
A2=A1+20*PARA*2	! ダイ半田横の樹脂まで
A3=A2+16*PARA*2					! チップ横の樹脂まで
A4=A3+30*PARA*2					!EMIはんだ周辺樹脂まで
A5=A4+4*PARA*2					!EMIはんだまわり全部
A6=A5+27*PARA*2			!SPC下部分周辺樹脂まで
A7=A6+20*PARA*2			!面取り周辺樹脂まで
A8=A7+16*PARA*2			!上SPC周辺樹脂まで
A9=A8+16*PARA*2			!SPC上はんだ周辺樹脂まで
A10=A9+6*PARA*2			!EMI上の最後の樹脂まで
A11=A10+6*(PARA-2)*2			!PARA間の樹脂まで
A12=A11+6*2				!中央の樹脂まで
A13=A12+6*8				!チップ横の樹脂まで
A14=A13+6*8				!柱前後およびチップ前後の樹脂まで
A15=A14+6*11				!BUS下およびBUS横の樹脂
A16=A15+6*10				!DBC間の最後の樹脂作成
A17=A16+6*8				!信号PIN間の樹脂の作成

!信号ピン側の樹脂完成---------------------------------------------------------------------
*DO,ii,1,4,1			!8つすべて
	*DO,jj,1,2,1		!上下
		*DO,kk,1,4,1	!4方向
				nn=X1+(ii-1)*8+(jj-1)*4+kk
				k,nn,RESINSIG2(ii,jj,kk,1),RESINSIG2(ii,jj,kk,2),RESINSIG2(ii,jj,kk,3)
		*ENDDO
	*ENDDO
*ENDDO
*DO,ii,1,4,1
			kk=X1+(ii-1)*8
			V,kk+1,kk+2,kk+3,kk+4,kk+5,kk+6,kk+7,kk+8
*ENDDO
*DO,ii,1,4,1
		D_PLTX=NINT((RESINSIG2(ii,1,2,1)-RESINSIG2(ii,1,1,1))/M_RESINX)
		D_PLTY=NINT((RESINSIG2(ii,1,3,2)-RESINSIG2(ii,1,2,2))/M_RESINY)
		D_PLTZ=NINT( (RESINSIG2(ii,2,1,3)-RESINSIG2(ii,1,1,3) )/M_RESINZ)
*IF,D_PLTZ,LT,3,THEN
	D_PLTZ=3
*ENDIF
		lsel,s,,,X2+(ii-1)*12+1
		lesiz,all,,,D_PLTX		!z分割
		lsel,all			!最後にこのALLがないと、次にLをSELできなくなってしまいエラーが発生します。これはMUST
		lsel,s,,,X2+(ii-1)*12+2
		lesiz,all,,,D_PLTY		!z分割
		lsel,all			!最後にこのALLがないと、次にLをSELできなくなってしまいエラーが発生します。これはMUST
		lsel,s,,,X2+(ii-1)*12+5
		lesiz,all,,,D_PLTZ		!z分割
		lsel,all			!最後にこのALLがないと、次にLをSELできなくなってしまいエラーが発生します。これはMUST
		VMESH,X4+ii
*ENDDO

!---------信号ピン側樹脂の接合----------------------------------------
!----1個目　Oがわ
		CNUM=CNUM+1
		allsel
		!Create Contact Pair
		asel,s,,,A17+3	!下面を選択
		cm,a_cont,area	!a_contという名をつける
		asel,s,,,A17+2*6+5	!Cu表面を選択
		cm,a_targ,area	!a_targという名をつける  TARGがくっつける相手の（通常大きいほうの）面
		allsel
		r,CNUM
		rmodif,CNUM,14,1e6		!14は接触コンダクタンスのこと CONTA174の リアルコンスタントのことらしい
		real,CNUM
		type,3		!要素ナンバー3のこと 3ということはtarge170
		cmsel,s,a_targ	!Cuの表面選択
		nsla,s,1	!選択されたエリアに関する節点の選択
		esurf		!既存の要素の自由表面に重ねて要素を生成とのこと
		type,5		!
		cmsel,s,a_cont	!はんだ下面の選択
		nsla,s,1	!選択されたエリアに関する節点の選択
		esurf
		allsel

		CNUM=CNUM+1
		allsel
		!Create Contact Pair
		asel,s,,,A17+3	!下面を選択
		cm,a_cont,area	!a_contという名をつける
		asel,s,,,371	!Cu表面を選択
		cm,a_targ,area	!a_targという名をつける  TARGがくっつける相手の（通常大きいほうの）面
		allsel
		r,CNUM
		rmodif,CNUM,14,1e6		!14は接触コンダクタンスのこと CONTA174の リアルコンスタントのことらしい
		real,CNUM
		type,3		!要素ナンバー3のこと 3ということはtarge170
		cmsel,s,a_targ	!Cuの表面選択
		nsla,s,1	!選択されたエリアに関する節点の選択
		esurf		!既存の要素の自由表面に重ねて要素を生成とのこと
		type,8		!
		cmsel,s,a_cont	!はんだ下面の選択
		nsla,s,1	!選択されたエリアに関する節点の選択
		esurf
		allsel

		CNUM=CNUM+1
		allsel
		!Create Contact Pair
		asel,s,,,A17+3	!下面を選択
		cm,a_cont,area	!a_contという名をつける
		asel,s,,,A17+6+5	!Cu表面を選択
		cm,a_targ,area	!a_targという名をつける  TARGがくっつける相手の（通常大きいほうの）面
		allsel
		r,CNUM
		rmodif,CNUM,14,1e6		!14は接触コンダクタンスのこと CONTA174の リアルコンスタントのことらしい
		real,CNUM
		type,3		!要素ナンバー3のこと 3ということはtarge170
		cmsel,s,a_targ	!Cuの表面選択
		nsla,s,1	!選択されたエリアに関する節点の選択
		esurf		!既存の要素の自由表面に重ねて要素を生成とのこと
		type,8		!
		cmsel,s,a_cont	!はんだ下面の選択
		nsla,s,1	!選択されたエリアに関する節点の選択
		esurf
		allsel

*DO,ii,1,2,1
		CNUM=CNUM+1
		allsel
		!Create Contact Pair
		asel,s,,,A17+4	!下面を選択
		cm,a_cont,area	!a_contという名をつける
		asel,s,,,74+(ii-1)*100	!Cu表面を選択
		cm,a_targ,area	!a_targという名をつける  TARGがくっつける相手の（通常大きいほうの）面
		allsel
		r,CNUM
		rmodif,CNUM,14,1e6		!14は接触コンダクタンスのこと CONTA174の リアルコンスタントのことらしい
		real,CNUM
		type,3		!要素ナンバー3のこと 3ということはtarge170
		cmsel,s,a_targ	!Cuの表面選択
		nsla,s,1	!選択されたエリアに関する節点の選択
		esurf		!既存の要素の自由表面に重ねて要素を生成とのこと
		type,5		!
		cmsel,s,a_cont	!はんだ下面の選択
		nsla,s,1	!選択されたエリアに関する節点の選択
		esurf
		allsel
*ENDDO

*DO,ii,1,2,1
		CNUM=CNUM+1
		allsel
		!Create Contact Pair
		asel,s,,,A17+4	!下面を選択
		cm,a_cont,area	!a_contという名をつける
		asel,s,,,2+(ii-1)*161	!Cu表面を選択
		cm,a_targ,area	!a_targという名をつける  TARGがくっつける相手の（通常大きいほうの）面
		allsel
		r,CNUM
		rmodif,CNUM,14,1e6		!14は接触コンダクタンスのこと CONTA174の リアルコンスタントのことらしい
		real,CNUM
		type,3		!要素ナンバー3のこと 3ということはtarge170
		cmsel,s,a_targ	!Cuの表面選択
		nsla,s,1	!選択されたエリアに関する節点の選択
		esurf		!既存の要素の自由表面に重ねて要素を生成とのこと
		type,10		!
		cmsel,s,a_cont	!はんだ下面の選択
		nsla,s,1	!選択されたエリアに関する節点の選択
		esurf
		allsel
*ENDDO


		CNUM=CNUM+1
		allsel
		!Create Contact Pair
		asel,s,,,A17+4	!下面を選択
		cm,a_cont,area	!a_contという名をつける
		asel,s,,,158	!Cu表面を選択
		cm,a_targ,area	!a_targという名をつける  TARGがくっつける相手の（通常大きいほうの）面
		allsel
		r,CNUM
		rmodif,CNUM,14,1e6		!14は接触コンダクタンスのこと CONTA174の リアルコンスタントのことらしい
		real,CNUM
		type,3		!要素ナンバー3のこと 3ということはtarge170
		cmsel,s,a_targ	!Cuの表面選択
		nsla,s,1	!選択されたエリアに関する節点の選択
		esurf		!既存の要素の自由表面に重ねて要素を生成とのこと
		type,8		!
		cmsel,s,a_cont	!はんだ下面の選択
		nsla,s,1	!選択されたエリアに関する節点の選択
		esurf
		allsel

		CNUM=CNUM+1
		allsel
		!Create Contact Pair
		asel,s,,,A17+4	!下面を選択
		cm,a_cont,area	!a_contという名をつける
		asel,s,,,A15+6*6+2	!Cu表面を選択
		cm,a_targ,area	!a_targという名をつける  TARGがくっつける相手の（通常大きいほうの）面
		allsel
		r,CNUM
		rmodif,CNUM,14,1e6		!14は接触コンダクタンスのこと CONTA174の リアルコンスタントのことらしい
		real,CNUM
		type,3		!要素ナンバー3のこと 3ということはtarge170
		cmsel,s,a_targ	!Cuの表面選択
		nsla,s,1	!選択されたエリアに関する節点の選択
		esurf		!既存の要素の自由表面に重ねて要素を生成とのこと
		type,5		!
		cmsel,s,a_cont	!はんだ下面の選択
		nsla,s,1	!選択されたエリアに関する節点の選択
		esurf
		allsel

		CNUM=CNUM+1
		allsel
		!Create Contact Pair
		asel,s,,,A17+4	!下面を選択
		cm,a_cont,area	!a_contという名をつける
		asel,s,,,A15+6*3+2	!Cu表面を選択
		cm,a_targ,area	!a_targという名をつける  TARGがくっつける相手の（通常大きいほうの）面
		allsel
		r,CNUM
		rmodif,CNUM,14,1e6		!14は接触コンダクタンスのこと CONTA174の リアルコンスタントのことらしい
		real,CNUM
		type,3		!要素ナンバー3のこと 3ということはtarge170
		cmsel,s,a_targ	!Cuの表面選択
		nsla,s,1	!選択されたエリアに関する節点の選択
		esurf		!既存の要素の自由表面に重ねて要素を生成とのこと
		type,8		!
		cmsel,s,a_cont	!はんだ下面の選択
		nsla,s,1	!選択されたエリアに関する節点の選択
		esurf
		allsel

!----2個目　中央下
		CNUM=CNUM+1
		allsel
		!Create Contact Pair
		asel,s,,,A17+6+3	!下面を選択
		cm,a_cont,area	!a_contという名をつける
		asel,s,,,A17+6*3+5	!Cu表面を選択
		cm,a_targ,area	!a_targという名をつける  TARGがくっつける相手の（通常大きいほうの）面
		allsel
		r,CNUM
		rmodif,CNUM,14,1e6		!14は接触コンダクタンスのこと CONTA174の リアルコンスタントのことらしい
		real,CNUM
		type,3		!要素ナンバー3のこと 3ということはtarge170
		cmsel,s,a_targ	!Cuの表面選択
		nsla,s,1	!選択されたエリアに関する節点の選択
		esurf		!既存の要素の自由表面に重ねて要素を生成とのこと
		type,5		!
		cmsel,s,a_cont	!はんだ下面の選択
		nsla,s,1	!選択されたエリアに関する節点の選択
		esurf
		allsel


*DO,ii,1,2,1
		CNUM=CNUM+1
		allsel
		!Create Contact Pair
		asel,s,,,A17+6+4	!下面を選択
		cm,a_cont,area	!a_contという名をつける
		asel,s,,,74+(ii-1)*100	!Cu表面を選択
		cm,a_targ,area	!a_targという名をつける  TARGがくっつける相手の（通常大きいほうの）面
		allsel
		r,CNUM
		rmodif,CNUM,14,1e6		!14は接触コンダクタンスのこと CONTA174の リアルコンスタントのことらしい
		real,CNUM
		type,3		!要素ナンバー3のこと 3ということはtarge170
		cmsel,s,a_targ	!Cuの表面選択
		nsla,s,1	!選択されたエリアに関する節点の選択
		esurf		!既存の要素の自由表面に重ねて要素を生成とのこと
		type,5		!
		cmsel,s,a_cont	!はんだ下面の選択
		nsla,s,1	!選択されたエリアに関する節点の選択
		esurf
		allsel
*ENDDO

*DO,ii,1,2,1
		CNUM=CNUM+1
		allsel
		!Create Contact Pair
		asel,s,,,A17+6+4	!下面を選択
		cm,a_cont,area	!a_contという名をつける
		asel,s,,,2+(ii-1)*161	!Cu表面を選択
		cm,a_targ,area	!a_targという名をつける  TARGがくっつける相手の（通常大きいほうの）面
		allsel
		r,CNUM
		rmodif,CNUM,14,1e6		!14は接触コンダクタンスのこと CONTA174の リアルコンスタントのことらしい
		real,CNUM
		type,3		!要素ナンバー3のこと 3ということはtarge170
		cmsel,s,a_targ	!Cuの表面選択
		nsla,s,1	!選択されたエリアに関する節点の選択
		esurf		!既存の要素の自由表面に重ねて要素を生成とのこと
		type,10		!
		cmsel,s,a_cont	!はんだ下面の選択
		nsla,s,1	!選択されたエリアに関する節点の選択
		esurf
		allsel
*ENDDO


		CNUM=CNUM+1
		allsel
		!Create Contact Pair
		asel,s,,,A17+6+4	!下面を選択
		cm,a_cont,area	!a_contという名をつける
		asel,s,,,158	!Cu表面を選択
		cm,a_targ,area	!a_targという名をつける  TARGがくっつける相手の（通常大きいほうの）面
		allsel
		r,CNUM
		rmodif,CNUM,14,1e6		!14は接触コンダクタンスのこと CONTA174の リアルコンスタントのことらしい
		real,CNUM
		type,3		!要素ナンバー3のこと 3ということはtarge170
		cmsel,s,a_targ	!Cuの表面選択
		nsla,s,1	!選択されたエリアに関する節点の選択
		esurf		!既存の要素の自由表面に重ねて要素を生成とのこと
		type,8		!
		cmsel,s,a_cont	!はんだ下面の選択
		nsla,s,1	!選択されたエリアに関する節点の選択
		esurf
		allsel

		CNUM=CNUM+1
		allsel
		!Create Contact Pair
		asel,s,,,A17+6+4	!下面を選択
		cm,a_cont,area	!a_contという名をつける
		asel,s,,,A15+6*6+2	!Cu表面を選択
		cm,a_targ,area	!a_targという名をつける  TARGがくっつける相手の（通常大きいほうの）面
		allsel
		r,CNUM
		rmodif,CNUM,14,1e6		!14は接触コンダクタンスのこと CONTA174の リアルコンスタントのことらしい
		real,CNUM
		type,3		!要素ナンバー3のこと 3ということはtarge170
		cmsel,s,a_targ	!Cuの表面選択
		nsla,s,1	!選択されたエリアに関する節点の選択
		esurf		!既存の要素の自由表面に重ねて要素を生成とのこと
		type,5		!
		cmsel,s,a_cont	!はんだ下面の選択
		nsla,s,1	!選択されたエリアに関する節点の選択
		esurf
		allsel

		CNUM=CNUM+1
		allsel
		!Create Contact Pair
		asel,s,,,A17+6+4	!下面を選択
		cm,a_cont,area	!a_contという名をつける
		asel,s,,,A15+6*3+2	!Cu表面を選択
		cm,a_targ,area	!a_targという名をつける  TARGがくっつける相手の（通常大きいほうの）面
		allsel
		r,CNUM
		rmodif,CNUM,14,1e6		!14は接触コンダクタンスのこと CONTA174の リアルコンスタントのことらしい
		real,CNUM
		type,3		!要素ナンバー3のこと 3ということはtarge170
		cmsel,s,a_targ	!Cuの表面選択
		nsla,s,1	!選択されたエリアに関する節点の選択
		esurf		!既存の要素の自由表面に重ねて要素を生成とのこと
		type,5		!
		cmsel,s,a_cont	!はんだ下面の選択
		nsla,s,1	!選択されたエリアに関する節点の選択
		esurf
		allsel

		CNUM=CNUM+1
		allsel
		!Create Contact Pair
		asel,s,,,A17+6+4	!下面を選択
		cm,a_cont,area	!a_contという名をつける
		asel,s,,,A15+6*5+2	!Cu表面を選択
		cm,a_targ,area	!a_targという名をつける  TARGがくっつける相手の（通常大きいほうの）面
		allsel
		r,CNUM
		rmodif,CNUM,14,1e6		!14は接触コンダクタンスのこと CONTA174の リアルコンスタントのことらしい
		real,CNUM
		type,3		!要素ナンバー3のこと 3ということはtarge170
		cmsel,s,a_targ	!Cuの表面選択
		nsla,s,1	!選択されたエリアに関する節点の選択
		esurf		!既存の要素の自由表面に重ねて要素を生成とのこと
		type,5		!
		cmsel,s,a_cont	!はんだ下面の選択
		nsla,s,1	!選択されたエリアに関する節点の選択
		esurf
		allsel

		CNUM=CNUM+1
		allsel
		!Create Contact Pair
		asel,s,,,A17+6+4	!下面を選択
		cm,a_cont,area	!a_contという名をつける
		asel,s,,,A15+6*7+2	!Cu表面を選択
		cm,a_targ,area	!a_targという名をつける  TARGがくっつける相手の（通常大きいほうの）面
		allsel
		r,CNUM
		rmodif,CNUM,14,1e6		!14は接触コンダクタンスのこと CONTA174の リアルコンスタントのことらしい
		real,CNUM
		type,3		!要素ナンバー3のこと 3ということはtarge170
		cmsel,s,a_targ	!Cuの表面選択
		nsla,s,1	!選択されたエリアに関する節点の選択
		esurf		!既存の要素の自由表面に重ねて要素を生成とのこと
		type,5		!
		cmsel,s,a_cont	!はんだ下面の選択
		nsla,s,1	!選択されたエリアに関する節点の選択
		esurf
		allsel

		CNUM=CNUM+1
		allsel
		!Create Contact Pair
		asel,s,,,A17+6+4	!下面を選択
		cm,a_cont,area	!a_contという名をつける
		asel,s,,,A15+6*8+2	!Cu表面を選択
		cm,a_targ,area	!a_targという名をつける  TARGがくっつける相手の（通常大きいほうの）面
		allsel
		r,CNUM
		rmodif,CNUM,14,1e6		!14は接触コンダクタンスのこと CONTA174の リアルコンスタントのことらしい
		real,CNUM
		type,3		!要素ナンバー3のこと 3ということはtarge170
		cmsel,s,a_targ	!Cuの表面選択
		nsla,s,1	!選択されたエリアに関する節点の選択
		esurf		!既存の要素の自由表面に重ねて要素を生成とのこと
		type,5		!
		cmsel,s,a_cont	!はんだ下面の選択
		nsla,s,1	!選択されたエリアに関する節点の選択
		esurf
		allsel

		CNUM=CNUM+1
		allsel
		!Create Contact Pair
		asel,s,,,A17+6+4	!下面を選択
		cm,a_cont,area	!a_contという名をつける
		asel,s,,,A15+6*9+2	!Cu表面を選択
		cm,a_targ,area	!a_targという名をつける  TARGがくっつける相手の（通常大きいほうの）面
		allsel
		r,CNUM
		rmodif,CNUM,14,1e6		!14は接触コンダクタンスのこと CONTA174の リアルコンスタントのことらしい
		real,CNUM
		type,3		!要素ナンバー3のこと 3ということはtarge170
		cmsel,s,a_targ	!Cuの表面選択
		nsla,s,1	!選択されたエリアに関する節点の選択
		esurf		!既存の要素の自由表面に重ねて要素を生成とのこと
		type,5		!
		cmsel,s,a_cont	!はんだ下面の選択
		nsla,s,1	!選択されたエリアに関する節点の選択
		esurf
		allsel


		CNUM=CNUM+1
		allsel
		!Create Contact Pair
		asel,s,,,A17+6+4	!下面を選択
		cm,a_cont,area	!a_contという名をつける
		asel,s,,,A14+6*3+2	!Cu表面を選択
		cm,a_targ,area	!a_targという名をつける  TARGがくっつける相手の（通常大きいほうの）面
		allsel
		r,CNUM
		rmodif,CNUM,14,1e6		!14は接触コンダクタンスのこと CONTA174の リアルコンスタントのことらしい
		real,CNUM
		type,3		!要素ナンバー3のこと 3ということはtarge170
		cmsel,s,a_targ	!Cuの表面選択
		nsla,s,1	!選択されたエリアに関する節点の選択
		esurf		!既存の要素の自由表面に重ねて要素を生成とのこと
		type,5		!
		cmsel,s,a_cont	!はんだ下面の選択
		nsla,s,1	!選択されたエリアに関する節点の選択
		esurf
		allsel
!!!!!!


*DO,ii,1,9,1
		CNUM=CNUM+1
		allsel
		!Create Contact Pair
		asel,s,,,A17+6+6	!下面を選択
		cm,a_cont,area	!a_contという名をつける
		asel,s,,,361+(ii-1)*6	!Cu表面を選択
		cm,a_targ,area	!a_targという名をつける  TARGがくっつける相手の（通常大きいほうの）面
		allsel
		r,CNUM
		rmodif,CNUM,14,1e6		!14は接触コンダクタンスのこと CONTA174の リアルコンスタントのことらしい
		real,CNUM
		type,3		!要素ナンバー3のこと 3ということはtarge170
		cmsel,s,a_targ	!Cuの表面選択
		nsla,s,1	!選択されたエリアに関する節点の選択
		esurf		!既存の要素の自由表面に重ねて要素を生成とのこと
		type,8		!
		cmsel,s,a_cont	!はんだ下面の選択
		nsla,s,1	!選択されたエリアに関する節点の選択
		esurf
		allsel
*ENDDO

*DO,ii,1,8,1
		CNUM=CNUM+1
		allsel
		!Create Contact Pair
		asel,s,,,A17+6+6	!下面を選択
		cm,a_cont,area	!a_contという名をつける
		asel,s,,,A16+(ii-1)*6+1	!Cu表面を選択
		cm,a_targ,area	!a_targという名をつける  TARGがくっつける相手の（通常大きいほうの）面
		allsel
		r,CNUM
		rmodif,CNUM,14,1e6		!14は接触コンダクタンスのこと CONTA174の リアルコンスタントのことらしい
		real,CNUM
		type,3		!要素ナンバー3のこと 3ということはtarge170
		cmsel,s,a_targ	!Cuの表面選択
		nsla,s,1	!選択されたエリアに関する節点の選択
		esurf		!既存の要素の自由表面に重ねて要素を生成とのこと
		type,5		!
		cmsel,s,a_cont	!はんだ下面の選択
		nsla,s,1	!選択されたエリアに関する節点の選択
		esurf
		allsel
*ENDDO

!信号ピン上樹脂
*DO,ii,1,9,1
		CNUM=CNUM+1
		allsel
		!Create Contact Pair
		asel,s,,,A17+6*2+1	!下面を選択
		cm,a_cont,area	!a_contという名をつける
		asel,s,,,361+(ii-1)*6+5	!Cu表面を選択
		cm,a_targ,area	!a_targという名をつける  TARGがくっつける相手の（通常大きいほうの）面
		allsel
		r,CNUM
		rmodif,CNUM,14,1e6		!14は接触コンダクタンスのこと CONTA174の リアルコンスタントのことらしい
		real,CNUM
		type,3		!要素ナンバー3のこと 3ということはtarge170
		cmsel,s,a_targ	!Cuの表面選択
		nsla,s,1	!選択されたエリアに関する節点の選択
		esurf		!既存の要素の自由表面に重ねて要素を生成とのこと
		type,8		!
		cmsel,s,a_cont	!はんだ下面の選択
		nsla,s,1	!選択されたエリアに関する節点の選択
		esurf
		allsel
*ENDDO

*DO,ii,1,8,1
		CNUM=CNUM+1
		allsel
		!Create Contact Pair
		asel,s,,,A17+6*2+1	!下面を選択
		cm,a_cont,area	!a_contという名をつける
		asel,s,,,A16+(ii-1)*6+1+5	!Cu表面を選択
		cm,a_targ,area	!a_targという名をつける  TARGがくっつける相手の（通常大きいほうの）面
		allsel
		r,CNUM
		rmodif,CNUM,14,1e6		!14は接触コンダクタンスのこと CONTA174の リアルコンスタントのことらしい
		real,CNUM
		type,3		!要素ナンバー3のこと 3ということはtarge170
		cmsel,s,a_targ	!Cuの表面選択
		nsla,s,1	!選択されたエリアに関する節点の選択
		esurf		!既存の要素の自由表面に重ねて要素を生成とのこと
		type,5		!
		cmsel,s,a_cont	!はんだ下面の選択
		nsla,s,1	!選択されたエリアに関する節点の選択
		esurf
		allsel
*ENDDO

		CNUM=CNUM+1
		allsel
		!Create Contact Pair
		asel,s,,,A17+6*2+3	!下面を選択
		cm,a_cont,area	!a_contという名をつける
		asel,s,,,A17+6*3+5	!Cu表面を選択
		cm,a_targ,area	!a_targという名をつける  TARGがくっつける相手の（通常大きいほうの）面
		allsel
		r,CNUM
		rmodif,CNUM,14,1e6		!14は接触コンダクタンスのこと CONTA174の リアルコンスタントのことらしい
		real,CNUM
		type,3		!要素ナンバー3のこと 3ということはtarge170
		cmsel,s,a_targ	!Cuの表面選択
		nsla,s,1	!選択されたエリアに関する節点の選択
		esurf		!既存の要素の自由表面に重ねて要素を生成とのこと
		type,5		!
		cmsel,s,a_cont	!はんだ下面の選択
		nsla,s,1	!選択されたエリアに関する節点の選択
		esurf
		allsel
*DO,ii,1,5,1
		CNUM=CNUM+1
		allsel
		!Create Contact Pair
		asel,s,,,A17+6*2+4	!下面を選択
		cm,a_cont,area	!a_contという名をつける
		asel,s,,,A15+6*3+2+(ii-1)*6	!Cu表面を選択
		cm,a_targ,area	!a_targという名をつける  TARGがくっつける相手の（通常大きいほうの）面
		allsel
		r,CNUM
		rmodif,CNUM,14,1e6		!14は接触コンダクタンスのこと CONTA174の リアルコンスタントのことらしい
		real,CNUM
		type,3		!要素ナンバー3のこと 3ということはtarge170
		cmsel,s,a_targ	!Cuの表面選択
		nsla,s,1	!選択されたエリアに関する節点の選択
		esurf		!既存の要素の自由表面に重ねて要素を生成とのこと
		type,5		!
		cmsel,s,a_cont	!はんだ下面の選択
		nsla,s,1	!選択されたエリアに関する節点の選択
		esurf
		allsel
*ENDDO

!最後の信号ピンとなり、P側樹脂
*DO,ii,1,2,1
		CNUM=CNUM+1
		allsel
		!Create Contact Pair
		asel,s,,,A17+6*3+4	!下面を選択
		cm,a_cont,area	!a_contという名をつける
		asel,s,,,A15+6*5+2+(ii-1)*12	!Cu表面を選択
		cm,a_targ,area	!a_targという名をつける  TARGがくっつける相手の（通常大きいほうの）面
		allsel
		r,CNUM
		rmodif,CNUM,14,1e6		!14は接触コンダクタンスのこと CONTA174の リアルコンスタントのことらしい
		real,CNUM
		type,3		!要素ナンバー3のこと 3ということはtarge170
		cmsel,s,a_targ	!Cuの表面選択
		nsla,s,1	!選択されたエリアに関する節点の選択
		esurf		!既存の要素の自由表面に重ねて要素を生成とのこと
		type,5		!
		cmsel,s,a_cont	!はんだ下面の選択
		nsla,s,1	!選択されたエリアに関する節点の選択
		esurf
		allsel
*ENDDO

*DO,ii,1,2,1
		CNUM=CNUM+1
		allsel
		!Create Contact Pair
		asel,s,,,A17+6*3+4	!下面を選択
		cm,a_cont,area	!a_contという名をつける
		asel,s,,,74+(ii-1)*100	!Cu表面を選択
		cm,a_targ,area	!a_targという名をつける  TARGがくっつける相手の（通常大きいほうの）面
		allsel
		r,CNUM
		rmodif,CNUM,14,1e6		!14は接触コンダクタンスのこと CONTA174の リアルコンスタントのことらしい
		real,CNUM
		type,3		!要素ナンバー3のこと 3ということはtarge170
		cmsel,s,a_targ	!Cuの表面選択
		nsla,s,1	!選択されたエリアに関する節点の選択
		esurf		!既存の要素の自由表面に重ねて要素を生成とのこと
		type,5		!
		cmsel,s,a_cont	!はんだ下面の選択
		nsla,s,1	!選択されたエリアに関する節点の選択
		esurf
		allsel
*ENDDO

*DO,ii,1,2,1
		CNUM=CNUM+1
		allsel
		!Create Contact Pair
		asel,s,,,A17+6*3+4	!下面を選択
		cm,a_cont,area	!a_contという名をつける
		asel,s,,,2+(ii-1)*161	!Cu表面を選択
		cm,a_targ,area	!a_targという名をつける  TARGがくっつける相手の（通常大きいほうの）面
		allsel
		r,CNUM
		rmodif,CNUM,14,1e6		!14は接触コンダクタンスのこと CONTA174の リアルコンスタントのことらしい
		real,CNUM
		type,3		!要素ナンバー3のこと 3ということはtarge170
		cmsel,s,a_targ	!Cuの表面選択
		nsla,s,1	!選択されたエリアに関する節点の選択
		esurf		!既存の要素の自由表面に重ねて要素を生成とのこと
		type,10		!
		cmsel,s,a_cont	!はんだ下面の選択
		nsla,s,1	!選択されたエリアに関する節点の選択
		esurf
		allsel
*ENDDO

		CNUM=CNUM+1
		allsel
		!Create Contact Pair
		asel,s,,,A17+6*3+4	!下面を選択
		cm,a_cont,area	!a_contという名をつける
		asel,s,,,158	!Cu表面を選択
		cm,a_targ,area	!a_targという名をつける  TARGがくっつける相手の（通常大きいほうの）面
		allsel
		r,CNUM
		rmodif,CNUM,14,1e6		!14は接触コンダクタンスのこと CONTA174の リアルコンスタントのことらしい
		real,CNUM
		type,3		!要素ナンバー3のこと 3ということはtarge170
		cmsel,s,a_targ	!Cuの表面選択
		nsla,s,1	!選択されたエリアに関する節点の選択
		esurf		!既存の要素の自由表面に重ねて要素を生成とのこと
		type,8		!
		cmsel,s,a_cont	!はんだ下面の選択
		nsla,s,1	!選択されたエリアに関する節点の選択
		esurf
		allsel

		CNUM=CNUM+1
		allsel
		!Create Contact Pair
		asel,s,,,A17+6*3+5	!下面を選択
		cm,a_cont,area	!a_contという名をつける
		asel,s,,,411	!Cu表面を選択
		cm,a_targ,area	!a_targという名をつける  TARGがくっつける相手の（通常大きいほうの）面
		allsel
		r,CNUM
		rmodif,CNUM,14,1e6		!14は接触コンダクタンスのこと CONTA174の リアルコンスタントのことらしい
		real,CNUM
		type,3		!要素ナンバー3のこと 3ということはtarge170
		cmsel,s,a_targ	!Cuの表面選択
		nsla,s,1	!選択されたエリアに関する節点の選択
		esurf		!既存の要素の自由表面に重ねて要素を生成とのこと
		type,8		!
		cmsel,s,a_cont	!はんだ下面の選択
		nsla,s,1	!選択されたエリアに関する節点の選択
		esurf
		allsel


!信号PINまわり最後の樹脂作成で
!点 8*4新規発生
!線 12*4新規発生
!面 6*4新規発生
!VOL 4新規発生
!X1=KBASE+2*PARA*8*10
!X1=X1+2*PARA*32+2*PARA*8
!X1=X1+2*PARA*26+13*PARA*2
!X1=X1+16*PARA*2+8*PARA*2
!X1=X1+8*PARA*2+8*PARA*2		!チップ周辺最後の樹脂
!X1=X1+8*(PARA-2)*2	!パラ間の樹脂
!X1=X1+8*2			!チップ行間の中央横長樹脂
!X1=X1+8*8			!チップ行　左右端の樹脂
!X1=X1+8*8			!柱前後とチップ前後の樹脂
!X1=X1+8*11			!BUS下およびBUS横の樹脂
!X1=X1+8*10			!DBC間の最後の樹脂作成
!X1=X1+8*8			!信号PIN間の樹脂の作成
X1=X1+8*4			!信号PINまわり最後の樹脂作成で
!X2=LBASE+2*PARA*12*10
!X2=X2+2*PARA*(32+20)		!チップ側面樹脂まで
!X2=X2+2*PARA*53+33*PARA*2	!53EMIはんだ側面樹脂
!X2=X2+32*PARA*2+20*PARA*2	!
!X2=X2+20*PARA*2+12*PARA*2
!X2=X2+12*(PARA-2)*2
!X2=X2+24
!X2=X2+12*8
!X2=X2+12*8
!X2=X2+12*11
!X2=X2+12*10
!X2=X2+12*8
X2=X2+12*4
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!X3=X3+6*8
X3=X3+6*4
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!X4=X4+8
X4=X4+4

!改めて面の基準どり
A1=ABASE+PARA*2*6*10	! ←樹脂の手前まで 上のDBC下はんだまで
A2=A1+20*PARA*2	! ダイ半田横の樹脂まで
A3=A2+16*PARA*2					! チップ横の樹脂まで
A4=A3+30*PARA*2					!EMIはんだ周辺樹脂まで
A5=A4+4*PARA*2					!EMIはんだまわり全部
A6=A5+27*PARA*2			!SPC下部分周辺樹脂まで
A7=A6+20*PARA*2			!面取り周辺樹脂まで
A8=A7+16*PARA*2			!上SPC周辺樹脂まで
A9=A8+16*PARA*2			!SPC上はんだ周辺樹脂まで
A10=A9+6*PARA*2			!EMI上の最後の樹脂まで
A11=A10+6*(PARA-2)*2			!PARA間の樹脂まで
A12=A11+6*2				!中央の樹脂まで
A13=A12+6*8				!チップ横の樹脂まで
A14=A13+6*8				!柱前後およびチップ前後の樹脂まで
A15=A14+6*11				!BUS下およびBUS横の樹脂
A16=A15+6*10				!DBC間の最後の樹脂作成
A17=A16+6*8				!信号PIN間の樹脂の作成
A18=A17+6*4				!信号PINまわり最後の樹脂作成

!BUSまわり最後の樹脂作成---------------------------------------------------------------
*DO,ii,1,4,1			!8つすべて
	*DO,jj,1,2,1		!上下
		*DO,kk,1,4,1	!4方向
				nn=X1+(ii-1)*8+(jj-1)*4+kk
				k,nn,RESINBUS2(ii,jj,kk,1),RESINBUS2(ii,jj,kk,2),RESINBUS2(ii,jj,kk,3)
		*ENDDO
	*ENDDO
*ENDDO
*DO,ii,1,4,1
			kk=X1+(ii-1)*8
			V,kk+1,kk+2,kk+3,kk+4,kk+5,kk+6,kk+7,kk+8
*ENDDO
*DO,ii,1,4,1
		D_PLTX=NINT((RESINBUS2(ii,1,2,1)-RESINBUS2(ii,1,1,1))/M_RESINX)
		D_PLTY=NINT((RESINBUS2(ii,1,3,2)-RESINBUS2(ii,1,2,2))/M_RESINY)
		D_PLTZ=NINT( (RESINBUS2(ii,2,1,3)-RESINBUS2(ii,1,1,3) )/M_RESINZ)
*IF,D_PLTZ,LT,3,THEN
	D_PLTZ=3
*ENDIF
		lsel,s,,,X2+(ii-1)*12+1
		lesiz,all,,,D_PLTX		!z分割
		lsel,all			!最後にこのALLがないと、次にLをSELできなくなってしまいエラーが発生します。これはMUST
		lsel,s,,,X2+(ii-1)*12+2
		lesiz,all,,,D_PLTY		!z分割
		lsel,all			!最後にこのALLがないと、次にLをSELできなくなってしまいエラーが発生します。これはMUST
		lsel,s,,,X2+(ii-1)*12+5
		lesiz,all,,,D_PLTZ		!z分割
		lsel,all			!最後にこのALLがないと、次にLをSELできなくなってしまいエラーが発生します。これはMUST
		VMESH,X4+ii
*ENDDO

!---------BUS側樹脂の接合----------------------------------------

!O側の樹脂
		CNUM=CNUM+1
		allsel
		!Create Contact Pair
		asel,s,,,A18+2	!下面を選択
		cm,a_cont,area	!a_contという名をつける
		asel,s,,,160	!Cu表面を選択
		cm,a_targ,area	!a_targという名をつける  TARGがくっつける相手の（通常大きいほうの）面
		allsel
		r,CNUM
		rmodif,CNUM,14,1e6		!14は接触コンダクタンスのこと CONTA174の リアルコンスタントのことらしい
		real,CNUM
		type,3		!要素ナンバー3のこと 3ということはtarge170
		cmsel,s,a_targ	!Cuの表面選択
		nsla,s,1	!選択されたエリアに関する節点の選択
		esurf		!既存の要素の自由表面に重ねて要素を生成とのこと
		type,8		!
		cmsel,s,a_cont	!はんだ下面の選択
		nsla,s,1	!選択されたエリアに関する節点の選択
		esurf
		allsel
*DO,ii,1,2,1
		CNUM=CNUM+1
		allsel
		!Create Contact Pair
		asel,s,,,A18+2	!下面を選択
		cm,a_cont,area	!a_contという名をつける
		asel,s,,,4+(ii-1)*161	!Cu表面を選択
		cm,a_targ,area	!a_targという名をつける  TARGがくっつける相手の（通常大きいほうの）面
		allsel
		r,CNUM
		rmodif,CNUM,14,1e6		!14は接触コンダクタンスのこと CONTA174の リアルコンスタントのことらしい
		real,CNUM
		type,3		!要素ナンバー3のこと 3ということはtarge170
		cmsel,s,a_targ	!Cuの表面選択
		nsla,s,1	!選択されたエリアに関する節点の選択
		esurf		!既存の要素の自由表面に重ねて要素を生成とのこと
		type,10		!
		cmsel,s,a_cont	!はんだ下面の選択
		nsla,s,1	!選択されたエリアに関する節点の選択
		esurf
		allsel
*ENDDO

*DO,ii,1,2,1
		CNUM=CNUM+1
		allsel
		!Create Contact Pair
		asel,s,,,A18+2	!下面を選択
		cm,a_cont,area	!a_contという名をつける
		asel,s,,,148+(ii-1)*35	!Cu表面を選択
		cm,a_targ,area	!a_targという名をつける  TARGがくっつける相手の（通常大きいほうの）面
		allsel
		r,CNUM
		rmodif,CNUM,14,1e6		!14は接触コンダクタンスのこと CONTA174の リアルコンスタントのことらしい
		real,CNUM
		type,3		!要素ナンバー3のこと 3ということはtarge170
		cmsel,s,a_targ	!Cuの表面選択
		nsla,s,1	!選択されたエリアに関する節点の選択
		esurf		!既存の要素の自由表面に重ねて要素を生成とのこと
		type,5		!
		cmsel,s,a_cont	!はんだ下面の選択
		nsla,s,1	!選択されたエリアに関する節点の選択
		esurf
		allsel
*ENDDO

		CNUM=CNUM+1
		allsel
		!Create Contact Pair
		asel,s,,,A18+2	!下面を選択
		cm,a_cont,area	!a_contという名をつける
		asel,s,,,A15+6*6+4	!Cu表面を選択
		cm,a_targ,area	!a_targという名をつける  TARGがくっつける相手の（通常大きいほうの）面
		allsel
		r,CNUM
		rmodif,CNUM,14,1e6		!14は接触コンダクタンスのこと CONTA174の リアルコンスタントのことらしい
		real,CNUM
		type,3		!要素ナンバー3のこと 3ということはtarge170
		cmsel,s,a_targ	!Cuの表面選択
		nsla,s,1	!選択されたエリアに関する節点の選択
		esurf		!既存の要素の自由表面に重ねて要素を生成とのこと
		type,5		!
		cmsel,s,a_cont	!はんだ下面の選択
		nsla,s,1	!選択されたエリアに関する節点の選択
		esurf
		allsel

		CNUM=CNUM+1
		allsel
		!Create Contact Pair
		asel,s,,,A18+2	!下面を選択
		cm,a_cont,area	!a_contという名をつける
		asel,s,,,A15+4	!Cu表面を選択
		cm,a_targ,area	!a_targという名をつける  TARGがくっつける相手の（通常大きいほうの）面
		allsel
		r,CNUM
		rmodif,CNUM,14,1e6		!14は接触コンダクタンスのこと CONTA174の リアルコンスタントのことらしい
		real,CNUM
		type,3		!要素ナンバー3のこと 3ということはtarge170
		cmsel,s,a_targ	!Cuの表面選択
		nsla,s,1	!選択されたエリアに関する節点の選択
		esurf		!既存の要素の自由表面に重ねて要素を生成とのこと
		type,5		!
		cmsel,s,a_cont	!はんだ下面の選択
		nsla,s,1	!選択されたエリアに関する節点の選択
		esurf
		allsel

		CNUM=CNUM+1
		allsel
		!Create Contact Pair
		asel,s,,,A18+3	!下面を選択
		cm,a_cont,area	!a_contという名をつける
		asel,s,,,341	!Cu表面を選択
		cm,a_targ,area	!a_targという名をつける  TARGがくっつける相手の（通常大きいほうの）面
		allsel
		r,CNUM
		rmodif,CNUM,14,1e6		!14は接触コンダクタンスのこと CONTA174の リアルコンスタントのことらしい
		real,CNUM
		type,3		!要素ナンバー3のこと 3ということはtarge170
		cmsel,s,a_targ	!Cuの表面選択
		nsla,s,1	!選択されたエリアに関する節点の選択
		esurf		!既存の要素の自由表面に重ねて要素を生成とのこと
		type,8		!
		cmsel,s,a_cont	!はんだ下面の選択
		nsla,s,1	!選択されたエリアに関する節点の選択
		esurf
		allsel

		CNUM=CNUM+1
		allsel
		!Create Contact Pair
		asel,s,,,A18+3	!下面を選択
		cm,a_cont,area	!a_contという名をつける
		asel,s,,,A14+5	!Cu表面を選択
		cm,a_targ,area	!a_targという名をつける  TARGがくっつける相手の（通常大きいほうの）面
		allsel
		r,CNUM
		rmodif,CNUM,14,1e6		!14は接触コンダクタンスのこと CONTA174の リアルコンスタントのことらしい
		real,CNUM
		type,3		!要素ナンバー3のこと 3ということはtarge170
		cmsel,s,a_targ	!Cuの表面選択
		nsla,s,1	!選択されたエリアに関する節点の選択
		esurf		!既存の要素の自由表面に重ねて要素を生成とのこと
		type,8		!
		cmsel,s,a_cont	!はんだ下面の選択
		nsla,s,1	!選択されたエリアに関する節点の選択
		esurf
		allsel

*DO,ii,1,2,1
		CNUM=CNUM+1
		allsel
		!Create Contact Pair
		asel,s,,,A18+3	!下面を選択
		cm,a_cont,area	!a_contという名をつける
		asel,s,,,A18+5+(ii-1)*6+6	!Cu表面を選択
		cm,a_targ,area	!a_targという名をつける  TARGがくっつける相手の（通常大きいほうの）面
		allsel
		r,CNUM
		rmodif,CNUM,14,1e6		!14は接触コンダクタンスのこと CONTA174の リアルコンスタントのことらしい
		real,CNUM
		type,3		!要素ナンバー3のこと 3ということはtarge170
		cmsel,s,a_targ	!Cuの表面選択
		nsla,s,1	!選択されたエリアに関する節点の選択
		esurf		!既存の要素の自由表面に重ねて要素を生成とのこと
		type,5		!
		cmsel,s,a_cont	!はんだ下面の選択
		nsla,s,1	!選択されたエリアに関する節点の選択
		esurf
		allsel
*ENDDO

!2こめ　BUS下側
*DO,ii,1,3,1
		CNUM=CNUM+1
		allsel
		!Create Contact Pair
		asel,s,,,A18+6+6	!下面を選択
		cm,a_cont,area	!a_contという名をつける
		asel,s,,,A14+1+(ii-1)*6	!Cu表面を選択
		cm,a_targ,area	!a_targという名をつける  TARGがくっつける相手の（通常大きいほうの）面
		allsel
		r,CNUM
		rmodif,CNUM,14,1e6		!14は接触コンダクタンスのこと CONTA174の リアルコンスタントのことらしい
		real,CNUM
		type,3		!要素ナンバー3のこと 3ということはtarge170
		cmsel,s,a_targ	!Cuの表面選択
		nsla,s,1	!選択されたエリアに関する節点の選択
		esurf		!既存の要素の自由表面に重ねて要素を生成とのこと
		type,5		!
		cmsel,s,a_cont	!はんだ下面の選択
		nsla,s,1	!選択されたエリアに関する節点の選択
		esurf
		allsel
*ENDDO

*DO,ii,1,3,1
		CNUM=CNUM+1
		allsel
		!Create Contact Pair
		asel,s,,,A18+6+6	!下面を選択
		cm,a_cont,area	!a_contという名をつける
		asel,s,,,A14+6*8+(ii-1)*6+1	!Cu表面を選択
		cm,a_targ,area	!a_targという名をつける  TARGがくっつける相手の（通常大きいほうの）面
		allsel
		r,CNUM
		rmodif,CNUM,14,1e6		!14は接触コンダクタンスのこと CONTA174の リアルコンスタントのことらしい
		real,CNUM
		type,3		!要素ナンバー3のこと 3ということはtarge170
		cmsel,s,a_targ	!Cuの表面選択
		nsla,s,1	!選択されたエリアに関する節点の選択
		esurf		!既存の要素の自由表面に重ねて要素を生成とのこと
		type,5		!
		cmsel,s,a_cont	!はんだ下面の選択
		nsla,s,1	!選択されたエリアに関する節点の選択
		esurf
		allsel
*ENDDO

*DO,ii,1,2,1
		CNUM=CNUM+1
		allsel
		!Create Contact Pair
		asel,s,,,A18+6+6	!下面を選択
		cm,a_cont,area	!a_contという名をつける
		asel,s,,,A14+6*5+(ii-1)*6*2+1	!Cu表面を選択
		cm,a_targ,area	!a_targという名をつける  TARGがくっつける相手の（通常大きいほうの）面
		allsel
		r,CNUM
		rmodif,CNUM,14,1e6		!14は接触コンダクタンスのこと CONTA174の リアルコンスタントのことらしい
		real,CNUM
		type,3		!要素ナンバー3のこと 3ということはtarge170
		cmsel,s,a_targ	!Cuの表面選択
		nsla,s,1	!選択されたエリアに関する節点の選択
		esurf		!既存の要素の自由表面に重ねて要素を生成とのこと
		type,5		!
		cmsel,s,a_cont	!はんだ下面の選択
		nsla,s,1	!選択されたエリアに関する節点の選択
		esurf
		allsel
*ENDDO

		CNUM=CNUM+1
		allsel
		!Create Contact Pair
		asel,s,,,A18+6+2	!下面を選択
		cm,a_cont,area	!a_contという名をつける
		asel,s,,,160	!Cu表面を選択
		cm,a_targ,area	!a_targという名をつける  TARGがくっつける相手の（通常大きいほうの）面
		allsel
		r,CNUM
		rmodif,CNUM,14,1e6		!14は接触コンダクタンスのこと CONTA174の リアルコンスタントのことらしい
		real,CNUM
		type,3		!要素ナンバー3のこと 3ということはtarge170
		cmsel,s,a_targ	!Cuの表面選択
		nsla,s,1	!選択されたエリアに関する節点の選択
		esurf		!既存の要素の自由表面に重ねて要素を生成とのこと
		type,8		!
		cmsel,s,a_cont	!はんだ下面の選択
		nsla,s,1	!選択されたエリアに関する節点の選択
		esurf
		allsel

*DO,ii,1,2,1
		CNUM=CNUM+1
		allsel
		!Create Contact Pair
		asel,s,,,A18+6+2	!下面を選択
		cm,a_cont,area	!a_contという名をつける
		asel,s,,,4+(ii-1)*161	!Cu表面を選択
		cm,a_targ,area	!a_targという名をつける  TARGがくっつける相手の（通常大きいほうの）面
		allsel
		r,CNUM
		rmodif,CNUM,14,1e6		!14は接触コンダクタンスのこと CONTA174の リアルコンスタントのことらしい
		real,CNUM
		type,3		!要素ナンバー3のこと 3ということはtarge170
		cmsel,s,a_targ	!Cuの表面選択
		nsla,s,1	!選択されたエリアに関する節点の選択
		esurf		!既存の要素の自由表面に重ねて要素を生成とのこと
		type,10		!
		cmsel,s,a_cont	!はんだ下面の選択
		nsla,s,1	!選択されたエリアに関する節点の選択
		esurf
		allsel
*ENDDO

*DO,ii,1,2,1
		CNUM=CNUM+1
		allsel
		!Create Contact Pair
		asel,s,,,A18+6+2	!下面を選択
		cm,a_cont,area	!a_contという名をつける
		asel,s,,,148+(ii-1)*35	!Cu表面を選択
		cm,a_targ,area	!a_targという名をつける  TARGがくっつける相手の（通常大きいほうの）面
		allsel
		r,CNUM
		rmodif,CNUM,14,1e6		!14は接触コンダクタンスのこと CONTA174の リアルコンスタントのことらしい
		real,CNUM
		type,3		!要素ナンバー3のこと 3ということはtarge170
		cmsel,s,a_targ	!Cuの表面選択
		nsla,s,1	!選択されたエリアに関する節点の選択
		esurf		!既存の要素の自由表面に重ねて要素を生成とのこと
		type,5		!
		cmsel,s,a_cont	!はんだ下面の選択
		nsla,s,1	!選択されたエリアに関する節点の選択
		esurf
		allsel
*ENDDO

		CNUM=CNUM+1
		allsel
		!Create Contact Pair
		asel,s,,,A18+6+3	!下面を選択
		cm,a_cont,area	!a_contという名をつける
		asel,s,,,A18+6*3+5	!Cu表面を選択
		cm,a_targ,area	!a_targという名をつける  TARGがくっつける相手の（通常大きいほうの）面
		allsel
		r,CNUM
		rmodif,CNUM,14,1e6		!14は接触コンダクタンスのこと CONTA174の リアルコンスタントのことらしい
		real,CNUM
		type,3		!要素ナンバー3のこと 3ということはtarge170
		cmsel,s,a_targ	!Cuの表面選択
		nsla,s,1	!選択されたエリアに関する節点の選択
		esurf		!既存の要素の自由表面に重ねて要素を生成とのこと
		type,5		!
		cmsel,s,a_cont	!はんだ下面の選択
		nsla,s,1	!選択されたエリアに関する節点の選択
		esurf
		allsel

!3こめ 上の横長樹脂
*DO,ii,1,4,1
		CNUM=CNUM+1
		allsel
		!Create Contact Pair
		asel,s,,,A18+6*2+1	!下面を選択
		cm,a_cont,area	!a_contという名をつける
		asel,s,,,337+(ii-1)*6+5	!Cu表面を選択
		cm,a_targ,area	!a_targという名をつける  TARGがくっつける相手の（通常大きいほうの）面
		allsel
		r,CNUM
		rmodif,CNUM,14,1e6		!14は接触コンダクタンスのこと CONTA174の リアルコンスタントのことらしい
		real,CNUM
		type,3		!要素ナンバー3のこと 3ということはtarge170
		cmsel,s,a_targ	!Cuの表面選択
		nsla,s,1	!選択されたエリアに関する節点の選択
		esurf		!既存の要素の自由表面に重ねて要素を生成とのこと
		type,8		!
		cmsel,s,a_cont	!はんだ下面の選択
		nsla,s,1	!選択されたエリアに関する節点の選択
		esurf
		allsel
*ENDDO

*DO,ii,1,2,1
		CNUM=CNUM+1
		allsel
		!Create Contact Pair
		asel,s,,,A18+6*2+1	!下面を選択
		cm,a_cont,area	!a_contという名をつける
		asel,s,,,A14+6*5+(ii-1)*6*2+6	!Cu表面を選択
		cm,a_targ,area	!a_targという名をつける  TARGがくっつける相手の（通常大きいほうの）面
		allsel
		r,CNUM
		rmodif,CNUM,14,1e6		!14は接触コンダクタンスのこと CONTA174の リアルコンスタントのことらしい
		real,CNUM
		type,3		!要素ナンバー3のこと 3ということはtarge170
		cmsel,s,a_targ	!Cuの表面選択
		nsla,s,1	!選択されたエリアに関する節点の選択
		esurf		!既存の要素の自由表面に重ねて要素を生成とのこと
		type,5		!
		cmsel,s,a_cont	!はんだ下面の選択
		nsla,s,1	!選択されたエリアに関する節点の選択
		esurf
		allsel
*ENDDO

*DO,ii,1,2,1
		CNUM=CNUM+1
		allsel
		!Create Contact Pair
		asel,s,,,A18+6*2+1	!下面を選択
		cm,a_cont,area	!a_contという名をつける
		asel,s,,,A14+6*8+(ii-1)*6+6	!Cu表面を選択
		cm,a_targ,area	!a_targという名をつける  TARGがくっつける相手の（通常大きいほうの）面
		allsel
		r,CNUM
		rmodif,CNUM,14,1e6		!14は接触コンダクタンスのこと CONTA174の リアルコンスタントのことらしい
		real,CNUM
		type,3		!要素ナンバー3のこと 3ということはtarge170
		cmsel,s,a_targ	!Cuの表面選択
		nsla,s,1	!選択されたエリアに関する節点の選択
		esurf		!既存の要素の自由表面に重ねて要素を生成とのこと
		type,5		!
		cmsel,s,a_cont	!はんだ下面の選択
		nsla,s,1	!選択されたエリアに関する節点の選択
		esurf
		allsel
*ENDDO

		CNUM=CNUM+1
		allsel
		!Create Contact Pair
		asel,s,,,A18+6*2+2	!下面を選択
		cm,a_cont,area	!a_contという名をつける
		asel,s,,,A15+6+4	!Cu表面を選択
		cm,a_targ,area	!a_targという名をつける  TARGがくっつける相手の（通常大きいほうの）面
		allsel
		r,CNUM
		rmodif,CNUM,14,1e6		!14は接触コンダクタンスのこと CONTA174の リアルコンスタントのことらしい
		real,CNUM
		type,3		!要素ナンバー3のこと 3ということはtarge170
		cmsel,s,a_targ	!Cuの表面選択
		nsla,s,1	!選択されたエリアに関する節点の選択
		esurf		!既存の要素の自由表面に重ねて要素を生成とのこと
		type,5		!
		cmsel,s,a_cont	!はんだ下面の選択
		nsla,s,1	!選択されたエリアに関する節点の選択
		esurf
		allsel

		CNUM=CNUM+1
		allsel
		!Create Contact Pair
		asel,s,,,A18+6*2+3	!下面を選択
		cm,a_cont,area	!a_contという名をつける
		asel,s,,,A18+6*3+5	!Cu表面を選択
		cm,a_targ,area	!a_targという名をつける  TARGがくっつける相手の（通常大きいほうの）面
		allsel
		r,CNUM
		rmodif,CNUM,14,1e6		!14は接触コンダクタンスのこと CONTA174の リアルコンスタントのことらしい
		real,CNUM
		type,3		!要素ナンバー3のこと 3ということはtarge170
		cmsel,s,a_targ	!Cuの表面選択
		nsla,s,1	!選択されたエリアに関する節点の選択
		esurf		!既存の要素の自由表面に重ねて要素を生成とのこと
		type,5		!
		cmsel,s,a_cont	!はんだ下面の選択
		nsla,s,1	!選択されたエリアに関する節点の選択
		esurf
		allsel

!4つめ

		CNUM=CNUM+1
		allsel
		!Create Contact Pair
		asel,s,,,A18+6*3+2	!下面を選択
		cm,a_cont,area	!a_contという名をつける
		asel,s,,,160	!Cu表面を選択
		cm,a_targ,area	!a_targという名をつける  TARGがくっつける相手の（通常大きいほうの）面
		allsel
		r,CNUM
		rmodif,CNUM,14,1e6		!14は接触コンダクタンスのこと CONTA174の リアルコンスタントのことらしい
		real,CNUM
		type,3		!要素ナンバー3のこと 3ということはtarge170
		cmsel,s,a_targ	!Cuの表面選択
		nsla,s,1	!選択されたエリアに関する節点の選択
		esurf		!既存の要素の自由表面に重ねて要素を生成とのこと
		type,8		!
		cmsel,s,a_cont	!はんだ下面の選択
		nsla,s,1	!選択されたエリアに関する節点の選択
		esurf
		allsel

*DO,ii,1,2,1
		CNUM=CNUM+1
		allsel
		!Create Contact Pair
		asel,s,,,A18+6*3+2	!下面を選択
		cm,a_cont,area	!a_contという名をつける
		asel,s,,,4+(ii-1)*161	!Cu表面を選択
		cm,a_targ,area	!a_targという名をつける  TARGがくっつける相手の（通常大きいほうの）面
		allsel
		r,CNUM
		rmodif,CNUM,14,1e6		!14は接触コンダクタンスのこと CONTA174の リアルコンスタントのことらしい
		real,CNUM
		type,3		!要素ナンバー3のこと 3ということはtarge170
		cmsel,s,a_targ	!Cuの表面選択
		nsla,s,1	!選択されたエリアに関する節点の選択
		esurf		!既存の要素の自由表面に重ねて要素を生成とのこと
		type,10		!
		cmsel,s,a_cont	!はんだ下面の選択
		nsla,s,1	!選択されたエリアに関する節点の選択
		esurf
		allsel
*ENDDO

*DO,ii,1,2,1
		CNUM=CNUM+1
		allsel
		!Create Contact Pair
		asel,s,,,A18+6*3+2	!下面を選択
		cm,a_cont,area	!a_contという名をつける
		asel,s,,,148+(ii-1)*35	!Cu表面を選択
		cm,a_targ,area	!a_targという名をつける  TARGがくっつける相手の（通常大きいほうの）面
		allsel
		r,CNUM
		rmodif,CNUM,14,1e6		!14は接触コンダクタンスのこと CONTA174の リアルコンスタントのことらしい
		real,CNUM
		type,3		!要素ナンバー3のこと 3ということはtarge170
		cmsel,s,a_targ	!Cuの表面選択
		nsla,s,1	!選択されたエリアに関する節点の選択
		esurf		!既存の要素の自由表面に重ねて要素を生成とのこと
		type,5		!
		cmsel,s,a_cont	!はんだ下面の選択
		nsla,s,1	!選択されたエリアに関する節点の選択
		esurf
		allsel
*ENDDO

		CNUM=CNUM+1
		allsel
		!Create Contact Pair
		asel,s,,,A18+6*3+2	!下面を選択
		cm,a_cont,area	!a_contという名をつける
		asel,s,,,A15+6*2+4	!Cu表面を選択
		cm,a_targ,area	!a_targという名をつける  TARGがくっつける相手の（通常大きいほうの）面
		allsel
		r,CNUM
		rmodif,CNUM,14,1e6		!14は接触コンダクタンスのこと CONTA174の リアルコンスタントのことらしい
		real,CNUM
		type,3		!要素ナンバー3のこと 3ということはtarge170
		cmsel,s,a_targ	!Cuの表面選択
		nsla,s,1	!選択されたエリアに関する節点の選択
		esurf		!既存の要素の自由表面に重ねて要素を生成とのこと
		type,5		!
		cmsel,s,a_cont	!はんだ下面の選択
		nsla,s,1	!選択されたエリアに関する節点の選択
		esurf
		allsel


		CNUM=CNUM+1
		allsel
		!Create Contact Pair
		asel,s,,,A18+6*3+2	!下面を選択
		cm,a_cont,area	!a_contという名をつける
		asel,s,,,A15+6*7+4	!Cu表面を選択
		cm,a_targ,area	!a_targという名をつける  TARGがくっつける相手の（通常大きいほうの）面
		allsel
		r,CNUM
		rmodif,CNUM,14,1e6		!14は接触コンダクタンスのこと CONTA174の リアルコンスタントのことらしい
		real,CNUM
		type,3		!要素ナンバー3のこと 3ということはtarge170
		cmsel,s,a_targ	!Cuの表面選択
		nsla,s,1	!選択されたエリアに関する節点の選択
		esurf		!既存の要素の自由表面に重ねて要素を生成とのこと
		type,5		!
		cmsel,s,a_cont	!はんだ下面の選択
		nsla,s,1	!選択されたエリアに関する節点の選択
		esurf
		allsel

		CNUM=CNUM+1
		allsel
		!Create Contact Pair
		asel,s,,,A18+6*3+5	!下面を選択
		cm,a_cont,area	!a_contという名をつける
		asel,s,,,357	!Cu表面を選択
		cm,a_targ,area	!a_targという名をつける  TARGがくっつける相手の（通常大きいほうの）面
		allsel
		r,CNUM
		rmodif,CNUM,14,1e6		!14は接触コンダクタンスのこと CONTA174の リアルコンスタントのことらしい
		real,CNUM
		type,3		!要素ナンバー3のこと 3ということはtarge170
		cmsel,s,a_targ	!Cuの表面選択
		nsla,s,1	!選択されたエリアに関する節点の選択
		esurf		!既存の要素の自由表面に重ねて要素を生成とのこと
		type,5		!
		cmsel,s,a_cont	!はんだ下面の選択
		nsla,s,1	!選択されたエリアに関する節点の選択
		esurf
		allsel

		CNUM=CNUM+1
		allsel
		!Create Contact Pair
		asel,s,,,A18+6*3+5	!下面を選択
		cm,a_cont,area	!a_contという名をつける
		asel,s,,,A14+6*2+3	!Cu表面を選択
		cm,a_targ,area	!a_targという名をつける  TARGがくっつける相手の（通常大きいほうの）面
		allsel
		r,CNUM
		rmodif,CNUM,14,1e6		!14は接触コンダクタンスのこと CONTA174の リアルコンスタントのことらしい
		real,CNUM
		type,3		!要素ナンバー3のこと 3ということはtarge170
		cmsel,s,a_targ	!Cuの表面選択
		nsla,s,1	!選択されたエリアに関する節点の選択
		esurf		!既存の要素の自由表面に重ねて要素を生成とのこと
		type,5		!
		cmsel,s,a_cont	!はんだ下面の選択
		nsla,s,1	!選択されたエリアに関する節点の選択
		esurf
		allsel

!BUS周りの樹脂作成で
!点 8*4新規発生
!線 12*4新規発生
!面 6*4新規発生
!VOL 4新規発生
!X1=KBASE+2*PARA*8*10
!X1=X1+2*PARA*32+2*PARA*8
!X1=X1+2*PARA*26+13*PARA*2
!X1=X1+16*PARA*2+8*PARA*2
!X1=X1+8*PARA*2+8*PARA*2		!チップ周辺最後の樹脂
!X1=X1+8*(PARA-2)*2	!パラ間の樹脂
!X1=X1+8*2			!チップ行間の中央横長樹脂
!X1=X1+8*8			!チップ行　左右端の樹脂
!X1=X1+8*8			!柱前後とチップ前後の樹脂
!X1=X1+8*11			!BUS下およびBUS横の樹脂
!X1=X1+8*10			!DBC間の最後の樹脂作成
!X1=X1+8*8			!信号PIN間の樹脂の作成
!X1=X1+8*4			!信号PINまわり最後の樹脂作成で
X1=X1+8*4			!BUSまわり最後の樹脂作成で
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!X2=X2+12*4
X2=X2+12*4
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!X3=X3+6*4
X3=X3+6*4
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!X4=X4+4
X4=X4+4

!改めて面の基準どり
A1=ABASE+PARA*2*6*10	! ←樹脂の手前まで 上のDBC下はんだまで
A2=A1+20*PARA*2	! ダイ半田横の樹脂まで
A3=A2+16*PARA*2					! チップ横の樹脂まで
A4=A3+30*PARA*2					!EMIはんだ周辺樹脂まで
A5=A4+4*PARA*2					!EMIはんだまわり全部
A6=A5+27*PARA*2			!SPC下部分周辺樹脂まで
A7=A6+20*PARA*2			!面取り周辺樹脂まで
A8=A7+16*PARA*2			!上SPC周辺樹脂まで
A9=A8+16*PARA*2			!SPC上はんだ周辺樹脂まで
A10=A9+6*PARA*2			!EMI上の最後の樹脂まで
A11=A10+6*(PARA-2)*2			!PARA間の樹脂まで
A12=A11+6*2				!中央の樹脂まで
A13=A12+6*8				!チップ横の樹脂まで
A14=A13+6*8				!柱前後およびチップ前後の樹脂まで
A15=A14+6*11				!BUS下およびBUS横の樹脂
A16=A15+6*10				!DBC間の最後の樹脂作成
A17=A16+6*8				!信号PIN間の樹脂の作成
A18=A17+6*4				!信号PINまわり最後の樹脂作成
A19=A18+6*4				!BUSまわり最後の樹脂作成

!-----両サイドの樹脂完成----------------------------

*DO,ii,1,2,1			!8つすべて
	*DO,jj,1,2,1		!上下
		*DO,kk,1,4,1	!4方向
				nn=X1+(ii-1)*8+(jj-1)*4+kk
				k,nn,RESINSIDE(ii,jj,kk,1),RESINSIDE(ii,jj,kk,2),RESINSIDE(ii,jj,kk,3)
		*ENDDO
	*ENDDO
*ENDDO
*DO,ii,1,2,1
			kk=X1+(ii-1)*8
			V,kk+1,kk+2,kk+3,kk+4,kk+5,kk+6,kk+7,kk+8
*ENDDO
*DO,ii,1,2,1
		D_PLTX=NINT((RESINSIDE(ii,1,2,1)-RESINSIDE(ii,1,1,1))/M_RESINX)
		D_PLTY=NINT((RESINSIDE(ii,1,3,2)-RESINSIDE(ii,1,2,2))/M_RESINY)
		D_PLTZ=NINT( (RESINSIDE(ii,2,1,3)-RESINSIDE(ii,1,1,3) )/M_RESINZ)
*IF,D_PLTZ,LT,3,THEN
	D_PLTZ=3
*ENDIF
		lsel,s,,,X2+(ii-1)*12+1
		lesiz,all,,,D_PLTX		!z分割
		lsel,all			!最後にこのALLがないと、次にLをSELできなくなってしまいエラーが発生します。これはMUST
		lsel,s,,,X2+(ii-1)*12+2
		lesiz,all,,,D_PLTY		!z分割
		lsel,all			!最後にこのALLがないと、次にLをSELできなくなってしまいエラーが発生します。これはMUST
		lsel,s,,,X2+(ii-1)*12+5
		lesiz,all,,,D_PLTZ		!z分割
		lsel,all			!最後にこのALLがないと、次にLをSELできなくなってしまいエラーが発生します。これはMUST
		VMESH,X4+ii
*ENDDO

!---------サイド樹脂の接合----------------------------------------

!O側の接合

		CNUM=CNUM+1
		allsel
		!Create Contact Pair
		asel,s,,,A19+3	!下面を選択
		cm,a_cont,area	!a_contという名をつける
		asel,s,,,A15+6*6+5	!Cu表面を選択
		cm,a_targ,area	!a_targという名をつける  TARGがくっつける相手の（通常大きいほうの）面
		allsel
		r,CNUM
		rmodif,CNUM,14,1e6		!14は接触コンダクタンスのこと CONTA174の リアルコンスタントのことらしい
		real,CNUM
		type,3		!要素ナンバー3のこと 3ということはtarge170
		cmsel,s,a_targ	!Cuの表面選択
		nsla,s,1	!選択されたエリアに関する節点の選択
		esurf		!既存の要素の自由表面に重ねて要素を生成とのこと
		type,5		!
		cmsel,s,a_cont	!はんだ下面の選択
		nsla,s,1	!選択されたエリアに関する節点の選択
		esurf
		allsel

		CNUM=CNUM+1
		allsel
		!Create Contact Pair
		asel,s,,,A19+3	!下面を選択
		cm,a_cont,area	!a_contという名をつける
		asel,s,,,A17+5	!Cu表面を選択
		cm,a_targ,area	!a_targという名をつける  TARGがくっつける相手の（通常大きいほうの）面
		allsel
		r,CNUM
		rmodif,CNUM,14,1e6		!14は接触コンダクタンスのこと CONTA174の リアルコンスタントのことらしい
		real,CNUM
		type,3		!要素ナンバー3のこと 3ということはtarge170
		cmsel,s,a_targ	!Cuの表面選択
		nsla,s,1	!選択されたエリアに関する節点の選択
		esurf		!既存の要素の自由表面に重ねて要素を生成とのこと
		type,5		!
		cmsel,s,a_cont	!はんだ下面の選択
		nsla,s,1	!選択されたエリアに関する節点の選択
		esurf
		allsel


		CNUM=CNUM+1
		allsel
		!Create Contact Pair
		asel,s,,,A19+3	!下面を選択
		cm,a_cont,area	!a_contという名をつける
		asel,s,,,A18+5	!Cu表面を選択
		cm,a_targ,area	!a_targという名をつける  TARGがくっつける相手の（通常大きいほうの）面
		allsel
		r,CNUM
		rmodif,CNUM,14,1e6		!14は接触コンダクタンスのこと CONTA174の リアルコンスタントのことらしい
		real,CNUM
		type,3		!要素ナンバー3のこと 3ということはtarge170
		cmsel,s,a_targ	!Cuの表面選択
		nsla,s,1	!選択されたエリアに関する節点の選択
		esurf		!既存の要素の自由表面に重ねて要素を生成とのこと
		type,5		!
		cmsel,s,a_cont	!はんだ下面の選択
		nsla,s,1	!選択されたエリアに関する節点の選択
		esurf
		allsel

		CNUM=CNUM+1
		allsel
		!Create Contact Pair
		asel,s,,,A19+3	!下面を選択
		cm,a_cont,area	!a_contという名をつける
		asel,s,,,161	!Cu表面を選択
		cm,a_targ,area	!a_targという名をつける  TARGがくっつける相手の（通常大きいほうの）面
		allsel
		r,CNUM
		rmodif,CNUM,14,1e6		!14は接触コンダクタンスのこと CONTA174の リアルコンスタントのことらしい
		real,CNUM
		type,3		!要素ナンバー3のこと 3ということはtarge170
		cmsel,s,a_targ	!Cuの表面選択
		nsla,s,1	!選択されたエリアに関する節点の選択
		esurf		!既存の要素の自由表面に重ねて要素を生成とのこと
		type,8		!
		cmsel,s,a_cont	!はんだ下面の選択
		nsla,s,1	!選択されたエリアに関する節点の選択
		esurf
		allsel
*DO,ii,1,2,1
		CNUM=CNUM+1
		allsel
		!Create Contact Pair
		asel,s,,,A19+3	!下面を選択
		cm,a_cont,area	!a_contという名をつける
		asel,s,,,5+(ii-1)*161	!Cu表面を選択
		cm,a_targ,area	!a_targという名をつける  TARGがくっつける相手の（通常大きいほうの）面
		allsel
		r,CNUM
		rmodif,CNUM,14,1e6		!14は接触コンダクタンスのこと CONTA174の リアルコンスタントのことらしい
		real,CNUM
		type,3		!要素ナンバー3のこと 3ということはtarge170
		cmsel,s,a_targ	!Cuの表面選択
		nsla,s,1	!選択されたエリアに関する節点の選択
		esurf		!既存の要素の自由表面に重ねて要素を生成とのこと
		type,10		!
		cmsel,s,a_cont	!はんだ下面の選択
		nsla,s,1	!選択されたエリアに関する節点の選択
		esurf
		allsel
*ENDDO

*DO,ii,1,2,1
		CNUM=CNUM+1
		allsel
		!Create Contact Pair
		asel,s,,,A19+3	!下面を選択
		cm,a_cont,area	!a_contという名をつける
		asel,s,,,155+(ii-1)*32	!Cu表面を選択
		cm,a_targ,area	!a_targという名をつける  TARGがくっつける相手の（通常大きいほうの）面
		allsel
		r,CNUM
		rmodif,CNUM,14,1e6		!14は接触コンダクタンスのこと CONTA174の リアルコンスタントのことらしい
		real,CNUM
		type,3		!要素ナンバー3のこと 3ということはtarge170
		cmsel,s,a_targ	!Cuの表面選択
		nsla,s,1	!選択されたエリアに関する節点の選択
		esurf		!既存の要素の自由表面に重ねて要素を生成とのこと
		type,5		!
		cmsel,s,a_cont	!はんだ下面の選択
		nsla,s,1	!選択されたエリアに関する節点の選択
		esurf
		allsel
*ENDDO

		CNUM=CNUM+1
		allsel
		!Create Contact Pair
		asel,s,,,A19+3	!下面を選択
		cm,a_cont,area	!a_contという名をつける
		asel,s,,,263+2	!Cu表面を選択
		cm,a_targ,area	!a_targという名をつける  TARGがくっつける相手の（通常大きいほうの）面
		allsel
		r,CNUM
		rmodif,CNUM,14,1e6		!14は接触コンダクタンスのこと CONTA174の リアルコンスタントのことらしい
		real,CNUM
		type,3		!要素ナンバー3のこと 3ということはtarge170
		cmsel,s,a_targ	!Cuの表面選択
		nsla,s,1	!選択されたエリアに関する節点の選択
		esurf		!既存の要素の自由表面に重ねて要素を生成とのこと
		type,10		!
		cmsel,s,a_cont	!はんだ下面の選択
		nsla,s,1	!選択されたエリアに関する節点の選択
		esurf
		allsel

*DO,ii,1,2,1
		CNUM=CNUM+1
		allsel
		!Create Contact Pair
		asel,s,,,A19+3	!下面を選択
		cm,a_cont,area	!a_contという名をつける
		asel,s,,,191+2+(ii-1)*77	!Cu表面を選択
		cm,a_targ,area	!a_targという名をつける  TARGがくっつける相手の（通常大きいほうの）面
		allsel
		r,CNUM
		rmodif,CNUM,14,1e6		!14は接触コンダクタンスのこと CONTA174の リアルコンスタントのことらしい
		real,CNUM
		type,3		!要素ナンバー3のこと 3ということはtarge170
		cmsel,s,a_targ	!Cuの表面選択
		nsla,s,1	!選択されたエリアに関する節点の選択
		esurf		!既存の要素の自由表面に重ねて要素を生成とのこと
		type,10		!
		cmsel,s,a_cont	!はんだ下面の選択
		nsla,s,1	!選択されたエリアに関する節点の選択
		esurf
		allsel
*ENDDO

*DO,ii,1,2,1
		CNUM=CNUM+1
		allsel
		!Create Contact Pair
		asel,s,,,A19+3	!下面を選択
		cm,a_cont,area	!a_contという名をつける
		asel,s,,,241+(ii-1)*50	!Cu表面を選択
		cm,a_targ,area	!a_targという名をつける  TARGがくっつける相手の（通常大きいほうの）面
		allsel
		r,CNUM
		rmodif,CNUM,14,1e6		!14は接触コンダクタンスのこと CONTA174の リアルコンスタントのことらしい
		real,CNUM
		type,3		!要素ナンバー3のこと 3ということはtarge170
		cmsel,s,a_targ	!Cuの表面選択
		nsla,s,1	!選択されたエリアに関する節点の選択
		esurf		!既存の要素の自由表面に重ねて要素を生成とのこと
		type,5		!
		cmsel,s,a_cont	!はんだ下面の選択
		nsla,s,1	!選択されたエリアに関する節点の選択
		esurf
		allsel
*ENDDO

!P側サイド樹脂の接合

		CNUM=CNUM+1
		allsel
		!Create Contact Pair
		asel,s,,,A19+6+5	!下面を選択
		cm,a_cont,area	!a_contという名をつける
		asel,s,,,A15+6*7+3	!Cu表面を選択
		cm,a_targ,area	!a_targという名をつける  TARGがくっつける相手の（通常大きいほうの）面
		allsel
		r,CNUM
		rmodif,CNUM,14,1e6		!14は接触コンダクタンスのこと CONTA174の リアルコンスタントのことらしい
		real,CNUM
		type,3		!要素ナンバー3のこと 3ということはtarge170
		cmsel,s,a_targ	!Cuの表面選択
		nsla,s,1	!選択されたエリアに関する節点の選択
		esurf		!既存の要素の自由表面に重ねて要素を生成とのこと
		type,5		!
		cmsel,s,a_cont	!はんだ下面の選択
		nsla,s,1	!選択されたエリアに関する節点の選択
		esurf
		allsel

		CNUM=CNUM+1
		allsel
		!Create Contact Pair
		asel,s,,,A19+6+5	!下面を選択
		cm,a_cont,area	!a_contという名をつける
		asel,s,,,A17+6*3+3	!Cu表面を選択
		cm,a_targ,area	!a_targという名をつける  TARGがくっつける相手の（通常大きいほうの）面
		allsel
		r,CNUM
		rmodif,CNUM,14,1e6		!14は接触コンダクタンスのこと CONTA174の リアルコンスタントのことらしい
		real,CNUM
		type,3		!要素ナンバー3のこと 3ということはtarge170
		cmsel,s,a_targ	!Cuの表面選択
		nsla,s,1	!選択されたエリアに関する節点の選択
		esurf		!既存の要素の自由表面に重ねて要素を生成とのこと
		type,5		!
		cmsel,s,a_cont	!はんだ下面の選択
		nsla,s,1	!選択されたエリアに関する節点の選択
		esurf
		allsel


		CNUM=CNUM+1
		allsel
		!Create Contact Pair
		asel,s,,,A19+6+5	!下面を選択
		cm,a_cont,area	!a_contという名をつける
		asel,s,,,A18+6*3+3	!Cu表面を選択
		cm,a_targ,area	!a_targという名をつける  TARGがくっつける相手の（通常大きいほうの）面
		allsel
		r,CNUM
		rmodif,CNUM,14,1e6		!14は接触コンダクタンスのこと CONTA174の リアルコンスタントのことらしい
		real,CNUM
		type,3		!要素ナンバー3のこと 3ということはtarge170
		cmsel,s,a_targ	!Cuの表面選択
		nsla,s,1	!選択されたエリアに関する節点の選択
		esurf		!既存の要素の自由表面に重ねて要素を生成とのこと
		type,5		!
		cmsel,s,a_cont	!はんだ下面の選択
		nsla,s,1	!選択されたエリアに関する節点の選択
		esurf
		allsel

		CNUM=CNUM+1
		allsel
		!Create Contact Pair
		asel,s,,,A19+6+5	!下面を選択
		cm,a_cont,area	!a_contという名をつける
		asel,s,,,161-2	!Cu表面を選択
		cm,a_targ,area	!a_targという名をつける  TARGがくっつける相手の（通常大きいほうの）面
		allsel
		r,CNUM
		rmodif,CNUM,14,1e6		!14は接触コンダクタンスのこと CONTA174の リアルコンスタントのことらしい
		real,CNUM
		type,3		!要素ナンバー3のこと 3ということはtarge170
		cmsel,s,a_targ	!Cuの表面選択
		nsla,s,1	!選択されたエリアに関する節点の選択
		esurf		!既存の要素の自由表面に重ねて要素を生成とのこと
		type,8		!
		cmsel,s,a_cont	!はんだ下面の選択
		nsla,s,1	!選択されたエリアに関する節点の選択
		esurf
		allsel
*DO,ii,1,2,1
		CNUM=CNUM+1
		allsel
		!Create Contact Pair
		asel,s,,,A19+6+5	!下面を選択
		cm,a_cont,area	!a_contという名をつける
		asel,s,,,3+(ii-1)*161	!Cu表面を選択
		cm,a_targ,area	!a_targという名をつける  TARGがくっつける相手の（通常大きいほうの）面
		allsel
		r,CNUM
		rmodif,CNUM,14,1e6		!14は接触コンダクタンスのこと CONTA174の リアルコンスタントのことらしい
		real,CNUM
		type,3		!要素ナンバー3のこと 3ということはtarge170
		cmsel,s,a_targ	!Cuの表面選択
		nsla,s,1	!選択されたエリアに関する節点の選択
		esurf		!既存の要素の自由表面に重ねて要素を生成とのこと
		type,10		!
		cmsel,s,a_cont	!はんだ下面の選択
		nsla,s,1	!選択されたエリアに関する節点の選択
		esurf
		allsel
*ENDDO

*DO,ii,1,2,1
		CNUM=CNUM+1
		allsel
		!Create Contact Pair
		asel,s,,,A19+6+5	!下面を選択
		cm,a_cont,area	!a_contという名をつける
		asel,s,,,141+(ii-1)*38	!Cu表面を選択
		cm,a_targ,area	!a_targという名をつける  TARGがくっつける相手の（通常大きいほうの）面
		allsel
		r,CNUM
		rmodif,CNUM,14,1e6		!14は接触コンダクタンスのこと CONTA174の リアルコンスタントのことらしい
		real,CNUM
		type,3		!要素ナンバー3のこと 3ということはtarge170
		cmsel,s,a_targ	!Cuの表面選択
		nsla,s,1	!選択されたエリアに関する節点の選択
		esurf		!既存の要素の自由表面に重ねて要素を生成とのこと
		type,5		!
		cmsel,s,a_cont	!はんだ下面の選択
		nsla,s,1	!選択されたエリアに関する節点の選択
		esurf
		allsel
*ENDDO

		CNUM=CNUM+1
		allsel
		!Create Contact Pair
		asel,s,,,A19+6+5	!下面を選択
		cm,a_cont,area	!a_contという名をつける
		asel,s,,,263	!Cu表面を選択
		cm,a_targ,area	!a_targという名をつける  TARGがくっつける相手の（通常大きいほうの）面
		allsel
		r,CNUM
		rmodif,CNUM,14,1e6		!14は接触コンダクタンスのこと CONTA174の リアルコンスタントのことらしい
		real,CNUM
		type,3		!要素ナンバー3のこと 3ということはtarge170
		cmsel,s,a_targ	!Cuの表面選択
		nsla,s,1	!選択されたエリアに関する節点の選択
		esurf		!既存の要素の自由表面に重ねて要素を生成とのこと
		type,10		!
		cmsel,s,a_cont	!はんだ下面の選択
		nsla,s,1	!選択されたエリアに関する節点の選択
		esurf
		allsel

*DO,ii,1,2,1
		CNUM=CNUM+1
		allsel
		!Create Contact Pair
		asel,s,,,A19+6+5	!下面を選択
		cm,a_cont,area	!a_contという名をつける
		asel,s,,,191+(ii-1)*77	!Cu表面を選択
		cm,a_targ,area	!a_targという名をつける  TARGがくっつける相手の（通常大きいほうの）面
		allsel
		r,CNUM
		rmodif,CNUM,14,1e6		!14は接触コンダクタンスのこと CONTA174の リアルコンスタントのことらしい
		real,CNUM
		type,3		!要素ナンバー3のこと 3ということはtarge170
		cmsel,s,a_targ	!Cuの表面選択
		nsla,s,1	!選択されたエリアに関する節点の選択
		esurf		!既存の要素の自由表面に重ねて要素を生成とのこと
		type,10		!
		cmsel,s,a_cont	!はんだ下面の選択
		nsla,s,1	!選択されたエリアに関する節点の選択
		esurf
		allsel
*ENDDO

*DO,ii,1,2,1
		CNUM=CNUM+1
		allsel
		!Create Contact Pair
		asel,s,,,A19+6+5	!下面を選択
		cm,a_cont,area	!a_contという名をつける
		asel,s,,,227+(ii-1)*56	!Cu表面を選択
		cm,a_targ,area	!a_targという名をつける  TARGがくっつける相手の（通常大きいほうの）面
		allsel
		r,CNUM
		rmodif,CNUM,14,1e6		!14は接触コンダクタンスのこと CONTA174の リアルコンスタントのことらしい
		real,CNUM
		type,3		!要素ナンバー3のこと 3ということはtarge170
		cmsel,s,a_targ	!Cuの表面選択
		nsla,s,1	!選択されたエリアに関する節点の選択
		esurf		!既存の要素の自由表面に重ねて要素を生成とのこと
		type,5		!
		cmsel,s,a_cont	!はんだ下面の選択
		nsla,s,1	!選択されたエリアに関する節点の選択
		esurf
		allsel
*ENDDO

!両サイドの樹脂作成で
!点 8*2新規発生
!線 12*2新規発生
!面 6*2新規発生
!VOL 2新規発生
!X1=KBASE+2*PARA*8*10
!X1=X1+2*PARA*32+2*PARA*8
!X1=X1+2*PARA*26+13*PARA*2
!X1=X1+16*PARA*2+8*PARA*2
!X1=X1+8*PARA*2+8*PARA*2		!チップ周辺最後の樹脂
!X1=X1+8*(PARA-2)*2	!パラ間の樹脂
!X1=X1+8*2			!チップ行間の中央横長樹脂
!X1=X1+8*8			!チップ行　左右端の樹脂
!X1=X1+8*8			!柱前後とチップ前後の樹脂
!X1=X1+8*11			!BUS下およびBUS横の樹脂
!X1=X1+8*10			!DBC間の最後の樹脂作成
!X1=X1+8*8			!信号PIN間の樹脂の作成
!X1=X1+8*4			!信号PINまわり最後の樹脂作成で
!X1=X1+8*4			!BUSまわり最後の樹脂作成で
X1=X1+8*2			!両サイドの樹脂作成
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!X2=X2+12*4
X2=X2+12*2
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!X3=X3+6*4
X3=X3+6*2
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!X4=X4+4
X4=X4+2

!改めて面の基準どり
A1=ABASE+PARA*2*6*10	! ←樹脂の手前まで 上のDBC下はんだまで
A2=A1+20*PARA*2	! ダイ半田横の樹脂まで
A3=A2+16*PARA*2					! チップ横の樹脂まで
A4=A3+30*PARA*2					!EMIはんだ周辺樹脂まで
A5=A4+4*PARA*2					!EMIはんだまわり全部
A6=A5+27*PARA*2			!SPC下部分周辺樹脂まで
A7=A6+20*PARA*2			!面取り周辺樹脂まで
A8=A7+16*PARA*2			!上SPC周辺樹脂まで
A9=A8+16*PARA*2			!SPC上はんだ周辺樹脂まで
A10=A9+6*PARA*2			!EMI上の最後の樹脂まで
A11=A10+6*(PARA-2)*2			!PARA間の樹脂まで
A12=A11+6*2				!中央の樹脂まで
A13=A12+6*8				!チップ横の樹脂まで
A14=A13+6*8				!柱前後およびチップ前後の樹脂まで
A15=A14+6*11				!BUS下およびBUS横の樹脂
A16=A15+6*10				!DBC間の最後の樹脂作成
A17=A16+6*8				!信号PIN間の樹脂の作成
A18=A17+6*4				!信号PINまわり最後の樹脂作成
A19=A18+6*4				!BUSまわり最後の樹脂作成
A20=A19+6*2				!BUSまわり最後の樹脂作成

!-----最終オフセット樹脂完成----------------------------
*DO,ii,1,2,1			!8つすべて
	*DO,jj,1,2,1		!上下
		*DO,kk,1,4,1	!4方向
				nn=X1+(ii-1)*8+(jj-1)*4+kk
				k,nn,RESINOFFSET(ii,jj,kk,1),RESINOFFSET(ii,jj,kk,2),RESINOFFSET(ii,jj,kk,3)
		*ENDDO
	*ENDDO
*ENDDO
*DO,ii,1,2,1
			kk=X1+(ii-1)*8
			V,kk+1,kk+2,kk+3,kk+4,kk+5,kk+6,kk+7,kk+8
*ENDDO
*DO,ii,1,2,1
		D_PLTX=NINT((RESINOFFSET(ii,1,2,1)-RESINOFFSET(ii,1,1,1))/M_RESINX)
		D_PLTY=NINT((RESINOFFSET(ii,1,3,2)-RESINOFFSET(ii,1,2,2))/M_RESINY)
		D_PLTZ=NINT( (RESINOFFSET(ii,2,1,3)-RESINOFFSET(ii,1,1,3) )/M_RESINZ)
*IF,D_PLTZ,LT,3,THEN
	D_PLTZ=3
*ENDIF
		lsel,s,,,X2+(ii-1)*12+1
		lesiz,all,,,D_PLTX		!z分割
		lsel,all			!最後にこのALLがないと、次にLをSELできなくなってしまいエラーが発生します。これはMUST
		lsel,s,,,X2+(ii-1)*12+2
		lesiz,all,,,D_PLTY		!z分割
		lsel,all			!最後にこのALLがないと、次にLをSELできなくなってしまいエラーが発生します。これはMUST
		lsel,s,,,X2+(ii-1)*12+5
		lesiz,all,,,D_PLTZ		!z分割
		lsel,all			!最後にこのALLがないと、次にLをSELできなくなってしまいエラーが発生します。これはMUST
		VMESH,X4+ii
*ENDDO

!---------最終オフセット樹脂の接合----------------------------------------
		CNUM=CNUM+1
		allsel
		!Create Contact Pair
		asel,s,,,A20+1	!下面を選択
		cm,a_cont,area	!a_contという名をつける
		asel,s,,,A13+6	!Cu表面を選択
		cm,a_targ,area	!a_targという名をつける  TARGがくっつける相手の（通常大きいほうの）面
		allsel
		r,CNUM
		rmodif,CNUM,14,1e6		!14は接触コンダクタンスのこと CONTA174の リアルコンスタントのことらしい
		real,CNUM
		type,3		!要素ナンバー3のこと 3ということはtarge170
		cmsel,s,a_targ	!Cuの表面選択
		nsla,s,1	!選択されたエリアに関する節点の選択
		esurf		!既存の要素の自由表面に重ねて要素を生成とのこと
		type,5		!
		cmsel,s,a_cont	!はんだ下面の選択
		nsla,s,1	!選択されたエリアに関する節点の選択
		esurf
		allsel
*DO,ii,1,2,1
		CNUM=CNUM+1
		allsel
		!Create Contact Pair
		asel,s,,,A20+1	!下面を選択
		cm,a_cont,area	!a_contという名をつける
		asel,s,,,A13+6*4+6+(ii-1)*12	!Cu表面を選択
		cm,a_targ,area	!a_targという名をつける  TARGがくっつける相手の（通常大きいほうの）面
		allsel
		r,CNUM
		rmodif,CNUM,14,1e6		!14は接触コンダクタンスのこと CONTA174の リアルコンスタントのことらしい
		real,CNUM
		type,3		!要素ナンバー3のこと 3ということはtarge170
		cmsel,s,a_targ	!Cuの表面選択
		nsla,s,1	!選択されたエリアに関する節点の選択
		esurf		!既存の要素の自由表面に重ねて要素を生成とのこと
		type,5		!
		cmsel,s,a_cont	!はんだ下面の選択
		nsla,s,1	!選択されたエリアに関する節点の選択
		esurf
		allsel
*ENDDO

*DO,ii,4,8,1
		CNUM=CNUM+1
		allsel
		!Create Contact Pair
		asel,s,,,A20+1	!下面を選択
		cm,a_cont,area	!a_contという名をつける
		asel,s,,,A15+(ii-1)*6+6	!Cu表面を選択
		cm,a_targ,area	!a_targという名をつける  TARGがくっつける相手の（通常大きいほうの）面
		allsel
		r,CNUM
		rmodif,CNUM,14,1e6		!14は接触コンダクタンスのこと CONTA174の リアルコンスタントのことらしい
		real,CNUM
		type,3		!要素ナンバー3のこと 3ということはtarge170
		cmsel,s,a_targ	!Cuの表面選択
		nsla,s,1	!選択されたエリアに関する節点の選択
		esurf		!既存の要素の自由表面に重ねて要素を生成とのこと
		type,5		!
		cmsel,s,a_cont	!はんだ下面の選択
		nsla,s,1	!選択されたエリアに関する節点の選択
		esurf
		allsel
*ENDDO

		CNUM=CNUM+1
		allsel
		!Create Contact Pair
		asel,s,,,A20+2	!下面を選択
		cm,a_cont,area	!a_contという名をつける
		asel,s,,,A17+4	!Cu表面を選択
		cm,a_targ,area	!a_targという名をつける  TARGがくっつける相手の（通常大きいほうの）面
		allsel
		r,CNUM
		rmodif,CNUM,14,1e6		!14は接触コンダクタンスのこと CONTA174の リアルコンスタントのことらしい
		real,CNUM
		type,3		!要素ナンバー3のこと 3ということはtarge170
		cmsel,s,a_targ	!Cuの表面選択
		nsla,s,1	!選択されたエリアに関する節点の選択
		esurf		!既存の要素の自由表面に重ねて要素を生成とのこと
		type,5		!
		cmsel,s,a_cont	!はんだ下面の選択
		nsla,s,1	!選択されたエリアに関する節点の選択
		esurf
		allsel
*DO,ii,1,2,1
		CNUM=CNUM+1
		allsel
		!Create Contact Pair
		asel,s,,,A20+2	!下面を選択
		cm,a_cont,area	!a_contという名をつける
		asel,s,,,A17+6*2+4+(ii-1)*6	!Cu表面を選択
		cm,a_targ,area	!a_targという名をつける  TARGがくっつける相手の（通常大きいほうの）面
		allsel
		r,CNUM
		rmodif,CNUM,14,1e6		!14は接触コンダクタンスのこと CONTA174の リアルコンスタントのことらしい
		real,CNUM
		type,3		!要素ナンバー3のこと 3ということはtarge170
		cmsel,s,a_targ	!Cuの表面選択
		nsla,s,1	!選択されたエリアに関する節点の選択
		esurf		!既存の要素の自由表面に重ねて要素を生成とのこと
		type,5		!
		cmsel,s,a_cont	!はんだ下面の選択
		nsla,s,1	!選択されたエリアに関する節点の選択
		esurf
		allsel
*ENDDO

		CNUM=CNUM+1
		allsel
		!Create Contact Pair
		asel,s,,,A20+3	!下面を選択
		cm,a_cont,area	!a_contという名をつける
		asel,s,,,A19+6+5	!Cu表面を選択
		cm,a_targ,area	!a_targという名をつける  TARGがくっつける相手の（通常大きいほうの）面
		allsel
		r,CNUM
		rmodif,CNUM,14,1e6		!14は接触コンダクタンスのこと CONTA174の リアルコンスタントのことらしい
		real,CNUM
		type,3		!要素ナンバー3のこと 3ということはtarge170
		cmsel,s,a_targ	!Cuの表面選択
		nsla,s,1	!選択されたエリアに関する節点の選択
		esurf		!既存の要素の自由表面に重ねて要素を生成とのこと
		type,5		!
		cmsel,s,a_cont	!はんだ下面の選択
		nsla,s,1	!選択されたエリアに関する節点の選択
		esurf
		allsel

		CNUM=CNUM+1
		allsel
		!Create Contact Pair
		asel,s,,,A20+4	!下面を選択
		cm,a_cont,area	!a_contという名をつける
		asel,s,,,262	!Cu表面を選択
		cm,a_targ,area	!a_targという名をつける  TARGがくっつける相手の（通常大きいほうの）面
		allsel
		r,CNUM
		rmodif,CNUM,14,1e6		!14は接触コンダクタンスのこと CONTA174の リアルコンスタントのことらしい
		real,CNUM
		type,3		!要素ナンバー3のこと 3ということはtarge170
		cmsel,s,a_targ	!Cuの表面選択
		nsla,s,1	!選択されたエリアに関する節点の選択
		esurf		!既存の要素の自由表面に重ねて要素を生成とのこと
		type,8		!
		cmsel,s,a_cont	!はんだ下面の選択
		nsla,s,1	!選択されたエリアに関する節点の選択
		esurf
		allsel

*DO,ii,1,2,1
		CNUM=CNUM+1
		allsel
		!Create Contact Pair
		asel,s,,,A20+4	!下面を選択
		cm,a_cont,area	!a_contという名をつける
		asel,s,,,190+(ii-1)*77	!Cu表面を選択
		cm,a_targ,area	!a_targという名をつける  TARGがくっつける相手の（通常大きいほうの）面
		allsel
		r,CNUM
		rmodif,CNUM,14,1e6		!14は接触コンダクタンスのこと CONTA174の リアルコンスタントのことらしい
		real,CNUM
		type,3		!要素ナンバー3のこと 3ということはtarge170
		cmsel,s,a_targ	!Cuの表面選択
		nsla,s,1	!選択されたエリアに関する節点の選択
		esurf		!既存の要素の自由表面に重ねて要素を生成とのこと
		type,10		!
		cmsel,s,a_cont	!はんだ下面の選択
		nsla,s,1	!選択されたエリアに関する節点の選択
		esurf
		allsel
*ENDDO

*DO,ii,1,2,1
		CNUM=CNUM+1
		allsel
		!Create Contact Pair
		asel,s,,,A20+4	!下面を選択
		cm,a_cont,area	!a_contという名をつける
		asel,s,,,220+(ii-1)*58	!Cu表面を選択
		cm,a_targ,area	!a_targという名をつける  TARGがくっつける相手の（通常大きいほうの）面
		allsel
		r,CNUM
		rmodif,CNUM,14,1e6		!14は接触コンダクタンスのこと CONTA174の リアルコンスタントのことらしい
		real,CNUM
		type,3		!要素ナンバー3のこと 3ということはtarge170
		cmsel,s,a_targ	!Cuの表面選択
		nsla,s,1	!選択されたエリアに関する節点の選択
		esurf		!既存の要素の自由表面に重ねて要素を生成とのこと
		type,5		!
		cmsel,s,a_cont	!はんだ下面の選択
		nsla,s,1	!選択されたエリアに関する節点の選択
		esurf
		allsel
*ENDDO
		CNUM=CNUM+1
		allsel
		!Create Contact Pair
		asel,s,,,A20+5	!下面を選択
		cm,a_cont,area	!a_contという名をつける
		asel,s,,,A19+3	!Cu表面を選択
		cm,a_targ,area	!a_targという名をつける  TARGがくっつける相手の（通常大きいほうの）面
		allsel
		r,CNUM
		rmodif,CNUM,14,1e6		!14は接触コンダクタンスのこと CONTA174の リアルコンスタントのことらしい
		real,CNUM
		type,3		!要素ナンバー3のこと 3ということはtarge170
		cmsel,s,a_targ	!Cuの表面選択
		nsla,s,1	!選択されたエリアに関する節点の選択
		esurf		!既存の要素の自由表面に重ねて要素を生成とのこと
		type,5		!
		cmsel,s,a_cont	!はんだ下面の選択
		nsla,s,1	!選択されたエリアに関する節点の選択
		esurf
		allsel


!バス側のオフセット
		CNUM=CNUM+1
		allsel
		!Create Contact Pair
		asel,s,,,A20+6+1	!下面を選択
		cm,a_cont,area	!a_contという名をつける
		asel,s,,,A13+3*6+6	!Cu表面を選択
		cm,a_targ,area	!a_targという名をつける  TARGがくっつける相手の（通常大きいほうの）面
		allsel
		r,CNUM
		rmodif,CNUM,14,1e6		!14は接触コンダクタンスのこと CONTA174の リアルコンスタントのことらしい
		real,CNUM
		type,3		!要素ナンバー3のこと 3ということはtarge170
		cmsel,s,a_targ	!Cuの表面選択
		nsla,s,1	!選択されたエリアに関する節点の選択
		esurf		!既存の要素の自由表面に重ねて要素を生成とのこと
		type,5		!
		cmsel,s,a_cont	!はんだ下面の選択
		nsla,s,1	!選択されたエリアに関する節点の選択
		esurf
		allsel
*DO,ii,1,2,1
		CNUM=CNUM+1
		allsel
		!Create Contact Pair
		asel,s,,,A20+6+1	!下面を選択
		cm,a_cont,area	!a_contという名をつける
		asel,s,,,A13+5*6+6+(ii-1)*12	!Cu表面を選択
		cm,a_targ,area	!a_targという名をつける  TARGがくっつける相手の（通常大きいほうの）面
		allsel
		r,CNUM
		rmodif,CNUM,14,1e6		!14は接触コンダクタンスのこと CONTA174の リアルコンスタントのことらしい
		real,CNUM
		type,3		!要素ナンバー3のこと 3ということはtarge170
		cmsel,s,a_targ	!Cuの表面選択
		nsla,s,1	!選択されたエリアに関する節点の選択
		esurf		!既存の要素の自由表面に重ねて要素を生成とのこと
		type,5		!
		cmsel,s,a_cont	!はんだ下面の選択
		nsla,s,1	!選択されたエリアに関する節点の選択
		esurf
		allsel
*ENDDO

*DO,ii,1,3,1
		CNUM=CNUM+1
		allsel
		!Create Contact Pair
		asel,s,,,A20+6+1	!下面を選択
		cm,a_cont,area	!a_contという名をつける
		asel,s,,,A15+(ii-1)*6+6	!Cu表面を選択
		cm,a_targ,area	!a_targという名をつける  TARGがくっつける相手の（通常大きいほうの）面
		allsel
		r,CNUM
		rmodif,CNUM,14,1e6		!14は接触コンダクタンスのこと CONTA174の リアルコンスタントのことらしい
		real,CNUM
		type,3		!要素ナンバー3のこと 3ということはtarge170
		cmsel,s,a_targ	!Cuの表面選択
		nsla,s,1	!選択されたエリアに関する節点の選択
		esurf		!既存の要素の自由表面に重ねて要素を生成とのこと
		type,5		!
		cmsel,s,a_cont	!はんだ下面の選択
		nsla,s,1	!選択されたエリアに関する節点の選択
		esurf
		allsel
*ENDDO

*DO,ii,7,8,1
		CNUM=CNUM+1
		allsel
		!Create Contact Pair
		asel,s,,,A20+6+1	!下面を選択
		cm,a_cont,area	!a_contという名をつける
		asel,s,,,A15+(ii-1)*6+6	!Cu表面を選択
		cm,a_targ,area	!a_targという名をつける  TARGがくっつける相手の（通常大きいほうの）面
		allsel
		r,CNUM
		rmodif,CNUM,14,1e6		!14は接触コンダクタンスのこと CONTA174の リアルコンスタントのことらしい
		real,CNUM
		type,3		!要素ナンバー3のこと 3ということはtarge170
		cmsel,s,a_targ	!Cuの表面選択
		nsla,s,1	!選択されたエリアに関する節点の選択
		esurf		!既存の要素の自由表面に重ねて要素を生成とのこと
		type,5		!
		cmsel,s,a_cont	!はんだ下面の選択
		nsla,s,1	!選択されたエリアに関する節点の選択
		esurf
		allsel
*ENDDO

		CNUM=CNUM+1
		allsel
		!Create Contact Pair
		asel,s,,,A20+6+2	!下面を選択
		cm,a_cont,area	!a_contという名をつける
		asel,s,,,264	!Cu表面を選択
		cm,a_targ,area	!a_targという名をつける  TARGがくっつける相手の（通常大きいほうの）面
		allsel
		r,CNUM
		rmodif,CNUM,14,1e6		!14は接触コンダクタンスのこと CONTA174の リアルコンスタントのことらしい
		real,CNUM
		type,3		!要素ナンバー3のこと 3ということはtarge170
		cmsel,s,a_targ	!Cuの表面選択
		nsla,s,1	!選択されたエリアに関する節点の選択
		esurf		!既存の要素の自由表面に重ねて要素を生成とのこと
		type,8		!
		cmsel,s,a_cont	!はんだ下面の選択
		nsla,s,1	!選択されたエリアに関する節点の選択
		esurf
		allsel
*DO,ii,1,2,1
		CNUM=CNUM+1
		allsel
		!Create Contact Pair
		asel,s,,,A20+6+2	!下面を選択
		cm,a_cont,area	!a_contという名をつける
		asel,s,,,192+(ii-1)*77	!Cu表面を選択
		cm,a_targ,area	!a_targという名をつける  TARGがくっつける相手の（通常大きいほうの）面
		allsel
		r,CNUM
		rmodif,CNUM,14,1e6		!14は接触コンダクタンスのこと CONTA174の リアルコンスタントのことらしい
		real,CNUM
		type,3		!要素ナンバー3のこと 3ということはtarge170
		cmsel,s,a_targ	!Cuの表面選択
		nsla,s,1	!選択されたエリアに関する節点の選択
		esurf		!既存の要素の自由表面に重ねて要素を生成とのこと
		type,8		!
		cmsel,s,a_cont	!はんだ下面の選択
		nsla,s,1	!選択されたエリアに関する節点の選択
		esurf
		allsel
*ENDDO

*DO,ii,1,2,1
		CNUM=CNUM+1
		allsel
		!Create Contact Pair
		asel,s,,,A20+6+2	!下面を選択
		cm,a_cont,area	!a_contという名をつける
		asel,s,,,234+(ii-1)*53	!Cu表面を選択
		cm,a_targ,area	!a_targという名をつける  TARGがくっつける相手の（通常大きいほうの）面
		allsel
		r,CNUM
		rmodif,CNUM,14,1e6		!14は接触コンダクタンスのこと CONTA174の リアルコンスタントのことらしい
		real,CNUM
		type,3		!要素ナンバー3のこと 3ということはtarge170
		cmsel,s,a_targ	!Cuの表面選択
		nsla,s,1	!選択されたエリアに関する節点の選択
		esurf		!既存の要素の自由表面に重ねて要素を生成とのこと
		type,5		!
		cmsel,s,a_cont	!はんだ下面の選択
		nsla,s,1	!選択されたエリアに関する節点の選択
		esurf
		allsel
*ENDDO

		CNUM=CNUM+1
		allsel
		!Create Contact Pair
		asel,s,,,A20+6+3	!下面を選択
		cm,a_cont,area	!a_contという名をつける
		asel,s,,,A19+6+5	!Cu表面を選択
		cm,a_targ,area	!a_targという名をつける  TARGがくっつける相手の（通常大きいほうの）面
		allsel
		r,CNUM
		rmodif,CNUM,14,1e6		!14は接触コンダクタンスのこと CONTA174の リアルコンスタントのことらしい
		real,CNUM
		type,3		!要素ナンバー3のこと 3ということはtarge170
		cmsel,s,a_targ	!Cuの表面選択
		nsla,s,1	!選択されたエリアに関する節点の選択
		esurf		!既存の要素の自由表面に重ねて要素を生成とのこと
		type,5		!
		cmsel,s,a_cont	!はんだ下面の選択
		nsla,s,1	!選択されたエリアに関する節点の選択
		esurf
		allsel

		CNUM=CNUM+1
		allsel
		!Create Contact Pair
		asel,s,,,A20+6+4	!下面を選択
		cm,a_cont,area	!a_contという名をつける
		asel,s,,,A18+2	!Cu表面を選択
		cm,a_targ,area	!a_targという名をつける  TARGがくっつける相手の（通常大きいほうの）面
		allsel
		r,CNUM
		rmodif,CNUM,14,1e6		!14は接触コンダクタンスのこと CONTA174の リアルコンスタントのことらしい
		real,CNUM
		type,3		!要素ナンバー3のこと 3ということはtarge170
		cmsel,s,a_targ	!Cuの表面選択
		nsla,s,1	!選択されたエリアに関する節点の選択
		esurf		!既存の要素の自由表面に重ねて要素を生成とのこと
		type,5		!
		cmsel,s,a_cont	!はんだ下面の選択
		nsla,s,1	!選択されたエリアに関する節点の選択
		esurf
		allsel
*DO,ii,1,2,1
		CNUM=CNUM+1
		allsel
		!Create Contact Pair
		asel,s,,,A20+6+4	!下面を選択
		cm,a_cont,area	!a_contという名をつける
		asel,s,,,A18+6*2+2+(ii-1)*6	!Cu表面を選択
		cm,a_targ,area	!a_targという名をつける  TARGがくっつける相手の（通常大きいほうの）面
		allsel
		r,CNUM
		rmodif,CNUM,14,1e6		!14は接触コンダクタンスのこと CONTA174の リアルコンスタントのことらしい
		real,CNUM
		type,3		!要素ナンバー3のこと 3ということはtarge170
		cmsel,s,a_targ	!Cuの表面選択
		nsla,s,1	!選択されたエリアに関する節点の選択
		esurf		!既存の要素の自由表面に重ねて要素を生成とのこと
		type,5		!
		cmsel,s,a_cont	!はんだ下面の選択
		nsla,s,1	!選択されたエリアに関する節点の選択
		esurf
		allsel
*ENDDO

		CNUM=CNUM+1
		allsel
		!Create Contact Pair
		asel,s,,,A20+6+5	!下面を選択
		cm,a_cont,area	!a_contという名をつける
		asel,s,,,A19+3	!Cu表面を選択
		cm,a_targ,area	!a_targという名をつける  TARGがくっつける相手の（通常大きいほうの）面
		allsel
		r,CNUM
		rmodif,CNUM,14,1e6		!14は接触コンダクタンスのこと CONTA174の リアルコンスタントのことらしい
		real,CNUM
		type,3		!要素ナンバー3のこと 3ということはtarge170
		cmsel,s,a_targ	!Cuの表面選択
		nsla,s,1	!選択されたエリアに関する節点の選択
		esurf		!既存の要素の自由表面に重ねて要素を生成とのこと
		type,5		!
		cmsel,s,a_cont	!はんだ下面の選択
		nsla,s,1	!選択されたエリアに関する節点の選択
		esurf
		allsel


*ENDIF 	!RESINKEYのIF
!モデルはここで完結のはず
:TOBASHI
!ここから解析--------------------------------------------------
!-----解析用のコンポーネント定義----------------------
VSEL,S,MAT,,1	!はんだをSEL
CM,HANDA,VOLU	!HANDAというコンポーネント名

ALLSEL
VSEL,S,MAT,,7	!はんだをSEL
CM,RESIN,VOLU	!HANDAというコンポーネント名
ALLSEL

VSEL,S,VOLU,,VBASE+1,VBASE+PARA*2,1	!はんだをSEL
CM,HANDACOR,VOLU	!HANDAというコンポーネント名
ALLSEL

VSEL,S,VOLU,,VBASE+PARA*4+1,VBASE+PARA*10,1	!はんだをSEL
CM,HANDAEMI,VOLU	!HANDAというコンポーネント名
ALLSEL
nn=VBASE+PARA*10
VSEL,S,VOLU,,nn+2*PARA*4+1,nn+2*PARA*5,1	!はんだをSEL
CM,HANDABUS,VOLU	!HANDAというコンポーネント名
ALLSEL

!----DBC-------------
ALLSEL
VSEL,S,MAT,,4	!CERAをSEL
CM,CERA,VOLU	!CERAというコンポーネント名
ALLSEL

!-----解析用のコンポーネント定義ここまで----------------------

*IF,SOLUTIONSW,EQ,1,THEN	!これのENDIF必要-----------------------------------------------------------


/SOLUTION
!CUTCONTROL,PLSLIMIT,0.05	!追記　収束を助ける


!---------------------------BUSなどの発熱定義---------------------------------------
!電流が、pからoに抜ける　p側igbtがonを前提
*set,rcu,0.0000000168	!Ωm  銅の抵抗率
*SET,iq,15000000000	!仮置き チップの発熱密度 Nm/sm^3 ??Arms
*set,current,50	!仮置き 上の定常の電流Aの設定 170131 258→50Aに変更
!*set,current,300	!仮置き 上の定常の電流Aの設定 170131 258→50Aに変更
*SET,TimeS,1

!----発熱密度
*dim,p_pbus,ARRAY,3
*dim,p_obus,ARRAY,8
*dim,p_nbus,ARRAY,7

!------------

*dim,a_pbus,ARRAY,3
*dim,a_obus,ARRAY,8
*dim,a_nbus,ARRAY,7

*dim,l_pbus,ARRAY,3
*dim,l_obus,ARRAY,8
*dim,l_nbus,ARRAY,7

*DIM,w_pbus,array,3
*DIM,w_obus,array,8
*DIM,w_nbus,array,7
*set,w_chip
*SET,W_BUS
*dim,r_pbus,array,3
*dim,r_obus,array,8
*dim,r_nbus,array,7

!P→0の経路の順で整理
a_pbus(1)=PBUSWID*BUSTHICK
a_pbus(2)=PBUSIN*BUSTHICK
a_pbus(3)=(PPLATE1(1,2,1)-PPLATE1(1,1,1))*PLATEZ
!P→0の経路の順で整理
a_obus(1)=(ISPCX*ISPCY+SUBSPCX*SUBSPCY)*PARA
a_obus(2)=PLATEUPZ*UPPLATEY
a_obus(3)=PLATEUPZ*(OPLATE4(1,3,2)-OPLATE4(1,2,2))
a_obus(4)=OPOLEX*OPOLEY
a_obus(5)=PLATEZ*(OPLATE2(1,3,2)-OPLATE2(1,1,2))
a_obus(6)=PLATEZ*(OPLATE1(1,2,1)-OPLATE1(1,1,1))
a_obus(7)=OBUSIN*BUSTHICK
a_obus(8)=OBUSWID*BUSTHICK
!O→Nの経路の順で整理
a_nbus(1)=(ISPCX*ISPCY+SUBSPCX*SUBSPCY)*PARA
a_nbus(2)=PLATEUPZ*UPPLATEY
a_nbus(3)=PLATEUPZ*(NPLATE3(1,3,2)-NPLATE3(1,1,2))
a_nbus(4)=NPOLEX*NPOLEY
a_nbus(5)=NX*PLATEZ
a_nbus(6)=NBUSIN*BUSTHICK
a_nbus(7)=NBUSWID*BUSTHICK

!P→0の経路の順で整理
l_pbus(1)=BUSLENGTH-5*MAG
l_pbus(2)=BUSSOLH*2/3
l_pbus(3)=PPLATE1(1,3,2)-BUSSOLH/2-(SOL1(2,2,2,1,2)+SOL1(2,1,2,3,2))/2

!P→0の経路の順で整理
l_obus(1)=ISPCZ+ESOLT+SPSOLT
l_obus(2)=(SOL1(2,PARA,1,2,1)+SOL1(2,1,1,1,1))/2-OPLATE5(1,1,1)
l_obus(3)=OPLATE4(1,2,1)-(OPOLE(1,1,1)+OPOLE(1,2,1))/2
l_obus(4)=OPOLEZ+BSOLT*2
l_obus(5)=OPLATE2(2,2,1)-(OPOLE(1,1,1)+OPOLE(1,2,1))/2
*IF,PorN,EQ,1,THEN
	l_obus(6)=OPLATE1(1,3,2)-BUSSOLH/2-(SOL1(1,2,2,1,2)+SOL1(1,1,2,3,2))/2+(OPLATE1(1,2,1)-(SOL1(1,1,1,1,1)+SOL1(1,PARA,1,2,1))/2)
*ENDIF
*IF,PorN,EQ,0,THEN
	l_obus(6)=OPLATE1(1,3,2)-BUSSOLH/2-(SOL1(1,2,2,1,2)+SOL1(1,1,2,3,2))/2
*ENDIF
l_obus(7)=BUSSOLH*2/3
l_obus(8)=BUSLENGTH-5*MAG

!O→Nの経路の順で整理
l_nbus(1)=ISPCZ+ESOLT+SPSOLT
l_nbus(2)=NPLATE2(1,2,1)-(SOL1(1,1,1,1,1)+SOL1(1,PARA,1,2,1))/2
l_nbus(3)=(NPOLE(1,1,1)+NPOLE(1,2,1))/2-NPLATE3(1,1,1)
l_nbus(4)=NPOLEZ+BSOLT*2
l_nbus(5)=NPLATE1(1,3,2)-BUSSOLH/2-(NPOLE(1,3,2)+NPOLE(1,2,2))/2
l_nbus(6)=BUSSOLH*2/3
l_nbus(7)=BUSLENGTH-5*MAG

!P=I^2*R/V=I^2*RCU*L/A/(L*A)=I^2*RCU/(A^2)
*do,ii,1,3,1
p_pbus(ii)=current*current*rcu/(a_pbus(ii)*a_pbus(ii))
*enddo

*do,ii,1,8,1
p_obus(ii)=current*current*rcu/(a_obus(ii)*a_obus(ii))
*enddo

*do,ii,1,7,1
p_nbus(ii)=current*current*rcu/(a_nbus(ii)*a_nbus(ii))
*enddo

*do,ii,1,3,1
w_pbus(ii)=p_pbus(ii)*a_pbus(ii)*l_pbus(ii)
*enddo
*do,ii,1,8,1
w_obus(ii)=p_obus(ii)*a_obus(ii)*l_obus(ii)
*enddo
*do,ii,1,7,1
w_nbus(ii)=p_nbus(ii)*a_nbus(ii)*l_nbus(ii)
*enddo

!w_chip=iq*IGBTX*IGBTY*IGBTZ

*do,ii,1,3,1
r_pbus(ii)=rcu/a_pbus(ii)*l_pbus(ii)
*enddo
*do,ii,1,8,1
r_obus(ii)=rcu/a_obus(ii)*l_obus(ii)
*enddo
*do,ii,1,7,1
r_nbus(ii)=rcu/a_nbus(ii)*l_nbus(ii)
*enddo

W_BUS=0
*if,PorN,eq,1,then	!P側の発熱
!上DBCまでV=52
!---P電極の発熱
VSEL,S,VOLU,,64
BFV,ALL,HGEN,p_pbus(1)
VSEL,S,VOLU,,59
BFV,ALL,HGEN,p_pbus(2)
VSEL,S,VOLU,,5
BFV,ALL,HGEN,p_pbus(3)

!---O電極の発熱
nn=VBASE+PARA*(2*5+1)
VSEL,S,VOLU,,nn+1,nn+PARA,1
nn=VBASE+PARA*(2*6+1)
VSEL,A,VOLU,,nn+1,nn+PARA,1
nn=VBASE+PARA*(2*7+1)
VSEL,A,VOLU,,nn+1,nn+PARA,1
nn=VBASE+PARA*(2*8+1)
VSEL,A,VOLU,,nn+1,nn+PARA,1
BFV,ALL,HGEN,p_obus(1)
VSEL,S,VOLU,,38	!下DBCはV33まで
BFV,ALL,HGEN,p_obus(2)
VSEL,S,VOLU,,37
BFV,ALL,HGEN,p_obus(3)
VSEL,S,VOLU,,83	!BUSはV64まで　信号ピンはV81まで 83はOPOLEの銅部分
BFV,ALL,HGEN,p_obus(4)
VSEL,S,VOLU,,3
VSEL,A,VOLU,,4
BFV,ALL,HGEN,p_obus(5)
VSEL,S,VOLU,,2
BFV,ALL,HGEN,p_obus(6)
VSEL,S,VOLU,,57
BFV,ALL,HGEN,p_obus(7)
VSEL,S,VOLU,,61
BFV,ALL,HGEN,p_obus(8)
*DO,ii,1,3,1
	W_BUS=W_BUS+w_pbus(ii)
*ENDDO
*DO,ii,1,8,1
	W_BUS=W_BUS+w_obus(ii)
*ENDDO
*ENDIF
*if,PorN,eq,0,then	!N側の発熱
!上DBCまでV=52
!---O電極の発熱
VSEL,S,VOLU,,2
BFV,ALL,HGEN,p_obus(6)
VSEL,S,VOLU,,57
BFV,ALL,HGEN,p_obus(7)
VSEL,S,VOLU,,61
BFV,ALL,HGEN,p_obus(8)
!---n電極の発熱
nn=VBASE+PARA*(2*5)
VSEL,S,VOLU,,nn+1,nn+PARA,1
nn=VBASE+PARA*(2*6)
VSEL,A,VOLU,,nn+1,nn+PARA,1
nn=VBASE+PARA*(2*7)
VSEL,A,VOLU,,nn+1,nn+PARA,1
nn=VBASE+PARA*(2*8)
VSEL,A,VOLU,,nn+1,nn+PARA,1
BFV,ALL,HGEN,p_nbus(1)
VSEL,S,VOLU,,35	!下DBCはV33まで
BFV,ALL,HGEN,p_nbus(2)
VSEL,S,VOLU,,36	!下DBCはV33まで
BFV,ALL,HGEN,p_nbus(3)
VSEL,S,VOLU,,86	!BUSはV64まで　信号ピンはV81まで 86はNPOLEの銅部分
BFV,ALL,HGEN,p_nbus(4)
VSEL,S,VOLU,,6
BFV,ALL,HGEN,p_nbus(5)
VSEL,S,VOLU,,58
BFV,ALL,HGEN,p_nbus(6)
VSEL,S,VOLU,,62
VSEL,A,VOLU,,63
BFV,ALL,HGEN,p_nbus(7)
*DO,ii,6,8,1
	W_BUS=W_BUS+w_obus(ii)
*ENDDO
*DO,ii,1,7,1
	W_BUS=W_BUS+w_nbus(ii)
*ENDDO
*ENDIF


!----セル部分のみに発熱------------
VSEL,S,VOLU,,VBASE+PARA*(2+PorN)+1,VBASE+PARA*(3+PorN),1
CM,VIGBT,VOLU
ESLV,R,1	!VOLに符合する要素の選択
NSLE,R,1	!要素に符合するNODEの選択
CM,EIGBT,ELEM
CM,NIGBT,NODE
!*SET,LOSS,506	!損失 1アーム分
!*SET,LOSS,2011	!損失 1アーム分
!*SET,LOSS,1300	!損失 1アーム分 2022
*SET,LOSS,719	!損失 1アーム分 2024
*DIM,IPACTIVE,ARR5,PARA,2,2,4,3	!発熱を与えたい空間
!*SET,EDGE,0.6*MAG
!*SET,ACTIVEY,11.6*MAG
*SET,EDGE,0.34*MAG
!*SET,ACTIVEY,5.11*MAG
*SET,ACTIVEY,2.44*MAG
!*SET,SM_ACTX,1.61*MAG
*SET,SM_ACTX,2.33*MAG
!*SET,SM_ACTY,(6.24-5.11)*MAG
*SET,SM_ACTY,(2.13)*MAG
!大アクティブ部
*DO,ii,1,PARA,1
IPACTIVE(ii,1,1,1,1)=SOL1(PorN+1,ii,2,1,1)+EDGE
IPACTIVE(ii,1,1,1,2)=SOL1(PorN+1,ii,2,3,2)-ACTIVEY-EDGE
IPACTIVE(ii,1,1,1,3)=SOL1(PorN+1,ii,2,1,3)
IPACTIVE(ii,1,1,2,1)=SOL1(PorN+1,ii,2,2,1)-EDGE
IPACTIVE(ii,1,1,2,2)=SOL1(PorN+1,ii,2,3,2)-ACTIVEY-EDGE
IPACTIVE(ii,1,1,2,3)=SOL1(PorN+1,ii,2,2,3)
IPACTIVE(ii,1,1,3,1)=SOL1(PorN+1,ii,2,3,1)-EDGE
IPACTIVE(ii,1,1,3,2)=SOL1(PorN+1,ii,2,3,2)-EDGE
IPACTIVE(ii,1,1,3,3)=SOL1(PorN+1,ii,2,3,3)
IPACTIVE(ii,1,1,4,1)=SOL1(PorN+1,ii,2,4,1)+EDGE
IPACTIVE(ii,1,1,4,2)=SOL1(PorN+1,ii,2,4,2)-EDGE
IPACTIVE(ii,1,1,4,3)=SOL1(PorN+1,ii,2,4,3)
*DO,jj,1,4,1
IPACTIVE(ii,1,2,jj,1)=IPACTIVE(ii,1,1,jj,1)
IPACTIVE(ii,1,2,jj,2)=IPACTIVE(ii,1,1,jj,2)
IPACTIVE(ii,1,2,jj,3)=IPACTIVE(ii,1,1,jj,3)+IGBTZ
*ENDDO
*ENDDO
!小アクティブ部
*DO,ii,1,PARA,1
IPACTIVE(ii,2,1,1,1)=SOL1(PorN+1,ii,2,1,1)+EDGE
IPACTIVE(ii,2,1,1,2)=SOL1(PorN+1,ii,2,1,2)+EDGE
IPACTIVE(ii,2,1,1,3)=SOL1(PorN+1,ii,2,1,3)
IPACTIVE(ii,2,1,2,1)=SOL1(PorN+1,ii,2,1,1)+EDGE+SM_ACTX
IPACTIVE(ii,2,1,2,2)=SOL1(PorN+1,ii,2,2,2)+EDGE
IPACTIVE(ii,2,1,2,3)=SOL1(PorN+1,ii,2,2,3)
IPACTIVE(ii,2,1,3,1)=SOL1(PorN+1,ii,2,1,1)+EDGE+SM_ACTX
IPACTIVE(ii,2,1,3,2)=SOL1(PorN+1,ii,2,2,2)+EDGE+SM_ACTY
IPACTIVE(ii,2,1,3,3)=SOL1(PorN+1,ii,2,3,3)
IPACTIVE(ii,2,1,4,1)=SOL1(PorN+1,ii,2,1,1)+EDGE
IPACTIVE(ii,2,1,4,2)=SOL1(PorN+1,ii,2,2,2)+EDGE+SM_ACTY
IPACTIVE(ii,2,1,4,3)=SOL1(PorN+1,ii,2,4,3)
*DO,jj,1,4,1
IPACTIVE(ii,2,2,jj,1)=IPACTIVE(ii,2,1,jj,1)
IPACTIVE(ii,2,2,jj,2)=IPACTIVE(ii,2,1,jj,2)
IPACTIVE(ii,2,2,jj,3)=IPACTIVE(ii,2,1,jj,3)+IGBTZ
*ENDDO
*ENDDO
!アクティブの寸法、体積の算出　1チップあたりが基本
CMSEL,S,NIGBT
NSEL,R,LOC,X,IPACTIVE(1,1,1,1,1),IPACTIVE(1,1,1,2,1),,0	!nodeの選択
NSEL,R,LOC,Y,IPACTIVE(1,1,1,1,2),IPACTIVE(1,1,1,4,2),,0
NSEL,R,LOC,Z,IPACTIVE(1,1,1,1,3),IPACTIVE(1,1,2,1,3),,0
ESLN,S,0	!NODEに符合する要素の選択
ESEL,R,CENT,Z,IPACTIVE(1,1,1,1,3),IPACTIVE(1,1,2,1,3)
NSLE,S		!要素に符合するNODEの選択
CM,E_LACT,ELEM
CM,N_LACT,NODE
*SET,MAXX
*SET,MINX
*SET,MAXY
*SET,MINY
*SET,MAXZ
*SET,MINZ
*SET,AX	!AX,AY,AZ　大きいアクティブの寸法
*SET,AY
*SET,AZ
*SET,SAX	!SAX,SAY,SAZ 小さいアクティブの寸法
*SET,SAY
*SET,SAZ

*GET,MAXX,NODE,,MXLOC,X
*GET,MAXY,NODE,,MXLOC,Y
*GET,MAXZ,NODE,,MXLOC,Z
*GET,MINX,NODE,,MNLOC,X
*GET,MINY,NODE,,MNLOC,Y
*GET,MINZ,NODE,,MNLOC,Z
*SET,ACTVOL
ACTVOL=(MAXX-MINX)*(MAXY-MINY)*(MAXZ-MINZ)
AX=MAXX-MINX	!AX,AY,AZ ｱｸﾃｨﾌﾞ領域として選んだ要素群の寸法
AY=MAXY-MINY
AZ=MAXZ-MINZ
!ALLSEL,ALL

CMSEL,S,NIGBT
NSEL,R,LOC,X,IPACTIVE(1,2,1,1,1),IPACTIVE(1,2,1,2,1),,0	!小アクティブ部のnodeの選択
NSEL,R,LOC,Y,IPACTIVE(1,2,1,1,2),IPACTIVE(1,2,1,4,2),,0
NSEL,R,LOC,Z,IPACTIVE(1,2,1,1,3),IPACTIVE(1,2,2,1,3),,0
ESLN,S,0	!NODEに符合する要素の選択
ESEL,R,CENT,Z,IPACTIVE(1,2,1,1,3),IPACTIVE(1,2,2,1,3)
CMSEL,S,N_LACT
ESLN,U,1	!NODEに符合する要素を除去 大小領域のオーバーラップ部の処理
NSLE,S		!要素に符合するNODEの選択
*GET,MAXX,NODE,,MXLOC,X
*GET,MAXY,NODE,,MXLOC,Y
*GET,MAXZ,NODE,,MXLOC,Z
*GET,MINX,NODE,,MNLOC,X
*GET,MINY,NODE,,MNLOC,Y
*GET,MINZ,NODE,,MNLOC,Z
ACTVOL=ACTVOL+(MAXX-MINX)*(MAXY-MINY)*(MAXZ-MINZ)
SAX=MAXX-MINX	!AX,AY,AZ ｱｸﾃｨﾌﾞ領域として選んだ要素群の寸法
SAY=MAXY-MINY
SAZ=MAXZ-MINZ
!アクティブ部の体積と寸法の算出完了


ALLSEL,ALL


!PARAすべてのアクティブ要素の抜き取り
CMSEL,S,NIGBT
NSEL,R,LOC,X,IPACTIVE(1,1,1,1,1),IPACTIVE(1,1,1,2,1),,0	!nodeの選択
NSEL,R,LOC,Y,IPACTIVE(1,1,1,1,2),IPACTIVE(1,1,1,4,2),,0
NSEL,R,LOC,Z,IPACTIVE(1,1,1,1,3),IPACTIVE(1,1,2,1,3),,0
ESLN,S,0	!NODEに符合する要素の選択	1はAND 0はORのイメージ　0のほうが広い要素を選択する
!NSLE,S		!要素に符合するNODEの選択
CMSEL,S,NIGBT
NSEL,R,LOC,X,IPACTIVE(1,2,1,1,1),IPACTIVE(1,2,1,2,1),,0	!nodeの選択
NSEL,R,LOC,Y,IPACTIVE(1,2,1,1,2),IPACTIVE(1,2,1,4,2),,0
NSEL,R,LOC,Z,IPACTIVE(1,2,1,1,3),IPACTIVE(1,2,2,1,3),,0
ESLN,A,0	!NODEに符合する要素の選択
!NSLE,A		!要素に符合するNODEの選択
*DO,ii,2,PARA,1
CMSEL,S,NIGBT
NSEL,R,LOC,X,IPACTIVE(ii,1,1,1,1),IPACTIVE(ii,1,1,2,1),,0	!nodeの選択
NSEL,R,LOC,Y,IPACTIVE(ii,1,1,1,2),IPACTIVE(ii,1,1,4,2),,0
NSEL,R,LOC,Z,IPACTIVE(ii,1,1,1,3),IPACTIVE(ii,1,2,1,3),,0
ESLN,A,0	!NODEに符合する要素の選択
!NSLE,A		!要素に符合するNODEの選択
CMSEL,S,NIGBT
NSEL,R,LOC,X,IPACTIVE(ii,2,1,1,1),IPACTIVE(ii,2,1,2,1),,0	!nodeの選択
NSEL,R,LOC,Y,IPACTIVE(ii,2,1,1,2),IPACTIVE(ii,2,1,4,2),,0
NSEL,R,LOC,Z,IPACTIVE(ii,2,1,1,3),IPACTIVE(ii,2,2,1,3),,0
ESLN,A,0	!NODEに符合する要素の選択
!NSLE,A		!要素に符合するNODEの選択
*ENDDO
!PARAすべてのアクティブ要素の抜き取りここまで
!ESLN,R,1	!NODEに符合する要素の選択
ESEL,R,CENT,Z,IPACTIVE(1,1,1,1,3),IPACTIVE(1,1,2,1,3)
NSLE,S		!要素に符合するNODEの選択
!NSLE,R		!要素に符合するNODEの選択
ESEL,R,TYPE,,1	!界面の接触要素も選択されているのでTYPE1のソリッドの要素だけを選択する

iq=LOSS/PARA/ACTVOL
!ESLN,R,0	!NODEに符合する要素の選択
CM,P_ACT_IGBT,ELEM
BFE,P_ACT_IGBT,HGEN,,iq
ALLSEL,ALL
W_CHIP=iq*ACTVOL*PARA
!----セル部分のみに発熱------------
!*ENDDO	!チップPARAの計算

!熱伝達
*SET,tconv,30000

ALLSEL,ALL
ASEL,S,EXT
SFA,ALL,,CONV,10,Tatm 	!
ALLSEL,ALL
VSEL,S,MAT,,3
ASEL,R,EXT
!ALLSEL,ALL
ASEL,R,LOC,Z,LOWCU(1,1,3)
!ASEL,S,AREA,,1,7,6		!P,N面
!SFA,ALL,,CONV,6300,Tatm	!
!SFA,ALL,,CONV,15000,Tatm	!2022
SFA,ALL,,CONV,tconv,Tatm	!2024
!SFA,ALL,,CONV,12000,Tatm	!

ALLSEL
VSEL,S,MAT,,3
ASEL,R,EXT
ASEL,R,EXT
ASEL,R,LOC,Z,UPCU(2,1,3)
!ASEL,S,AREA,,68			!O面
!SFA,ALL,,CONV,6300,Tatm	!
!SFA,ALL,,CONV,15000,Tatm	!2022
SFA,ALL,,CONV,tconv,Tatm	!2024
!SFA,ALL,,CONV,12000,Tatm	!
ALLSEL
FINISH


!----ソリューションコントロール設定---
/SOLU
!*
ANTYPE,0
!NSUBST,10,100,1
OUTRES,ERASE
OUTRES,ALL,ALL

fini

/solu
toffst,273.15
tunif,Tatm
tref,Tatm
TIME,TimeS
DELTIM,0.02,0.002,0.2
FINI

/REP
allsel,all

/solu

SOLVE


FINI
!/copy,,rst,,,rth	今回はこの操作はいらないのかな？ RSTが作られていない
FINISH

/inquire,file_check,exist,file,rst	! ディレクトリィ内に"file.rst"の存在を確認
! パラメータ"file_check"に値を返す(あり=1、なし=0)
*if,file_check,eq,1,THEN			! rstがある場合
/copy,file,rst,,file,rth		! /copyでrth作成
*endif


allsel,all

*set,Tjave
*set,Rthjw
*set,Tjmax
*set,Rthjw_max

!-------------------------------------------------
/POST1
	SET,,,1,,1	!0は初期1は高温 2がまた低温	170609変更
	ETABLE,Temp,TEMP,

	CMSEL,S,VIGBT,VOLU
	ESLV,S,

	ESORT,ETAB,TEMP,,
	NSLE,S,

	*GET,Tjmax1,SORT,,Max
	Tjmax=Tjmax1
	Rthjw_max=(Tjmax-Tatm)/(LOSS)		!


	ETABLE,ETEMP,TEMP                    !要素の温度をETEMPにストア
	ETABLE,EVOLU,VOLU                    !要素の体積をEVOLUにストア
	SSUM                                 !要素テーブルの合計値
	*GET,VVOLU,SSUM,,ITEM,EVOLU          !EVOLUの合計をVVOLUにストア
	SMULT,ETAVE,ETEMP,EVOLU,1,1/VVOLU    !要素テーブル計算(etave=etemp*evolu/vvolu)
	SSUM                                 !要素テーブルの合計値
	*GET,Tjave1,SSUM,,ITEM,ETAVE          !ETAVEの合計をTjAVEにストア

	Tjave=Tjave1
	Rthjw=(Tjave-Tatm)/(LOSS)		!

FINISH
/REP
ALLSEL,ALL


FINISH
!--------ここまでアレンジして移植---------------------------------
/REP
ALLSEL,ALL

SAVE,'THERMAL','db',,ALL

FINI

!-------------------------
/CLEAR
RESUME,'THERMAL','db'


*IF,STRESSSW,EQ,1,THEN

!/SOLU
!LDREAD,TEMP,,,1.0,,FILE,RTH	!1秒後の温度分布読み込み　定常なので1秒とは終了時のこと


!-------------------ここから構造解析----------------------------------------------------
/PREP7
keyopt,4,1,0	!ここを変更　接触ペアの自由度をUX,UY,UZにします。
keyopt,5,1,0	!ここを変更　接触ペアの自由度をUX,UY,UZにします。
keyopt,6,1,0	!ここを変更　接触ペアの自由度をUX,UY,UZにします。
keyopt,7,1,0	!ここを変更　接触ペアの自由度をUX,UY,UZにします。
keyopt,8,1,0	!ここを変更　接触ペアの自由度をUX,UY,UZにします
keyopt,9,1,0	!ここを変更　接触ペアの自由度をUX,UY,UZにします
keyopt,10,1,0	!ここを変更　接触ペアの自由度をUX,UY,UZにします
keyopt,11,1,0	!ここを変更　接触ペアの自由度をUX,UY,UZにします
keyopt,12,1,0	!ここを変更　接触ペアの自由度をUX,UY,UZにします

keyopt,4,2,0	!ここを変更　接触ペアの自由度をUX,UY,UZにします。
keyopt,5,2,0	!ここを変更　接触ペアの自由度をUX,UY,UZにします。
keyopt,6,2,0	!ここを変更　接触ペアの自由度をUX,UY,UZにします。
keyopt,7,2,0	!ここを変更　接触ペアの自由度をUX,UY,UZにします。
keyopt,8,2,0	!ここを変更　接触ペアの自由度をUX,UY,UZにします
keyopt,9,2,0	!ここを変更　接触ペアの自由度をUX,UY,UZにします
keyopt,10,2,0	!ここを変更　接触ペアの自由度をUX,UY,UZにします
keyopt,11,2,0	!ここを変更　接触ペアの自由度をUX,UY,UZにします
keyopt,12,2,0	!ここを変更　接触ペアの自由度をUX,UY,UZにします

keyopt,4,12,5	!この行は固着の指定
keyopt,5,12,5	!この行は固着の指定
keyopt,6,12,5	!この行は固着の指定
keyopt,7,12,5	!この行は固着の指定
keyopt,8,12,5	!この行は固着の指定
keyopt,9,12,5	!この行は固着の指定
keyopt,10,12,5	!この行は固着の指定
keyopt,11,12,5	!この行は固着の指定
keyopt,12,12,5	!この行は固着の指定

!keyopt,4,12,0	!この行は固着の指定
!keyopt,5,12,0	!この行は固着の指定
!keyopt,6,12,0	!この行は固着の指定
!keyopt,7,12,0	!この行は固着の指定
!keyopt,8,12,0	!この行は固着の指定
!keyopt,9,12,0	!この行は固着の指定
!keyopt,10,12,0	!この行は固着の指定
!keyopt,11,12,0	!この行は固着の指定


ET,1,SOLID186
!esel,s,type,,1		!稲さんの助言
!EMODIF,ALL,TYPE,1		!稲さんの助言
!allsel		!稲さんの助言

!ETCHG,TTS
FINISH

/SOLU
ANTYPE,STATIC	!solu切り替え直後
NLGEOM,ON ! 熱応力＋接触なら必須		!稲さんの助言

!/SOLU
LDREAD,TEMP,LAST,0,,,FILE,RTH	!1秒後の温度分布読み込み　定常なので1秒とは終了時のこと


ALLSEL,ALL
!拘束点-------------------------------------------------------
!ANTYPE,0

ALLSEL,ALL
NSEL,S,LOC,X,LCERA(1,1,1)
NSEL,R,LOC,Z,LCERA(1,1,3)
NSEL,R,LOC,Y,LCERA(1,1,2)	!アルミ板のX=0,Y=4.1,Z=0を選択　この点を全拘束する

D,ALL, ,0, , , ,UX,UY,UZ, , ,

ALLSEL,ALL
NSEL,S,LOC,X,LCERA(1,2,1)
NSEL,R,LOC,Z,LCERA(1,1,3)
NSEL,R,LOC,Y,LCERA(1,1,2)	!アルミ板のX=0,Y=4.1,Z=0を選択　この点を全拘束する

D,ALL, ,0, , , ,UY,UZ, , ,

ALLSEL,ALL
NSEL,S,LOC,X,LCERA(1,1,1)
NSEL,R,LOC,Z,LCERA(1,1,3)
NSEL,R,LOC,Y,LCERA(1,4,2)	!アルミ板のX=0,Y=4.1,Z=0を選択　この点を全拘束する

D,ALL, ,0, , , ,UZ, , ,

ALLSEL,ALL

!--------------構造解析
TREF,Tatm

!LDREAD,TEMP,,,1.0,,FILE,RTH	!1秒後の温度分布読み込み　定常なので1秒とは終了時のこと
!LDREAD,TEMP,,,1.0,,FILE		!1秒後の温度分布読み込み　定常なので1秒とは終了時のこと
!FINISH	!finishは/solを抜けて、拘束などが不定になるのでNG

!/solu

!ANTYPE,4
!OUTRES,ERASE

!toffst,273.15
!tunif,Tatm  !これは完全NG　温度荷重が消えてしまう
tref,Tatm
TIME,1
!SUBST,50,200,1
!DELTIM,0.02,0.002,0.2
!FINI

!KBC,1		!稲さんの助言
!KBC,0			!稲さんの助言
!NSUBST,100,300,1

!/REP
!ALLSEL,ALL
OUTRES,ALL,ALL

!/solu
! --- 接触要素だけを殺す ---
!ESEL,S,TYPE,,5,
!EKILL,ALL
ALLSEL,ALL
! 接触TYPE=3,4だけ復活
!ESEL,S,TYPE,,3,4
!EALIVE,ALL
!ALLSEL,ALL
!TUNIF,Tatm
TREF,Tatm

KBC,0			!ここだけ生かしても流れず
NSUBST,10,10,1		!ここだけ生かしても流れず
! --- 接触要素だけを殺す ---
SOLVE
ALLSEL,ALL
!---------塑性　累積相当ひずみ　要素テーブルの取得
/POST1
!SET,LAST	!応力コンターのため
!PLNSOL,S,EQV	!応力コンターのため

!-----------------BLはんだ---------------------
	SET,,,1,,1	!高温部分にSET  170609 追記


CMSEL,S,HANDA,VOLU
ESLV,S,		!選択されたボリュームに対する要素の選択

NSLE,S,		!選択された要素の接点の選択

AVPRIN,0, , 	!主値、ベクトル和の計算方法　0は共通の接点でまず平均値をとる
ETABLE,E_epeq_H,NL,EPEQ
ETABLE,E_epeq_1,NL,EPEQ
!*
AVPRIN,0, ,
ETABLE,E_HANDA_X,CENT,X
!*
AVPRIN,0, ,
ETABLE,E_HANDA_Y,CENT,Y
!*
AVPRIN,0, ,
ETABLE,E_HANDA_Z,CENT,Z
!*
PRETAB,E_HANDA_X,E_HANDA_Y,E_HANDA_Z,E_epeq_H	!プリントコマンド
!*
ESORT,ETAB,E_epeq_H,,
NSLE,S,

*GET,HIZUMI_Hpct,SORT,,Max	!HIZUMI_Hpctがはんだの最大歪

*IF,RESINKEY,EQ,1,THEN
	SET,,,1,,1	!高温部分にSET  170609 追記


	ESEL,S,TYPE,,6	!はんだと樹脂の接合面
	AVPRIN,0, ,
	etable,F_SOL_H,cont,sfric	!せん断
	etable,P_SOL_H,cont,pres	!引っ張り

	ESEL,S,TYPE,,7	!チップと樹脂の接合面
	AVPRIN,0, ,
	etable,F_SI_H,cont,sfric	!せん断
	etable,P_SI_H,cont,pres	!引っ張り

	ESEL,S,TYPE,,8	!銅と樹脂の接合面
	AVPRIN,0, ,
	etable,F_CU_H,cont,sfric	!せん断
	etable,P_CU_H,cont,pres	!引っ張り

	ESEL,S,TYPE,,9	!銅と細目樹脂の接合面
	AVPRIN,0, ,
	etable,F_CUF_H,cont,sfric	!せん断
	etable,P_CUF_H,cont,pres	!引っ張り
!---DBC---
	ESEL,S,TYPE,,10	!セラと樹脂の接合面
	AVPRIN,0, ,
	etable,F_CERA_H,cont,sfric	!せん断
	etable,P_CERA_H,cont,pres	!引っ張り
!---DBC 終了---
	CMSEL,S,RESIN,VOLU
	ESLV,S,		!選択されたボリュームに対する要素の選択
	NSLE,S,		!選択された要素の接点の選択
	AVPRIN,0, ,
	ETABLE,R_EPEL_H,EPEL,EQV  !相当弾性ひずみEPELは弾性ひずみ
	ETABLE,RHX,EPEL,X  !高温弾性ひずみ
	ETABLE,RHY,EPEL,Y  !高温弾性ひずみ
	ETABLE,RHZ,EPEL,Z  !高温弾性ひずみ
	ETABLE,RHXY,EPEL,XY  !高温弾性ひずみ
	ETABLE,RHYZ,EPEL,YZ  !高温弾性ひずみ
	ETABLE,RHXZ,EPEL,XZ  !高温弾性ひずみ

	ETABLE,RSHX,S,X  !高温弾性応力
	ETABLE,RSHY,S,Y  !高温弾性応力
	ETABLE,RSHZ,S,Z  !高温弾性応力
	ETABLE,RSHXY,S,XY  !高温弾性応力
	ETABLE,RSHYZ,S,YZ  !高温弾性応力
	ETABLE,RSHXZ,S,XZ  !高温弾性応力

	ETABLE,RHSXY,S,XY  !高温弾性せんだん応力  →170127追記　結局RSHXYと同じ

	allsel,all	!これが抜けていたかな

!-----はんだと樹脂の界面まとめ
!SADD,F_SOL,F_SOL_H,F_SOL_L,0.5,0.5	!0.5は片振りにするため せんだんは符号がないのでともにプラスで計算
!SADD,P_SOL,P_SOL_H,P_SOL_L,0.5,-0.5
!SMULT,P_SOL,P_SOL,,-1

!ESORT,ETAB,F_SOL_H,0,1		!0は降順　1は絶対値
!PRETAB,F_SOL_H
!*GET,MAX_F_SOL_H,SORT,,Max

SMULT,P_SOL_H,P_SOL_H,,-0.5	!0.5は片振りにするため。マイナスは引張を正にするため
SMULT,F_SOL_H,F_SOL_H,,0.5	!0.5は片振りにするため。

ESORT,ETAB,F_SOL_H,0,1		!0は降順　1は絶対値
PRETAB,F_SOL_H
*GET,MAX_F_SOL,SORT,,Max
*GET,ELM_F_SOL,SORT,,IMax	!IMAXは最大値を有する節点の要素番号
*GET,ELM_F_SOLX,ELEM,ELM_F_SOL,CENT,X
*GET,ELM_F_SOLY,ELEM,ELM_F_SOL,CENT,Y
*GET,ELM_F_SOLZ,ELEM,ELM_F_SOL,CENT,Z

ESORT,ETAB,P_SOL_H,0,1		!0は降順　1は絶対値
PRETAB,P_SOL_H

*GET,MAX_P_SOL,SORT,,Max
*GET,ELM_P_SOL,SORT,,IMax	!IMAXは最大値を有する節点の要素番号
*GET,ELM_P_SOLX,ELEM,ELM_P_SOL,CENT,X
*GET,ELM_P_SOLY,ELEM,ELM_P_SOL,CENT,Y
*GET,ELM_P_SOLZ,ELEM,ELM_P_SOL,CENT,Z

!-----チップと樹脂の界面まとめ
!SADD,F_SI,F_SI_H,F_SI_L,0.5,0.5	!0.5は片振りにするため
!SADD,P_SI,P_SI_H,P_SI_L,0.5,-0.5
!SMULT,P_SI,P_SI,,-1	!面圧なのでもともとは圧縮が正。これをひっくり返して引っ張りを正にしている

SMULT,P_SI_H,P_SI_H,,-0.5	!0.5は片振りにするため。マイナスは引張を正にするため
SMULT,F_SI_H,F_SI_H,,0.5	!0.5は片振りにするため。

ESORT,ETAB,F_SI_H,0,1		!0は降順　1は絶対値
PRETAB,F_SI_H

*GET,MAX_F_SI,SORT,,Max
*GET,ELM_F_SI,SORT,,IMax	!IMAXは最大値を有する節点の要素番号
*GET,ELM_F_SIX,ELEM,ELM_F_SI,CENT,X
*GET,ELM_F_SIY,ELEM,ELM_F_SI,CENT,Y
*GET,ELM_F_SIZ,ELEM,ELM_F_SI,CENT,Z

ESORT,ETAB,P_SI_H,0,1		!0は降順　1は絶対値
PRETAB,P_SI_H

*GET,MAX_P_SI,SORT,,Max
*GET,ELM_P_SI,SORT,,IMax	!IMAXは最大値を有する節点の要素番号
*GET,ELM_P_SIX,ELEM,ELM_P_SI,CENT,X
*GET,ELM_P_SIY,ELEM,ELM_P_SI,CENT,Y
*GET,ELM_P_SIZ,ELEM,ELM_P_SI,CENT,Z

!-----銅と樹脂の界面まとめ
!SADD,F_CU,F_CU_H,F_CU_L,0.5,0.5	!0.5は片振りにするため
!SADD,P_CU,P_CU_H,P_CU_L,0.5,-0.5
!SMULT,P_CU,P_CU,,-1

SMULT,P_CU_H,P_CU_H,,-0.5	!0.5は片振りにするため。マイナスは引張を正にするため
SMULT,F_CU_H,F_CU_H,,0.5	!0.5は片振りにするため。

ESORT,ETAB,F_CU_H,0,1		!0は降順　1は絶対値
PRETAB,F_CU_H

*GET,MAX_F_CU,SORT,,Max
*GET,ELM_F_CU,SORT,,IMax	!IMAXは最大値を有する節点の要素番号
*GET,ELM_F_CUX,ELEM,ELM_F_CU,CENT,X
*GET,ELM_F_CUY,ELEM,ELM_F_CU,CENT,Y
*GET,ELM_F_CUZ,ELEM,ELM_F_CU,CENT,Z

ESORT,ETAB,P_CU_H,0,1		!0は降順　1は絶対値
PRETAB,P_CU_H

*GET,MAX_P_CU,SORT,,Max
*GET,ELM_P_CU,SORT,,IMax	!IMAXは最大値を有する節点の要素番号
*GET,ELM_P_CUX,ELEM,ELM_P_CU,CENT,X
*GET,ELM_P_CUY,ELEM,ELM_P_CU,CENT,Y
*GET,ELM_P_CUZ,ELEM,ELM_P_CU,CENT,Z

!-----銅と細目樹脂の界面まとめ
!SADD,F_CU,F_CU_H,F_CU_L,0.5,0.5	!0.5は片振りにするため
!SADD,P_CU,P_CU_H,P_CU_L,0.5,-0.5
!SMULT,P_CU,P_CU,,-1

SMULT,P_CUF_H,P_CUF_H,,-0.5	!0.5は片振りにするため。マイナスは引張を正にするため
SMULT,F_CUF_H,F_CUF_H,,0.5	!0.5は片振りにするため。

ESORT,ETAB,F_CUF_H,0,1		!0は降順　1は絶対値
PRETAB,F_CUF_H

*GET,MAX_F_CUF,SORT,,Max
*GET,ELM_F_CUF,SORT,,IMax	!IMAXは最大値を有する節点の要素番号
*GET,ELM_F_CUFX,ELEM,ELM_F_CUF,CENT,X
*GET,ELM_F_CUFY,ELEM,ELM_F_CUF,CENT,Y
*GET,ELM_F_CUFZ,ELEM,ELM_F_CUF,CENT,Z

ESORT,ETAB,P_CUF_H,0,1		!0は降順　1は絶対値
PRETAB,P_CUF_H

*GET,MAX_P_CUF,SORT,,Max
*GET,ELM_P_CUF,SORT,,IMax	!IMAXは最大値を有する節点の要素番号
*GET,ELM_P_CUFX,ELEM,ELM_P_CU,CENT,X
*GET,ELM_P_CUFY,ELEM,ELM_P_CU,CENT,Y
*GET,ELM_P_CUFZ,ELEM,ELM_P_CU,CENT,Z

!---DBC---
!-----セラと樹脂の界面まとめ
!SADD,F_CERA,F_CERA_H,F_CERA_L,0.5,0.5	!0.5は片振りにするため
!SADD,P_CERA,P_CERA_H,P_CERA_L,0.5,-0.5
!SMULT,P_CERA,P_CERA,,-1

SMULT,P_CERA_H,P_CERA_H,,-0.5	!0.5は片振りにするため。マイナスは引張を正にするため
SMULT,F_CERA_H,F_CERA_H,,0.5	!0.5は片振りにするため。

ESORT,ETAB,F_CERA_H,0,1		!0は降順　1は絶対値
PRETAB,F_CERA_H

*GET,MAX_F_CERA,SORT,,Max
*GET,ELM_F_CERA,SORT,,IMax	!IMAXは最大値を有する節点の要素番号
*GET,ELM_F_CERAX,ELEM,ELM_F_CERA,CENT,X
*GET,ELM_F_CERAY,ELEM,ELM_F_CERA,CENT,Y
*GET,ELM_F_CERAZ,ELEM,ELM_F_CERA,CENT,Z

ESORT,ETAB,P_CERA_H,0,1		!0は降順　1は絶対値
PRETAB,P_CERA_H

*GET,MAX_P_CERA,SORT,,Max
*GET,ELM_P_CERA,SORT,,IMax	!IMAXは最大値を有する節点の要素番号
*GET,ELM_P_CERAX,ELEM,ELM_P_CERA,CENT,X
*GET,ELM_P_CERAY,ELEM,ELM_P_CERA,CENT,Y
*GET,ELM_P_CERAZ,ELEM,ELM_P_CERA,CENT,Z

!---DBC 終了---
!----樹脂の弾性ひずみまとめ  こっちが正解の筈 ミーゼス応力の計算 20170127正しい式に変更したよ

SMULT,RSX,RSHX,,0.5	!0.5は片振りにするため
SMULT,RSY,RSHY,,0.5	!0.5は片振りにするため
SMULT,RSZ,RSHZ,,0.5	!0.5は片振りにするため
SMULT,RSXY,RSHXY,,0.5	!0.5は片振りにするため
SMULT,RSYZ,RSHYZ,,0.5	!0.5は片振りにするため
SMULT,RSXZ,RSHXZ,,0.5	!0.5は片振りにするため


SADD,RSX_Y,RSX,RSY,1,-1
SEXP,RSX_Y,RSX_Y,,2,	!(RSX_Y)^2
SADD,RSY_Z,RSY,RSZ,1,-1
SEXP,RSY_Z,RSY_Z,,2,	!(RSY_Z)^2
SADD,RSX_Z,RSX,RSZ,1,-1
SEXP,RSX_Z,RSX_Z,,2,	!(RSX_Z)^2
SEXP,RSXY,RSXY,,2,
SEXP,RSYZ,RSYZ,,2,
SEXP,RSXZ,RSXZ,,2,
SMULT,RSXY,RSXY,,6
SMULT,RSYZ,RSYZ,,6
SMULT,RSXZ,RSXZ,,6
SADD,RSEQV,RSX_Y,RSY_Z,1,1
SADD,RSEQV,RSEQV,RSX_Z,1,1
SADD,RSEQV,RSEQV,RSXY,1,1
SADD,RSEQV,RSEQV,RSYZ,1,1
SADD,RSEQV,RSEQV,RSXZ,1,1
SMULT,RSEQV,RSEQV,,0.5
SEXP,RSEQV,RSEQV,,0.5

ESORT,ETAB,RSEQV,0,1		!0は降順　1は絶対値
PRETAB,RSEQV


*GET,MAX_RS,SORT,,Max
*GET,ELM_RS,SORT,,IMax	!IMAXは最大値を有する節点の要素番号
*GET,ELM_RS_X,ELEM,ELM_RS,CENT,X
*GET,ELM_RS_Y,ELEM,ELM_RS,CENT,Y
*GET,ELM_RS_Z,ELEM,ELM_RS,CENT,Z
!------------ミーゼス応力の計算　高温-低温の片振り振幅　ここまで---------------------------
*endif !resinkey

SAVE ,'STRESS_PCT','db'

*ENDIF	!STRESSSW

ALLSEL
FINI

!*ENDIF !SOLUTIONSW


!*GO,:OWARI


*IF,TCTSW,EQ,1,THEN


!-------------------ここから構造解析----------------------------------------------------
/PREP7
keyopt,4,1,0	!ここを変更　接触ペアの自由度をUX,UY,UZにします。
keyopt,5,1,0	!ここを変更　接触ペアの自由度をUX,UY,UZにします。
keyopt,6,1,0	!ここを変更　接触ペアの自由度をUX,UY,UZにします。
keyopt,7,1,0	!ここを変更　接触ペアの自由度をUX,UY,UZにします。
keyopt,8,1,0	!ここを変更　接触ペアの自由度をUX,UY,UZにします
keyopt,9,1,0	!ここを変更　接触ペアの自由度をUX,UY,UZにします
keyopt,10,1,0	!ここを変更　接触ペアの自由度をUX,UY,UZにします
keyopt,11,1,0	!ここを変更　接触ペアの自由度をUX,UY,UZにします

keyopt,4,2,0	!ここを変更　接触ペアの自由度をUX,UY,UZにします。
keyopt,5,2,0	!ここを変更　接触ペアの自由度をUX,UY,UZにします。
keyopt,6,2,0	!ここを変更　接触ペアの自由度をUX,UY,UZにします。
keyopt,7,2,0	!ここを変更　接触ペアの自由度をUX,UY,UZにします。
keyopt,8,2,0	!ここを変更　接触ペアの自由度をUX,UY,UZにします
keyopt,9,2,0	!ここを変更　接触ペアの自由度をUX,UY,UZにします
keyopt,10,2,0	!ここを変更　接触ペアの自由度をUX,UY,UZにします
keyopt,11,2,0	!ここを変更　接触ペアの自由度をUX,UY,UZにします

keyopt,4,12,5	!この行は固着の指定
keyopt,5,12,5	!この行は固着の指定
keyopt,6,12,5	!この行は固着の指定
keyopt,7,12,5	!この行は固着の指定
keyopt,8,12,5	!この行は固着の指定
keyopt,9,12,5	!この行は固着の指定
keyopt,10,12,5	!この行は固着の指定
keyopt,11,12,5	!この行は固着の指定

ET,1,SOLID186
EMODIF,ALL,TYPE,1
!ETCHG,TTS
FINISH
/SOLUTION

ANTYPE,STATIC

ALLSEL,ALL
!拘束点-------------------------------------------------------
ANTYPE,0

ALLSEL,ALL
NSEL,S,LOC,X,LCERA(1,1,1)
NSEL,R,LOC,Z,LCERA(1,1,3)
NSEL,R,LOC,Y,LCERA(1,1,2)	!アルミ板のX=0,Y=4.1,Z=0を選択　この点を全拘束する

D,ALL, ,0, , , ,UX,UY,UZ, , ,

ALLSEL,ALL
NSEL,S,LOC,X,LCERA(1,2,1)
NSEL,R,LOC,Z,LCERA(1,1,3)
NSEL,R,LOC,Y,LCERA(1,1,2)	!アルミ板のX=0,Y=4.1,Z=0を選択　この点を全拘束する

D,ALL, ,0, , , ,UY,UZ, , ,

ALLSEL,ALL
NSEL,S,LOC,X,LCERA(1,1,1)
NSEL,R,LOC,Z,LCERA(1,1,3)
NSEL,R,LOC,Y,LCERA(1,4,2)	!アルミ板のX=0,Y=4.1,Z=0を選択　この点を全拘束する

D,ALL, ,0, , , ,UZ, , ,

ALLSEL,ALL


!-------------------------------------------------------------------------------------------------------
!-----------TCTの設定追記-----------------------------------------------------------------------------
!------------120825追記 TCTΔT=165℃の配列作成------------------
!進みが非常に遅いので、単純なのこぎり上に変更　2サイクル9ステップ 8秒(仮想時間)
*DIM,C40_TCT,TABLE,9,1,1,TIME, ,
!*
*TREAD,C40_TCT,'MINUS40_125','txt','D:\Userarea\J0125789\Documents\ANSYS_CAE\temperature\NO_CREEP\', ,
!---------------------------------------------------------------

/SOLUTION
!CUTCONTROL,PLSLIMIT,0.05	!追記　収束を助ける


ANTYPE,0
!NSUBST,10,400,1
NSUBST,10,100,1
OUTRES,ERASE
OUTRES,ALL,ALL


ALLSEL
BFV,all,TEMP, %C40_TCT%


toffst,273.15
!tunif,Tatm
!tref,Tatm
!TIME,TimeS
tunif,20
tref,20
TIME,8

DELTIM,0.02,0.002,0.4	!時間STEPの定義

!-----------TCTの設定追記-----------------------------------------------------------------------------


/SOLUTION

*do,ii,1,8,1
	TIME,ii
	SOLVE
*enddo


!--------------------------------------------------------------------------------------------------------

!---------塑性　累積相当ひずみ　要素テーブルの取得
/POST1

!--------4秒後のひずみ----------------------------------------------
!-----------------はんだ---------------------
SET, , ,1, ,4, , !まずは1CYC後

CMSEL,S,HANDA,VOLU
ESLV,S,		!選択されたボリュームに対する要素の選択

NSLE,S,		!選択された要素の接点の選択

AVPRIN,0, , 	!主値、ベクトル和の計算方法　0は共通の接点でまず平均値をとる
ETABLE,E_epeq_H,NL,EPEQ
ETABLE,E_epeq_1,NL,EPEQ
!*
AVPRIN,0, ,
ETABLE,E_HANDA_X,CENT,X
!*
AVPRIN,0, ,
ETABLE,E_HANDA_Y,CENT,Y
!*
AVPRIN,0, ,
ETABLE,E_HANDA_Z,CENT,Z
!*
!PRETAB,E_HANDA_X,E_HANDA_Y,E_HANDA_Z,E_epeq_H
!*
ESORT,ETAB,E_epeq_H,,
NSLE,S,

*GET,HIZUMI_H_bf,SORT,,Max	!はんだの1サイクル時のひずみ　スタートポイント

!--------2CYC後のひずみ-------------------------------------------
!-----------------BLはんだ---------------------
SET, , ,1, ,8, , !2CYC後

CMSEL,S,HANDA,VOLU
ESLV,S,

NSLE,S,

AVPRIN,0, ,
ETABLE,E_epeq_H,NL,EPEQ
ETABLE,E_epeq_2,NL,EPEQ
!*
AVPRIN,0, ,
ETABLE,E_HANDA_X,CENT,X
!*
AVPRIN,0, ,
ETABLE,E_HANDA_Y,CENT,Y
!*
AVPRIN,0, ,
ETABLE,E_HANDA_Z,CENT,Z
!*
!PRETAB,E_HANDA_X,E_HANDA_Y,E_HANDA_Z,E_epeq_H
!*
ESORT,ETAB,E_epeq_H,,
NSLE,S,

*GET,HIZUMI_H_af,SORT,,Max	!はんだの2サイクル時のひずみ

HIZUMI_H=HIZUMI_H_af-HIZUMI_H_bf

SADD,E_epeq_3,E_epeq_2,E_epeq_1,1,-1	!はんだのひずみ差分 2サイクル目で蓄積したひずみ
ESORT,ETAB,E_epeq_3,,
NSLE,S,

*GET,HIZUMI_2CYC,SORT,,Max


*IF,RESINKEY,EQ,1,THEN		!これのENDIF必要---------下に作成 あり--------------------------------------------------

!--------5秒後のひずみ 2サイクル目150℃----------------------------------------------
SET, , ,1, ,5, , !2サイクル目150℃

ESEL,S,TYPE,,6	!はんだと樹脂の接合面
AVPRIN,0, ,
etable,F_SOL_H,cont,sfric	!せん断
etable,P_SOL_H,cont,pres	!引っ張り

ESEL,S,TYPE,,7	!チップと樹脂の接合面
AVPRIN,0, ,
etable,F_SI_H,cont,sfric	!せん断
etable,P_SI_H,cont,pres	!引っ張り

ESEL,S,TYPE,,8	!銅と樹脂の接合面
AVPRIN,0, ,
etable,F_CU_H,cont,sfric	!せん断
etable,P_CU_H,cont,pres	!引っ張り

ESEL,S,TYPE,,9	!銅と樹脂の接合面	細目樹脂の銅との接合部
AVPRIN,0, ,
etable,F_CUF_H,cont,sfric	!せん断
etable,P_CUF_H,cont,pres	!引っ張り

!---DBC--------------
ESEL,S,TYPE,,10	!セラと樹脂の接合面
AVPRIN,0, ,
etable,F_CERA_H,cont,sfric	!せん断
etable,P_CERA_H,cont,pres	!引っ張り
!---DBC 終了--------------


CMSEL,S,RESIN,VOLU
ESLV,S,		!選択されたボリュームに対する要素の選択
NSLE,S,		!選択された要素の接点の選択
AVPRIN,0, ,
ETABLE,R_EPEL_H,EPEL,EQV  !相当弾性ひずみEPELは弾性ひずみ
ETABLE,RHX,EPEL,X  !高温弾性ひずみ
ETABLE,RHY,EPEL,Y  !高温弾性ひずみ
ETABLE,RHZ,EPEL,Z  !高温弾性ひずみ
ETABLE,RHXY,EPEL,XY  !高温弾性ひずみ
ETABLE,RHYZ,EPEL,YZ  !高温弾性ひずみ
ETABLE,RHXZ,EPEL,XZ  !高温弾性ひずみ

ETABLE,RSHX,S,X  !高温弾性応力
ETABLE,RSHY,S,Y  !高温弾性応力
ETABLE,RSHZ,S,Z  !高温弾性応力
ETABLE,RSHXY,S,XY  !高温弾性応力
ETABLE,RSHYZ,S,YZ  !高温弾性応力
ETABLE,RSHXZ,S,XZ  !高温弾性応力


ETABLE,RHSXY,S,XY  !高温弾性せんだん応力

!CMSEL,S,RESMTATE,VOLU
!ESLV,S,		!選択されたボリュームに対する要素の選択
!NSLE,S,		!選択された要素の接点の選択
!AVPRIN,0, ,
!ETABLE,RHSMTA,S,Y  !高温弾性応力 小さいDBC 縦方向(Y方向)

!CMSEL,S,RESMYOKO,VOLU
!ESLV,S,		!選択されたボリュームに対する要素の選択
!NSLE,S,		!選択された要素の接点の選択
!AVPRIN,0, ,
!ETABLE,RHSMYO,S,X  !高温弾性応力 小さいDBC 横方向(X方向)

!CMSEL,S,RELATATE,VOLU
!ESLV,S,		!選択されたボリュームに対する要素の選択
!NSLE,S,		!選択された要素の接点の選択
!AVPRIN,0, ,
!ETABLE,RHLATA,S,Y  !高温弾性応力 大きいDBC 縦方向(Y方向)

!CMSEL,S,RELAYOKO,VOLU
!ESLV,S,		!選択されたボリュームに対する要素の選択
!NSLE,S,		!選択された要素の接点の選択
!AVPRIN,0, ,
!ETABLE,RHLAYO,S,X  !高温弾性応力 大きいDBC 横方向(X方向)

!--------7秒後のひずみ 2サイクル目-40℃----------------------------------------------
SET, , ,1, ,7, , !2サイクル目-40℃
ESEL,S,TYPE,,6	!はんだと樹脂の接合面
AVPRIN,0, ,
etable,F_SOL_L,cont,sfric	!せん断
etable,P_SOL_L,cont,pres	!引っ張り

ESEL,S,TYPE,,7	!チップと樹脂の接合面
AVPRIN,0, ,
etable,F_SI_L,cont,sfric	!せん断
etable,P_SI_L,cont,pres	!引っ張り

ESEL,S,TYPE,,8	!銅と樹脂の接合面
AVPRIN,0, ,
etable,F_CU_L,cont,sfric	!せん断
etable,P_CU_L,cont,pres	!引っ張り

ESEL,S,TYPE,,9	!銅と樹脂の接合面 細目樹脂の銅との接合部
AVPRIN,0, ,
etable,F_CUF_L,cont,sfric	!せん断
etable,P_CUF_L,cont,pres	!引っ張り

!---DBC--------------
ESEL,S,TYPE,,10	!セラと樹脂の接合面
AVPRIN,0, ,
etable,F_CERA_L,cont,sfric	!せん断
etable,P_CERA_L,cont,pres	!引っ張り
!---DBC 終了--------------

CMSEL,S,RESIN,VOLU
ESLV,S,		!選択されたボリュームに対する要素の選択
NSLE,S,		!選択された要素の接点の選択
AVPRIN,0, ,
ETABLE,R_EPEL_L,EPEL,EQV  !相当弾性ひずみEPELは弾性ひずみ
ETABLE,RLX,EPEL,X  !低温弾性ひずみ
ETABLE,RLY,EPEL,Y  !低温弾性ひずみ
ETABLE,RLZ,EPEL,Z  !低温弾性ひずみ
ETABLE,RLXY,EPEL,XY  !低温弾性ひずみ
ETABLE,RLYZ,EPEL,YZ  !低温弾性ひずみ
ETABLE,RLXZ,EPEL,XZ  !低温弾性ひずみ

ETABLE,RSLX,S,X  !低温弾性応力
ETABLE,RSLY,S,Y  !低温弾性応力
ETABLE,RSLZ,S,Z  !低温弾性応力
ETABLE,RSLXY,S,XY  !低温弾性応力
ETABLE,RSLYZ,S,YZ  !低温弾性応力
ETABLE,RSLXZ,S,XZ  !低温弾性応力


ETABLE,RLSXY,S,XY  !低温弾性せんだん応力

!これらは液槽冷熱でのクラック調査の名残
!CMSEL,S,RESMTATE,VOLU
!ESLV,S,		!選択されたボリュームに対する要素の選択
!NSLE,S,		!選択された要素の接点の選択
!AVPRIN,0, ,
!ETABLE,RLSMTA,S,Y  !低温弾性応力 小さいDBC 縦方向(Y方向)

!CMSEL,S,RESMYOKO,VOLU
!ESLV,S,		!選択されたボリュームに対する要素の選択
!NSLE,S,		!選択された要素の接点の選択
!AVPRIN,0, ,
!ETABLE,RLSMYO,S,X  !低温弾性応力 小さいDBC 横方向(X方向)

!CMSEL,S,RELATATE,VOLU
!ESLV,S,		!選択されたボリュームに対する要素の選択
!NSLE,S,		!選択された要素の接点の選択
!AVPRIN,0, ,
!ETABLE,RLLATA,S,Y  !低温弾性応力　大きいDBC 縦方向(Y方向)

!CMSEL,S,RELAYOKO,VOLU
!ESLV,S,		!選択されたボリュームに対する要素の選択
!NSLE,S,		!選択された要素の接点の選択
!AVPRIN,0, ,
!ETABLE,RLLAYO,S,X  !低温弾性応力　大きいDBC 横方向(X方向)

allsel	!これが抜けていたかな


!------------------------------------------------------------------------------------------------
!-----はんだと樹脂の界面まとめ
SADD,F_SOL,F_SOL_H,F_SOL_L,0.5,0.5	!0.5は片振りにするため せんだんは符号がないのでともにプラスで計算
SADD,P_SOL,P_SOL_H,P_SOL_L,0.5,-0.5
SMULT,P_SOL,P_SOL,,-1

!ESORT,ETAB,F_SOL_H,0,1		!0は降順　1は絶対値
!!PRETAB,F_SOL_H
!*GET,MAX_F_SOL_H,SORT,,Max

ESORT,ETAB,F_SOL,0,1		!0は降順　1は絶対値
!PRETAB,F_SOL
*GET,MAX_F_SOL,SORT,,Max
*GET,ELM_F_SOL,SORT,,IMax	!IMAXは最大値を有する節点の要素番号
*GET,ELM_F_SOLX,ELEM,ELM_F_SOL,CENT,X
*GET,ELM_F_SOLY,ELEM,ELM_F_SOL,CENT,Y
*GET,ELM_F_SOLZ,ELEM,ELM_F_SOL,CENT,Z

ESORT,ETAB,P_SOL,0,1		!0は降順　1は絶対値
!PRETAB,P_SOL

*GET,MAX_P_SOL,SORT,,Max
*GET,ELM_P_SOL,SORT,,IMax	!IMAXは最大値を有する節点の要素番号
*GET,ELM_P_SOLX,ELEM,ELM_P_SOL,CENT,X
*GET,ELM_P_SOLY,ELEM,ELM_P_SOL,CENT,Y
*GET,ELM_P_SOLZ,ELEM,ELM_P_SOL,CENT,Z

!-----チップと樹脂の界面まとめ
SADD,F_SI,F_SI_H,F_SI_L,0.5,0.5	!0.5は片振りにするため
SADD,P_SI,P_SI_H,P_SI_L,0.5,-0.5
SMULT,P_SI,P_SI,,-1	!面圧なのでもともとは圧縮が正。これをひっくり返して引っ張りを正にしている

ESORT,ETAB,F_SI,0,1		!0は降順　1は絶対値
!PRETAB,F_SI

*GET,MAX_F_SI,SORT,,Max
*GET,ELM_F_SI,SORT,,IMax	!IMAXは最大値を有する節点の要素番号
*GET,ELM_F_SIX,ELEM,ELM_F_SI,CENT,X
*GET,ELM_F_SIY,ELEM,ELM_F_SI,CENT,Y
*GET,ELM_F_SIZ,ELEM,ELM_F_SI,CENT,Z

ESORT,ETAB,P_SI,0,1		!0は降順　1は絶対値
!PRETAB,P_SI

*GET,MAX_P_SI,SORT,,Max
*GET,ELM_P_SI,SORT,,IMax	!IMAXは最大値を有する節点の要素番号
*GET,ELM_P_SIX,ELEM,ELM_P_SI,CENT,X
*GET,ELM_P_SIY,ELEM,ELM_P_SI,CENT,Y
*GET,ELM_P_SIZ,ELEM,ELM_P_SI,CENT,Z

!-----銅と樹脂の界面まとめ
SADD,F_CU,F_CU_H,F_CU_L,0.5,0.5	!0.5は片振りにするため
SADD,P_CU,P_CU_H,P_CU_L,0.5,-0.5
SMULT,P_CU,P_CU,,-1


ESORT,ETAB,F_CU,0,1		!0は降順　1は絶対値
!PRETAB,F_CU

*GET,MAX_F_CU,SORT,,Max
*GET,ELM_F_CU,SORT,,IMax	!IMAXは最大値を有する節点の要素番号
*GET,ELM_F_CUX,ELEM,ELM_F_CU,CENT,X
*GET,ELM_F_CUY,ELEM,ELM_F_CU,CENT,Y
*GET,ELM_F_CUZ,ELEM,ELM_F_CU,CENT,Z

ESORT,ETAB,P_CU,0,1		!0は降順　1は絶対値
!PRETAB,P_CU

*GET,MAX_P_CU,SORT,,Max
*GET,ELM_P_CU,SORT,,IMax	!IMAXは最大値を有する節点の要素番号
*GET,ELM_P_CUX,ELEM,ELM_P_CU,CENT,X
*GET,ELM_P_CUY,ELEM,ELM_P_CU,CENT,Y
*GET,ELM_P_CUZ,ELEM,ELM_P_CU,CENT,Z

!-----銅と細目樹脂の界面まとめ
SADD,F_CUF,F_CUF_H,F_CUF_L,0.5,0.5	!0.5は片振りにするため
SADD,P_CUF,P_CUF_H,P_CUF_L,0.5,-0.5
SMULT,P_CUF,P_CUF,,-1


ESORT,ETAB,F_CUF,0,1		!0は降順　1は絶対値
!PRETAB,F_CUF

*GET,MAX_F_CUF,SORT,,Max
*GET,ELM_F_CUF,SORT,,IMax	!IMAXは最大値を有する節点の要素番号
*GET,ELM_F_CUFX,ELEM,ELM_F_CUF,CENT,X
*GET,ELM_F_CUFY,ELEM,ELM_F_CUF,CENT,Y
*GET,ELM_F_CUFZ,ELEM,ELM_F_CUF,CENT,Z

ESORT,ETAB,P_CUF,0,1		!0は降順　1は絶対値
!PRETAB,P_CUF

*GET,MAX_P_CUF,SORT,,Max
*GET,ELM_P_CUF,SORT,,IMax	!IMAXは最大値を有する節点の要素番号
*GET,ELM_P_CUFX,ELEM,ELM_P_CUF,CENT,X
*GET,ELM_P_CUFY,ELEM,ELM_P_CUF,CENT,Y
*GET,ELM_P_CUFZ,ELEM,ELM_P_CUF,CENT,Z

!---DBC-----------
!----セラと樹脂の界面まとめ
SADD,F_CERA,F_CERA_H,F_CERA_L,0.5,0.5	!0.5は片振りにするため
SADD,P_CERA,P_CERA_H,P_CERA_L,0.5,-0.5
SMULT,P_CERA,P_CERA,,-1


ESORT,ETAB,F_CERA,0,1		!0は降順　1は絶対値
!PRETAB,F_CERA

*GET,MAX_F_CERA,SORT,,Max
*GET,ELM_F_CERA,SORT,,IMax	!IMAXは最大値を有する節点の要素番号
*GET,ELM_F_CERAX,ELEM,ELM_F_CERA,CENT,X
*GET,ELM_F_CERAY,ELEM,ELM_F_CERA,CENT,Y
*GET,ELM_F_CERAZ,ELEM,ELM_F_CERA,CENT,Z

ESORT,ETAB,P_CERA,0,1		!0は降順　1は絶対値
!PRETAB,P_CERA

*GET,MAX_P_CERA,SORT,,Max
*GET,ELM_P_CERA,SORT,,IMax	!IMAXは最大値を有する節点の要素番号
*GET,ELM_P_CERAX,ELEM,ELM_P_CERA,CENT,X
*GET,ELM_P_CERAY,ELEM,ELM_P_CERA,CENT,Y
*GET,ELM_P_CERAZ,ELEM,ELM_P_CERA,CENT,Z
!---DBC 終了-----------


!----樹脂の弾性ひずみまとめ
!SADD,R_EPEL,R_EPEL_H,R_EPEL_L,0.5,-0.5	!0.5は片振りにするため

!ESORT,ETAB,R_EPEL,0,1		!0は降順　1は絶対値
!!PRETAB,R_EPEL

!*GET,MAX_R_EPEL,SORT,,Max
!*GET,ELM_R_EPEL,SORT,,IMax	!IMAXは最大値を有する節点の要素番号
!*GET,ELM_R_EPELX,ELEM,ELM_R_EPEL,CENT,X
!*GET,ELM_R_EPELY,ELEM,ELM_R_EPEL,CENT,Y
!*GET,ELM_R_EPELZ,ELEM,ELM_R_EPEL,CENT,Z


!----樹脂の弾性ひずみまとめ170111こんどこそ正解  こっちが正解の筈 ミーゼス応力の計算
SADD,RSX,RSHX,RSLX,0.5,-0.5	!0.5は片振りにするため
SADD,RSY,RSHY,RSLY,0.5,-0.5	!0.5は片振りにするため
SADD,RSZ,RSHZ,RSLZ,0.5,-0.5	!0.5は片振りにするため
SADD,RSXY,RSHXY,RSLXY,0.5,-0.5	!0.5は片振りにするため
SADD,RSYZ,RSHYZ,RSLYZ,0.5,-0.5	!0.5は片振りにするため
SADD,RSXZ,RSHXZ,RSLXZ,0.5,-0.5	!0.5は片振りにするため


SADD,RSX_Y,RSX,RSY,1,-1
SEXP,RSX_Y,RSX_Y,,2,	!(RX_Y)^2
SADD,RSY_Z,RSY,RSZ,1,-1
SEXP,RSY_Z,RSY_Z,,2,	!(RY_Z)^2
SADD,RSX_Z,RSX,RSZ,1,-1
SEXP,RSX_Z,RSX_Z,,2,	!(RX_Z)^2
SEXP,RSXY,RSXY,,2,
SEXP,RSYZ,RSYZ,,2,
SEXP,RSXZ,RSXZ,,2,
SMULT,RSXY,RSXY,,6
SMULT,RSYZ,RSYZ,,6
SMULT,RSXZ,RSXZ,,6
SADD,RSEQV,RSX_Y,RSY_Z,1,1
SADD,RSEQV,RSEQV,RSX_Z,1,1
SADD,RSEQV,RSEQV,RSXY,1,1
SADD,RSEQV,RSEQV,RSYZ,1,1
SADD,RSEQV,RSEQV,RSXZ,1,1
SMULT,RSEQV,RSEQV,,0.5
SEXP,RSEQV,RSEQV,,0.5

ESORT,ETAB,RSEQV,0,1		!0は降順　1は絶対値
!PRETAB,RSEQV


*GET,MAX_RS,SORT,,Max
*GET,ELM_RS,SORT,,IMax	!IMAXは最大値を有する節点の要素番号
*GET,ELM_RS_X,ELEM,ELM_RS,CENT,X
*GET,ELM_RS_Y,ELEM,ELM_RS,CENT,Y
*GET,ELM_RS_Z,ELEM,ELM_RS,CENT,Z
!------------ミーゼス応力の計算170111こんどこそ正解　高温-低温の片振り振幅　ここまで---------------------------


ESORT,ETAB,RHXY,0,1		!0は降順　1は絶対値
!PRETAB,RHXY
*GET,MAX_RHXY,SORT,,Max		!樹脂のXYせん断応力　高温側
*GET,ELM_RHXY,SORT,,IMax	!IMAXは最大値を有する節点の要素番号

ESORT,ETAB,RLXY,0,1		!0は降順　1は絶対値
!PRETAB,RLXY
*GET,MAX_RLXY,SORT,,Max		!樹脂のXYせん断応力　高温側
*GET,ELM_RLXY,SORT,,IMax	!IMAXは最大値を有する節点の要素番号

ESORT,ETAB,RHSXY,0,1		!0は降順　1は絶対値
!PRETAB,RHSXY
*GET,MAX_RHSXY,SORT,,Max		!樹脂のXYせん断応力　高温側
*GET,ELM_RHSXY,SORT,,IMax	!IMAXは最大値を有する節点の要素番号

!-------せんだん応力を、界面ではなく樹脂のXY方向で検証
ESORT,ETAB,RLSXY,0,1		!0は降順　1は絶対値
!PRETAB,RLSXY
*GET,MAX_RLSXY,SORT,,Max		!樹脂のXYせん断応力　高温側
*GET,ELM_RLSXY,SORT,,IMax	!IMAXは最大値を有する節点の要素番号

!-----------荷重ケースを試すおよび
CMSEL,S,RESIN,VOLU	!樹脂を選択
ESLV,S,		!選択されたボリュームに対する要素の選択
NSLE,S,		!選択された要素の接点の選択
AVPRIN,0, ,


LCDEF,1,5	!荷重STEPとTIMEの違いは別途調査のこと。今回はSTEP=TIMEなので気にせず使う
LCDEF,2,7	!荷重ケース1に高温(STEP=TIME=5)をセット。ケース2に低温(7)をセット
LCASE,1
LCOPER,SUB,2	!高温から低温を引き算する
LCWRITE,3,RESIN_SABUN

ETABLE,REQVCASE,EPEL,EQV  !相当弾性ひずみEPELは弾性ひずみ
ESORT,ETAB,REQVCASE,0,1		!0は降順　1は絶対値
!PRETAB,REQVCASE
*GET,MAX_REQVCASE,SORT,,Max		!樹脂の相当ひずみ　差分
*GET,ELM_REQVCASE,SORT,,IMax	!IMAXは最大値を有する節点の要素番号

ETABLE,REQVC_S,S,EQV  !相当弾性応力
ESORT,ETAB,REQVC_S,0,1		!0は降順　1は絶対値
!PRETAB,REQVC_S
*GET,MAX_REQVC_S,SORT,,Max		!樹脂の応力　差分
*GET,ELM_REQVC_S,SORT,,IMax	!IMAXは最大値を有する節点の要素番号

ALLSEL

!------------------高温と低温のパラメータ各々出力しておく 念のため出力------------------------------------
ESORT,ETAB,F_SOL_H,0,1		!0は降順　1は絶対値
!PRETAB,F_SOL_H

*GET,MAX_F_SOL_H,SORT,,Max
*GET,ELM_F_SOL_H,SORT,,IMax	!IMAXは最大値を有する節点の要素番号
*GET,ELM_F_SOL_HX,ELEM,ELM_F_SOL_H,CENT,X
*GET,ELM_F_SOL_HY,ELEM,ELM_F_SOL_H,CENT,Y
*GET,ELM_F_SOL_HZ,ELEM,ELM_F_SOL_H,CENT,Z

ESORT,ETAB,P_SOL_H,0,1		!0は降順　1は絶対値
!PRETAB,P_SOL_H

*GET,MAX_P_SOL_H,SORT,,Max
*GET,ELM_P_SOL_H,SORT,,IMax	!IMAXは最大値を有する節点の要素番号
*GET,ELM_P_SOL_HX,ELEM,ELM_P_SOL_H,CENT,X
*GET,ELM_P_SOL_HY,ELEM,ELM_P_SOL_H,CENT,Y
*GET,ELM_P_SOL_HZ,ELEM,ELM_P_SOL_H,CENT,Z

ESORT,ETAB,F_SOL_L,0,1		!0は降順　1は絶対値
!PRETAB,F_SOL_L

*GET,MAX_F_SOL_L,SORT,,Max
*GET,ELM_F_SOL_L,SORT,,IMax	!IMAXは最大値を有する節点の要素番号
*GET,ELM_F_SOL_LX,ELEM,ELM_F_SOL_L,CENT,X
*GET,ELM_F_SOL_LY,ELEM,ELM_F_SOL_L,CENT,Y
*GET,ELM_F_SOL_LZ,ELEM,ELM_F_SOL_L,CENT,Z

ESORT,ETAB,P_SOL_L,0,1		!0は降順　1は絶対値
!PRETAB,P_SOL_L

*GET,MAX_P_SOL_L,SORT,,Max
*GET,ELM_P_SOL_L,SORT,,IMax	!IMAXは最大値を有する節点の要素番号
*GET,ELM_P_SOL_LX,ELEM,ELM_P_SOL_L,CENT,X
*GET,ELM_P_SOL_LY,ELEM,ELM_P_SOL_L,CENT,Y
*GET,ELM_P_SOL_LZ,ELEM,ELM_P_SOL_L,CENT,Z


ESORT,ETAB,F_SI_H,0,1		!0は降順　1は絶対値
!PRETAB,F_SI_H

*GET,MAX_F_SI_H,SORT,,Max
*GET,ELM_F_SI_H,SORT,,IMax	!IMAXは最大値を有する節点の要素番号
*GET,ELM_F_SI_HX,ELEM,ELM_F_SI_H,CENT,X
*GET,ELM_F_SI_HY,ELEM,ELM_F_SI_H,CENT,Y
*GET,ELM_F_SI_HZ,ELEM,ELM_F_SI_H,CENT,Z

ESORT,ETAB,P_SI_H,0,1		!0は降順　1は絶対値
!PRETAB,P_SI_H

*GET,MAX_P_SI_H,SORT,,Max
*GET,ELM_P_SI_H,SORT,,IMax	!IMAXは最大値を有する節点の要素番号
*GET,ELM_P_SI_HX,ELEM,ELM_P_SI_H,CENT,X
*GET,ELM_P_SI_HY,ELEM,ELM_P_SI_H,CENT,Y
*GET,ELM_P_SI_HZ,ELEM,ELM_P_SI_H,CENT,Z


ESORT,ETAB,F_SI_L,0,1		!0は降順　1は絶対値
!PRETAB,F_SI_L

*GET,MAX_F_SI_L,SORT,,Max
*GET,ELM_F_SI_L,SORT,,IMax	!IMAXは最大値を有する節点の要素番号
*GET,ELM_F_SI_LX,ELEM,ELM_F_SI_L,CENT,X
*GET,ELM_F_SI_LY,ELEM,ELM_F_SI_L,CENT,Y
*GET,ELM_F_SI_LZ,ELEM,ELM_F_SI_L,CENT,Z

ESORT,ETAB,P_SI_L,0,1		!0は降順　1は絶対値
!PRETAB,P_SI_L

*GET,MAX_P_SI_L,SORT,,Max
*GET,ELM_P_SI_L,SORT,,IMax	!IMAXは最大値を有する節点の要素番号
*GET,ELM_P_SI_LX,ELEM,ELM_P_SI_L,CENT,X
*GET,ELM_P_SI_LY,ELEM,ELM_P_SI_L,CENT,Y
*GET,ELM_P_SI_LZ,ELEM,ELM_P_SI_L,CENT,Z


ESORT,ETAB,F_CU_H,0,1		!0は降順　1は絶対値
!PRETAB,F_CU_H

*GET,MAX_F_CU_H,SORT,,Max
*GET,ELM_F_CU_H,SORT,,IMax	!IMAXは最大値を有する節点の要素番号
*GET,ELM_F_CU_HX,ELEM,ELM_F_CU_H,CENT,X
*GET,ELM_F_CU_HY,ELEM,ELM_F_CU_H,CENT,Y
*GET,ELM_F_CU_HZ,ELEM,ELM_F_CU_H,CENT,Z

ESORT,ETAB,P_CU_H,0,1		!0は降順　1は絶対値
!PRETAB,P_CU_H

*GET,MAX_P_CU_H,SORT,,Max
*GET,ELM_P_CU_H,SORT,,IMax	!IMAXは最大値を有する節点の要素番号
*GET,ELM_P_CU_HX,ELEM,ELM_P_CU_H,CENT,X
*GET,ELM_P_CU_HY,ELEM,ELM_P_CU_H,CENT,Y
*GET,ELM_P_CU_HZ,ELEM,ELM_P_CU_H,CENT,Z

ESORT,ETAB,F_CU_L,0,1		!0は降順　1は絶対値
!PRETAB,F_CU_L

*GET,MAX_F_CU_L,SORT,,Max
*GET,ELM_F_CU_L,SORT,,IMax	!IMAXは最大値を有する節点の要素番号
*GET,ELM_F_CU_LX,ELEM,ELM_F_CU_L,CENT,X
*GET,ELM_F_CU_LY,ELEM,ELM_F_CU_L,CENT,Y
*GET,ELM_F_CU_LZ,ELEM,ELM_F_CU_L,CENT,Z

ESORT,ETAB,P_CU_L,0,1		!0は降順　1は絶対値
!PRETAB,P_CU_L

*GET,MAX_P_CU_L,SORT,,Max
*GET,ELM_P_CU_L,SORT,,IMax	!IMAXは最大値を有する節点の要素番号
*GET,ELM_P_CU_LX,ELEM,ELM_P_CU_L,CENT,X
*GET,ELM_P_CU_LY,ELEM,ELM_P_CU_L,CENT,Y
*GET,ELM_P_CU_LZ,ELEM,ELM_P_CU_L,CENT,Z

!-------------------細かい樹脂---------------------------------------------------------
ESORT,ETAB,F_CUF_H,0,1		!0は降順　1は絶対値
!PRETAB,F_CUF_H

*GET,MAX_F_CUF_H,SORT,,Max
*GET,ELM_F_CUF_H,SORT,,IMax	!IMAXは最大値を有する節点の要素番号
*GET,ELM_F_CUF_HX,ELEM,ELM_F_CUF_H,CENT,X
*GET,ELM_F_CUF_HY,ELEM,ELM_F_CUF_H,CENT,Y
*GET,ELM_F_CUF_HZ,ELEM,ELM_F_CUF_H,CENT,Z

ESORT,ETAB,P_CUF_H,0,1		!0は降順　1は絶対値
!PRETAB,P_CUF_H

*GET,MAX_P_CUF_H,SORT,,Max
*GET,ELM_P_CUF_H,SORT,,IMax	!IMAXは最大値を有する節点の要素番号
*GET,ELM_P_CUF_HX,ELEM,ELM_P_CUF_H,CENT,X
*GET,ELM_P_CUF_HY,ELEM,ELM_P_CUF_H,CENT,Y
*GET,ELM_P_CUF_HZ,ELEM,ELM_P_CUF_H,CENT,Z

ESORT,ETAB,F_CUF_L,0,1		!0は降順　1は絶対値
!PRETAB,F_CUF_L

*GET,MAX_F_CUF_L,SORT,,Max
*GET,ELM_F_CUF_L,SORT,,IMax	!IMAXは最大値を有する節点の要素番号
*GET,ELM_F_CUF_LX,ELEM,ELM_F_CUF_L,CENT,X
*GET,ELM_F_CUF_LY,ELEM,ELM_F_CUF_L,CENT,Y
*GET,ELM_F_CUF_LZ,ELEM,ELM_F_CUF_L,CENT,Z

ESORT,ETAB,P_CUF_L,0,1		!0は降順　1は絶対値
!PRETAB,P_CUF_L

*GET,MAX_P_CUF_L,SORT,,Max
*GET,ELM_P_CUF_L,SORT,,IMax	!IMAXは最大値を有する節点の要素番号
*GET,ELM_P_CUF_LX,ELEM,ELM_P_CUF_L,CENT,X
*GET,ELM_P_CUF_LY,ELEM,ELM_P_CUF_L,CENT,Y
*GET,ELM_P_CUF_LZ,ELEM,ELM_P_CUF_L,CENT,Z
!-----------------細かい樹脂ここまで---------------------------------------------------
!---DBC---
ESORT,ETAB,F_CERA_H,0,1		!0は降順　1は絶対値
!PRETAB,F_CERA_H

*GET,MAX_F_CERA_H,SORT,,Max
*GET,ELM_F_CERA_H,SORT,,IMax	!IMAXは最大値を有する節点の要素番号
*GET,ELM_F_CERA_HX,ELEM,ELM_F_CERA_H,CENT,X
*GET,ELM_F_CERA_HY,ELEM,ELM_F_CERA_H,CENT,Y
*GET,ELM_F_CERA_HZ,ELEM,ELM_F_CERA_H,CENT,Z

ESORT,ETAB,P_CERA_H,0,1		!0は降順　1は絶対値
!PRETAB,P_CERA_H

*GET,MAX_P_CERA_H,SORT,,Max
*GET,ELM_P_CERA_H,SORT,,IMax	!IMAXは最大値を有する節点の要素番号
*GET,ELM_P_CERA_HX,ELEM,ELM_P_CERA_H,CENT,X
*GET,ELM_P_CERA_HY,ELEM,ELM_P_CERA_H,CENT,Y
*GET,ELM_P_CERA_HZ,ELEM,ELM_P_CERA_H,CENT,Z

ESORT,ETAB,F_CERA_L,0,1		!0は降順　1は絶対値
!PRETAB,F_CERA_L

*GET,MAX_F_CERA_L,SORT,,Max
*GET,ELM_F_CERA_L,SORT,,IMax	!IMAXは最大値を有する節点の要素番号
*GET,ELM_F_CERA_LX,ELEM,ELM_F_CERA_L,CENT,X
*GET,ELM_F_CERA_LY,ELEM,ELM_F_CERA_L,CENT,Y
*GET,ELM_F_CERA_LZ,ELEM,ELM_F_CERA_L,CENT,Z

ESORT,ETAB,P_CERA_L,0,1		!0は降順　1は絶対値
!PRETAB,P_CERA_L

*GET,MAX_P_CERA_L,SORT,,Max
*GET,ELM_P_CERA_L,SORT,,IMax	!IMAXは最大値を有する節点の要素番号
*GET,ELM_P_CERA_LX,ELEM,ELM_P_CERA_L,CENT,X
*GET,ELM_P_CERA_LY,ELEM,ELM_P_CERA_L,CENT,Y
*GET,ELM_P_CERA_LZ,ELEM,ELM_P_CERA_L,CENT,Z

!---DBC 終了---

!----高温の樹脂相当ひずみ
ESORT,ETAB,R_EPEL_H,0,1		!0は降順　1は絶対値
!PRETAB,R_EPEL_H

*GET,MAX_R_EPEL_H,SORT,,Max
*GET,ELM_R_EPEL_H,SORT,,IMax	!IMAXは最大値を有する節点の要素番号
*GET,ELM_R_EPEL_HX,ELEM,ELM_R_EPEL_H,CENT,X
*GET,ELM_R_EPEL_HY,ELEM,ELM_R_EPEL_H,CENT,Y
*GET,ELM_R_EPEL_HZ,ELEM,ELM_R_EPEL_H,CENT,Z

!----低温の樹脂相当ひずみ
ESORT,ETAB,R_EPEL_L,0,1		!0は降順　1は絶対値
!PRETAB,R_EPEL_L

*GET,MAX_R_EPEL_L,SORT,,Max
*GET,ELM_R_EPEL_L,SORT,,IMax	!IMAXは最大値を有する節点の要素番号
*GET,ELM_R_EPEL_LX,ELEM,ELM_R_EPEL_L,CENT,X
*GET,ELM_R_EPEL_LY,ELEM,ELM_R_EPEL_L,CENT,Y
*GET,ELM_R_EPEL_LZ,ELEM,ELM_R_EPEL_L,CENT,Z


!----------------ここまで念のため出力　　不要であれば削除OK-----------------------


*ENDIF	!RESINKEY

!--------------モジュール面の変形-------------------------------------
SET, , ,1, ,5, , !2サイクル目175℃
ASEL,S,LOC,Z,0
NSLA,R,		!選択された要素の接点の選択
AVPRIN,0, , 	!主値、ベクトル和の計算方法　0は共通の接点でまず平均値をとる
NSORT,U,Z,0	!この行を変えました。*GETコマンドのヘルプを参照。直前のSORTを参照すると記載されていたため。
*GET,MAX_SORI_URA_H,SORT,,Max
*GET,ELM_MAX_SORI_URA_H,SORT,,IMax	!IMAXは最大値を有する節点の要素番号
*GET,MIN_SORI_URA_H,SORT,,Min
*GET,ELM_MIN_SORI_URA_H,SORT,,IMin	!IMAXは最大値を有する節点の要素番号
ALLSEL

ASEL,S,LOC,Z,PMTHICK
NSLA,R,		!選択された要素の接点の選択
AVPRIN,0, , 	!主値、ベクトル和の計算方法　0は共通の接点でまず平均値をとる
NSORT,U,Z,0	!この行を変えました。*GETコマンドのヘルプを参照。直前のSORTを参照すると記載されていたため。
*GET,MAX_SORI_OMOTE_H,SORT,,Max
*GET,ELM_MAX_SORI_OMOTE_H,SORT,,IMax	!IMAXは最大値を有する節点の要素番号
*GET,MIN_SORI_OMOTE_H,SORT,,Min
*GET,ELM_MIN_SORI_OMOTE_H,SORT,,IMin	!IMAXは最大値を有する節点の要素番号
ALLSEL

SET, , ,1, ,7, , !2サイクル目-40℃
ASEL,S,LOC,Z,0
NSLA,R,		!選択された要素の接点の選択
AVPRIN,0, , 	!主値、ベクトル和の計算方法　0は共通の接点でまず平均値をとる
NSORT,U,Z,0	!この行を変えました。*GETコマンドのヘルプを参照。直前のSORTを参照すると記載されていたため。
*GET,MAX_SORI_URA_L,SORT,,Max
*GET,ELM_MAX_SORI_URA_L,SORT,,IMax	!IMAXは最大値を有する節点の要素番号
*GET,MIN_SORI_URA_L,SORT,,Min
*GET,ELM_MIN_SORI_URA_L,SORT,,IMin	!IMAXは最大値を有する節点の要素番号
ALLSEL

ASEL,S,LOC,Z,PMTHICK
NSLA,R,		!選択された要素の接点の選択
AVPRIN,0, , 	!主値、ベクトル和の計算方法　0は共通の接点でまず平均値をとる
NSORT,U,Z,0	!この行を変えました。*GETコマンドのヘルプを参照。直前のSORTを参照すると記載されていたため。
*GET,MAX_SORI_OMOTE_L,SORT,,Max
*GET,ELM_MAX_SORI_OMOTE_L,SORT,,IMax	!IMAXは最大値を有する節点の要素番号
*GET,MIN_SORI_OMOTE_L,SORT,,MIN
*GET,ELM_MIN_SORI_OMOTE_L,SORT,,IMIN	!IMAXは最大値を有する節点の要素番号
ALLSEL

*SET,SORI_URA_H,MAX_SORI_URA_H-MIN_SORI_URA_H
*SET,SORI_OMOTE_H,MAX_SORI_OMOTE_H-MIN_SORI_OMOTE_H
*SET,SORI_URA_L,MAX_SORI_URA_L-MIN_SORI_URA_L
*SET,SORI_OMOTE_L,MAX_SORI_OMOTE_L-MIN_SORI_OMOTE_L
!-------------------モジュール面の変形終了------------------------------------------


LCSUM,ALL	!塑性ひずみも演算する
!------再度はんだの算出　こんどは荷重ケースで算出した
LCDEF,4,4	!荷重STEPとTIMEの違いは別途調査のこと。今回はSTEP=TIMEなので気にせず使う
LCDEF,5,8	!荷重ケース1に1サイクル目(STEP=TIME=4)をセット。ケース2に２サイクル目(8)をセット
LCASE,5
LCOPER,SUB,4	!2サイクルから1サイクルを引き算する
LCWRITE,6,HANDA_SABUN
!---1サイクル目-----
LCASE,4

CMSEL,S,HANDA,VOLU
ESLV,S,		!選択されたボリュームに対する要素の選択
NSLE,S,		!選択された要素の接点の選択
AVPRIN,0, , 	!主値、ベクトル和の計算方法　0は共通の接点でまず平均値をとる
ETABLE,HANDA_1,NL,EPEQ
ESORT,ETAB,HANDA_1,0,1
!PRETAB,HANDA_1
*GET,MAX_HANDA_1,SORT,,Max
*GET,ELM_HANDA_1,SORT,,IMax	!IMAXは最大値を有する節点の要素番号
ALLSEL
!---2サイクル目-----
LCASE,5

CMSEL,S,HANDA,VOLU
ESLV,S,		!選択されたボリュームに対する要素の選択
NSLE,S,		!選択された要素の接点の選択
AVPRIN,0, , 	!主値、ベクトル和の計算方法　0は共通の接点でまず平均値をとる
ETABLE,HANDA_2,NL,EPEQ
ESORT,ETAB,HANDA_2,0,1
!PRETAB,HANDA_2
*GET,MAX_HANDA_2,SORT,,Max
*GET,ELM_HANDA_2,SORT,,IMax	!IMAXは最大値を有する節点の要素番号
ALLSEL

!---1,2サイクル差分-----
LCASE,6

CMSEL,S,HANDA,VOLU
ESLV,S,		!選択されたボリュームに対する要素の選択
NSLE,S,		!選択された要素の接点の選択
AVPRIN,0, , 	!主値、ベクトル和の計算方法　0は共通の接点でまず平均値をとる
ETABLE,HANDA_3,NL,EPEQ
ESORT,ETAB,HANDA_3,0,1
!PRETAB,HANDA_3
*GET,MAX_HANDA_3,SORT,,Max
*GET,ELM_HANDA_3,SORT,,IMax	!IMAXは最大値を有する節点の要素番号
ALLSEL

!--------------はんだ個別のひずみ算出します------------------------------------------------------
!-------------ダイはんだ-------------------------------------------------------
!---1サイクル目-----
LCASE,4

CMSEL,S,HANDACOR,VOLU
ESLV,S,		!選択されたボリュームに対する要素の選択
NSLE,S,		!選択された要素の接点の選択
AVPRIN,0, , 	!主値、ベクトル和の計算方法　0は共通の接点でまず平均値をとる
ETABLE,HANDAC_1,NL,EPEQ
ESORT,ETAB,HANDAC_1,0,1
!PRETAB,HANDAC_1
*GET,MAX_HANDAC_1,SORT,,Max
*GET,ELM_HANDAC_1,SORT,,IMax	!IMAXは最大値を有する節点の要素番号
ALLSEL
!---2サイクル目-----
LCASE,5

CMSEL,S,HANDACOR,VOLU
ESLV,S,		!選択されたボリュームに対する要素の選択
NSLE,S,		!選択された要素の接点の選択
AVPRIN,0, , 	!主値、ベクトル和の計算方法　0は共通の接点でまず平均値をとる
ETABLE,HANDAC_2,NL,EPEQ
ESORT,ETAB,HANDAC_2,0,1
!PRETAB,HANDACOR_2
*GET,MAX_HANDAC_2,SORT,,Max
*GET,ELM_HANDAC_2,SORT,,IMax	!IMAXは最大値を有する節点の要素番号
ALLSEL

!---1,2サイクル差分-----
LCASE,6

CMSEL,S,HANDACOR,VOLU
ESLV,S,		!選択されたボリュームに対する要素の選択
NSLE,S,		!選択された要素の接点の選択
AVPRIN,0, , 	!主値、ベクトル和の計算方法　0は共通の接点でまず平均値をとる
ETABLE,HANDAC_3,NL,EPEQ
ESORT,ETAB,HANDAC_3,0,1
!PRETAB,HANDAC_3
*GET,MAX_HANDAC_3,SORT,,Max
*GET,ELM_HANDAC_3,SORT,,IMax	!IMAXは最大値を有する節点の要素番号
ALLSEL
!--------------ダイはんだここまで-----------------------------------------

!--------------エミッタはんだ---------------------------------------------
LCASE,4

CMSEL,S,HANDAEMI,VOLU
ESLV,S,		!選択されたボリュームに対する要素の選択
NSLE,S,		!選択された要素の接点の選択
AVPRIN,0, , 	!主値、ベクトル和の計算方法　0は共通の接点でまず平均値をとる
ETABLE,HANDAE_1,NL,EPEQ
ESORT,ETAB,HANDAE_1,0,1
!PRETAB,HANDAE_1
*GET,MAX_HANDAE_1,SORT,,Max
*GET,ELM_HANDAE_1,SORT,,IMax	!IMAXは最大値を有する節点の要素番号
ALLSEL
!---2サイクル目-----
LCASE,5

CMSEL,S,HANDAEMI,VOLU
ESLV,S,		!選択されたボリュームに対する要素の選択
NSLE,S,		!選択された要素の接点の選択
AVPRIN,0, , 	!主値、ベクトル和の計算方法　0は共通の接点でまず平均値をとる
ETABLE,HANDAE_2,NL,EPEQ
ESORT,ETAB,HANDAE_2,0,1
!PRETAB,HANDAE_2
*GET,MAX_HANDAE_2,SORT,,Max
*GET,ELM_HANDAE_2,SORT,,IMax	!IMAXは最大値を有する節点の要素番号
ALLSEL

!---1,2サイクル差分-----
LCASE,6

CMSEL,S,HANDAEMI,VOLU
ESLV,S,		!選択されたボリュームに対する要素の選択
NSLE,S,		!選択された要素の接点の選択
AVPRIN,0, , 	!主値、ベクトル和の計算方法　0は共通の接点でまず平均値をとる
ETABLE,HANDAE_3,NL,EPEQ
ESORT,ETAB,HANDAE_3,0,1
!PRETAB,HANDAE_3
*GET,MAX_HANDAE_3,SORT,,Max
*GET,ELM_HANDAE_3,SORT,,IMax	!IMAXは最大値を有する節点の要素番号
ALLSEL
!--------------エミッタはんだここまで-------------------------------------

!--------------バスしたはんだ---------------------------------------------
!---1サイクル目-----
LCASE,4

CMSEL,S,HANDABUS,VOLU
ESLV,S,		!選択されたボリュームに対する要素の選択
NSLE,S,		!選択された要素の接点の選択
AVPRIN,0, , 	!主値、ベクトル和の計算方法　0は共通の接点でまず平均値をとる
ETABLE,HANDAB_1,NL,EPEQ
ESORT,ETAB,HANDAB_1,0,1
!PRETAB,HANDAB_1
*GET,MAX_HANDAB_1,SORT,,Max
*GET,ELM_HANDAB_1,SORT,,IMax	!IMAXは最大値を有する節点の要素番号
ALLSEL
!---2サイクル目-----
LCASE,5

CMSEL,S,HANDABUS,VOLU
ESLV,S,		!選択されたボリュームに対する要素の選択
NSLE,S,		!選択された要素の接点の選択
AVPRIN,0, , 	!主値、ベクトル和の計算方法　0は共通の接点でまず平均値をとる
ETABLE,HANDAB_2,NL,EPEQ
ESORT,ETAB,HANDAB_2,0,1
!PRETAB,HANDAB_2
*GET,MAX_HANDAB_2,SORT,,Max
*GET,ELM_HANDAB_2,SORT,,IMax	!IMAXは最大値を有する節点の要素番号
ALLSEL

!---1,2サイクル差分-----
LCASE,6

CMSEL,S,HANDABUS,VOLU
ESLV,S,		!選択されたボリュームに対する要素の選択
NSLE,S,		!選択された要素の接点の選択
AVPRIN,0, , 	!主値、ベクトル和の計算方法　0は共通の接点でまず平均値をとる
ETABLE,HANDAB_3,NL,EPEQ
ESORT,ETAB,HANDAB_3,0,1
!PRETAB,HANDAB_3
*GET,MAX_HANDAB_3,SORT,,Max
*GET,ELM_HANDAB_3,SORT,,IMax	!IMAXは最大値を有する節点の要素番号
ALLSEL
!--------------バスしたはんだここまで-------------------------------------


!-----------------解析終了------------------------------------------------------------
!*ENDIF	!解析を実行するかどうかのSW

SAVE ,'STRESS_TCT','db'

ALLSEL
FINI

*ENDIF !TCTSW

*ENDIF !SOLUTIONSW

:OWARI


:ENDLABEL
